<?xml version="1.0" encoding="UTF-8"?>
<!--
  File:     Continental_TSIO-520-R.xml
  Author:   Aero-Matic v 0.83

  Inputs:
    name:           Continental_TSIO-520-R
    type:           piston
    power:          310 hp
-->

<piston_engine name="Continental_TSIO-520-R">
  <ram-air-factor>0.1</ram-air-factor>
  <minmp unit="INHG">         18.5 </minmp>
  <maxmp unit="INHG">         36.5 </maxmp>
  <displacement unit="IN3"> 520.00 </displacement>
  <maxhp>        310.00 </maxhp>
  <cycles>         4.0 </cycles>
  <idlerpm>      100.0 </idlerpm>
  <maxrpm>      2700.0 </maxrpm>
  <sparkfaildrop>  0.1 </sparkfaildrop>
  <volumetric-efficiency> 0.85 </volumetric-efficiency>

  <numboostspeeds>1</numboostspeeds>
  <boostoverride>0</boostoverride>
  <ratedboost1 unit="INHG">6.5</ratedboost1>
  <ratedaltitude1>12000</ratedaltitude1>
  <ratedpower1>310</ratedpower1>
  <ratedrpm1>2700</ratedrpm1>


  <man-press-lag> 0.1 </man-press-lag>
  <static-friction  unit="HP"> 1.55 </static-friction>
  <starter-torque> 50.00 </starter-torque>
  <starter-rpm> 300 </starter-rpm>
 <!-- Defining <bsfc> over-rides the built-in horsepower calculations -->
 <!--<bsfc>           0.45 </bsfc>-->
  <stroke unit="IN">  4.0 </stroke>
  <bore unit="IN">    5.25 </bore>
  <cylinders>         6.0  </cylinders>
  <compression-ratio>  7.5 </compression-ratio>
</piston_engine>
