<?xml version="1.0" encoding="UTF-8"?>
<aerodynamics>
	<function name="aero/function/kCDge">
		<description>Change in drag due to ground effect</description>
		<table>
			<independentVar>aero/h_b-mac-ft</independentVar>
			<tableData>
				  0.0000	0.4800
				  0.1000	0.5150
				  0.1500	0.6290
				  0.2000	0.7090
				  0.3000	0.8150
				  0.4000	0.8820
				  0.5000	0.9280
				  0.6000	0.9620
				  0.7000	0.9880
				  0.8000	1.0000
				  0.9000	1.0000
				  1.0000	1.0000
				  1.1000	1.0000
			  </tableData>
		</table>
	</function>

	<function name="aero/function/kCLge">
		<description>Change in lift due to ground effect</description>
		<table>
			<independentVar>aero/h_b-mac-ft</independentVar>
			<tableData>
				0.0000	1.2030
				0.1000	1.1270
				0.1500	1.0900
				0.2000	1.0730
				0.3000	1.0460
				0.4000	1.0280
				0.5000	1.0190
				0.6000	1.0130
				0.7000	1.0080
				0.8000	1.0060
				0.9000	1.0030
				1.0000	1.0020
				1.1000	1.0000
			</tableData>
		</table>
	</function>

	<function name="qbar_empennage">
		<description>qbar as effective on empennage</description>
		<product>
			<sum>
				<property>velocities/u-aero-fps</property>
				<property>propulsion/engine/prop-induced-velocity_fps</property>
			</sum>
			<sum>
				<property>velocities/u-aero-fps</property>
				<property>propulsion/engine/prop-induced-velocity_fps</property>
			</sum>
			<value>0.5</value>
			<property>atmosphere/rho-slugs_ft3</property>
			<property>metrics/Sw-sqft</property>
		</product>
	</function>

	<function name="aero/propeller-stream-factor">
		<description>Additional stream from propeller</description>
		<min>
			<value>2</value>
			<sum>
				<value>1</value>
				<quotient>
					<product>
						<value>2.5</value>
						<property>propulsion/engine/thrust-coefficient</property>
					</product>
					<pow>
						<max>
							<property>propulsion/engine/advance-ratio</property>
							<value>0.0001</value>
						</max>
						<value>2</value>
					</pow>
				</quotient>
			</sum>
		</min>
	</function>

	<function name="aero/alpha_ref">
		<description>alpha based on reference line</description>
			<difference>
			<property>aero/alpha-deg</property>
			<value>-3.7</value>
			</difference>
	</function>

	<property>aero/tuning/prop-effects</property>
	<property>aero/tuning/pitch-slotflaps</property>

	<function name="aero/tuning/adverse-yaw-factor">
	<description>pure testing</description>
		<value>0.7</value>
	</function>

	<axis name="Z">
		<function name="aero/force/Z_base">
			<description>Z base</description>
			<product>
				<property>aero/qbar-psf</property>
				<property>metrics/Sw-sqft</property>
				<property>aero/function/kCLge</property>
				<value>-1</value>
				<table>
					<independentVar lookup="row">aero/alpha-deg</independentVar>
					<independentVar lookup="column">aero/beta-deg</independentVar>
					<independentVar lookup="table">fcs/flap-pos-deg</independentVar>
					<tableData breakPoint="0">
						-30	-15	0	15	30
					-15	-0.51765	-0.67367	-0.72230	-0.67331	-0.51797
					-10	-0.20588	-0.26691	-0.28665	-0.26713	-0.20580
					-5	0.12303	0.14953	0.16529	0.14643	0.12386
					0	0.45713	0.57230	0.62303	0.57379	0.45641
					5	0.79360	1.00315	1.07860	1.00371	0.79302
					10	1.3	1.415184	1.5047167	1.415184	1.3
					12	1.3	1.5211623	1.5590762	1.5211623	1.3
					14	1.3	1.5612035	1.5863258	1.5612035	1.3
					16	1.3	1.5815025	1.6009724	1.5815025	1.3
					18	1.3	1.5929929	1.6079826	1.5929929	1.3
					20	1.3	1.5974342	1.6056723	1.5974342	1.3
					22	1.3	1.5989382	1.60074	1.5989382	1.3

					</tableData>
					<tableData breakPoint="30">
						-30	-15	0	15	30
					-15	-0.1564	-0.2204	-0.2355	-0.2153	-0.1557
					-10	0.1386	0.1834	0.1991	0.1833	0.1414
					-5	0.4511	0.6592	0.6221	0.5864	0.4540
					0	0.7777	1.0063	1.0827	1.0054	0.7784
					5	1.1253	1.4001	1.4676	1.4012	1.1280
					10	1.6	1.7587345	1.8180883	1.7587345	1.6
					12	1.6	1.8251408	1.8730447	1.8251408	1.6
					14	1.6	1.8775576	1.9152059	1.8775576	1.6
					16	1.6	1.9179958	1.9466891	1.9179958	1.6
					18	1.6	1.9434332	1.9663368	1.9434332	1.6
					20	1.6	1.9574697	1.9755207	1.9574697	1.6
					22	1.6	1.9668891	1.9736248	1.9668891	1.6

					</tableData>
				</table>
				<!--<quotient>
				<sum>
					<property>damage/left-wing-ripped-off</property>
					<property>damage/right-wing-ripped-off</property>
				</sum>
				<value>2</value>
				</quotient>-->
			</product>
		</function>

		<function name="aero/moment/Z_prop">
			<description>additional lift by prop </description>
			<product>
				<property>aero/tuning/prop-effects</property>
				<property>aero/qbar-psf</property>
				<property>metrics/Sw-sqft</property>
				<property>aero/function/kCLge</property>
				<value>-1</value>
				<table>
					<independentVar lookup="row">fcs/flap-pos-deg</independentVar>
					<independentVar lookup="column">aero/propeller-stream-factor</independentVar>
					<tableData>
						1	1.16	1.69
					0	0	0.0106	0.03
					30	0	0.0106	0.03
					</tableData>
			</table>
			</product>
		</function>

		<function name="aero/force/Z_mach">
			<description>forece Z due to mach</description>
			<product>
				<property>aero/qbar-psf</property>
				<property>metrics/Sw-sqft</property>
				<difference>
					<property>velocities/mach</property>
					<value>0.11</value>
				</difference>
				<value>-1</value>
				<table>
					<independentVar lookup="row">aero/alpha-deg</independentVar>
					<independentVar lookup="column">aero/beta-deg</independentVar>
					<independentVar lookup="table">fcs/flap-pos-deg</independentVar>
					<tableData breakPoint="0">
						-15	0	15
						-5	0.0771312	0.0125963	0.0771312
						-4	0.0023359	0.0251733	0.0023359
						-3	-0.0491882	0.0348047	-0.0491882
						-2	0.0388157	0.0443372	0.0388157
						-1	0.0353066	0.0540276	0.0353066
						0	0.0520313	0.0637476	0.0520313
						1	0.0497238	0.0735163	0.0497238
						2	0.0742602	0.0830593	0.0742602
						3	0.0620192	0.0929024	0.0620192
						4	0.0776439	0.1022292	0.0776439
						5	0.2038878	0.111248	0.2038878
						6	0.1401259	0.1211012	0.1401259
						7	0.1351332	0.1305645	0.1351332
						8	0.1326882	0.1395828	0.1326882
						9	0.140363	0.1495385	0.140363
						10	0.1449263	0.157871	0.1449263
						11	0.1555616	0.1675464	0.1555616
						12	0.1585838	0.1759566	0.1585838
						13	0.151409	0.0655349	0.151409
						14	0.1137854	0.0365585	0.1137854
						15	0.049493	0.0240903	0.049493
						16	0.040906	0.0133057	0.040906
						17	0.0193211	0.0115433	0.0193211
						18	0.0204917	0.0063464	0.0204917
						19	0.055843	0.0106041	0.055843
						20	-0.004158	0.0062954	-0.004158
					</tableData>
					<tableData breakPoint="30">
						-15	0	15
						-5	0.0719174	0.0719174	0.0719174
						-4	0.0836329	0.0836329	0.0836329
						-3	0.078844	0.078844	0.078844
						-2	0.0922384	0.0922384	0.0922384
						-1	0.1039337	0.1039337	0.1039337
						0	0.1231989	0.1231989	0.1231989
						1	0.1274762	0.1274762	0.1274762
						2	0.1383784	0.1383784	0.1383784
						3	0.0635628	0.0635628	0.0635628
						4	0.1523444	0.1523444	0.1523444
						5	0.16751	0.16751	0.16751
						6	0.1695839	0.1695839	0.1695839
						7	0.2192049	0.2192049	0.2192049
						8	0.1875589	0.1875589	0.1875589
						9	0.1455595	0.1455595	0.1455595
						10	0.1115665	0.1115665	0.1115665
						11	0.0761677	0.0761677	0.0761677
						12	0.082322	0.082322	0.082322
						13	0.088505	0.088505	0.088505
						14	0.0573773	0.0573773	0.0573773
						15	0.0582249	0.0582249	0.0582249
						16	0.0350524	0.0350524	0.0350524
						17	0.0379154	0.0379154	0.0379154
						18	0.0210111	0.0210111	0.0210111
						19	0.0238537	0.0238537	0.0238537
						20	0.007197	0.007197	0.007197
					</tableData>
				</table>
			</product>
		</function>

		<function name="aero/force/Z_elevator">
			<description>Lift due to Elevator Deflection</description>
			<product>
				<property>aero/qbar-psf</property>
				<property>metrics/Sw-sqft</property>
				<property>fcs/elevator-pos-rad</property>
				<value>0.85</value> <!-- tuning -->
				<value>1</value>
				<table>
					<independentVar lookup="row">aero/alpha-deg</independentVar>
					<independentVar lookup="column">aero/beta-deg</independentVar>
					<independentVar lookup="table">fcs/flap-pos-deg</independentVar>
					<tableData breakPoint="0">
						-15	0	15
						-5	-0.6993368	-0.6993368	-0.6993368
						-4	-0.7311968	-0.7311968	-0.7311968
						-3	-0.7319463	-0.7319463	-0.7319463
						-2	-0.7351943	-0.7351943	-0.7351943
						-1	-0.7359552	-0.7359552	-0.7359552
						0	-0.7379692	-0.7379692	-0.7379692
						1	-0.7392149	-0.7392149	-0.7392149
						2	-0.7392056	-0.7392056	-0.7392056
						3	-0.7393731	-0.7393731	-0.7393731
						4	-0.7392782	-0.7392782	-0.7392782
						5	-0.743064	-0.743064	-0.743064
						6	-0.73789	-0.73789	-0.73789
						7	-0.735822	-0.735822	-0.735822
						8	-0.7315733	-0.7315733	-0.7315733
						9	-0.7295896	-0.7295896	-0.7295896
						10	-0.7324257	-0.7324257	-0.7324257
						11	-0.7316806	-0.7316806	-0.7316806
						12	-0.7263961	-0.7263961	-0.7263961
						13	-0.6951303	-0.6951303	-0.6951303
						14	-0.6813243	-0.6813243	-0.6813243
						15	-0.673321	-0.673321	-0.673321
						16	-0.6691892	-0.6691892	-0.6691892
						17	-0.6675108	-0.6675108	-0.6675108
						18	-0.6589589	-0.6589589	-0.6589589
						19	-0.6531074	-0.6531074	-0.6531074
						20	-0.653356	-0.653356	-0.653356
					</tableData>
					<tableData breakPoint="30">
						-15	0	15
						-5	-0.7298954	-0.7298954	-0.7298954
						-4	-0.7637725	-0.7637725	-0.7637725
						-3	-0.7707379	-0.7707379	-0.7707379
						-2	-0.6897191	-0.6897191	-0.6897191
						-1	-0.7234063	-0.7234063	-0.7234063
						0	-0.7975035	-0.7975035	-0.7975035
						1	-0.7371457	-0.7371457	-0.7371457
						2	-0.7200408	-0.7200408	-0.7200408
						3	-0.8988086	-0.8988086	-0.8988086
						4	-0.701425	-0.701425	-0.701425
						5	-0.6939945	-0.6939945	-0.6939945
						6	-0.6828212	-0.6828212	-0.6828212
						7	-0.7209893	-0.7209893	-0.7209893
						8	-0.6933147	-0.6933147	-0.6933147
						9	-0.7263577	-0.7263577	-0.7263577
						10	-0.7149218	-0.7149218	-0.7149218
						11	-0.709989	-0.709989	-0.709989
						12	-0.7010957	-0.7010957	-0.7010957
						13	-0.6502522	-0.6502522	-0.6502522
						14	-0.6838112	-0.6838112	-0.6838112
						15	-0.6877816	-0.6877816	-0.6877816
						16	-0.6717895	-0.6717895	-0.6717895
						17	-0.6738496	-0.6738496	-0.6738496
						18	-0.6706021	-0.6706021	-0.6706021
						19	-0.6706403	-0.6706403	-0.6706403
						20	-0.6554134	-0.6554134	-0.6554134
					</tableData>
				</table>
			</product>
		</function>

	</axis>


	<!--<property>aero/force/testwindmill-enabled</property>-->

	<axis name="X">
		<function name="aero/force/X_base">
			<description>X base</description>
			<product>
				<property>aero/qbar-psf</property>
				<property>metrics/Sw-sqft</property>
				<value>-1</value>
				<table>
					<independentVar lookup="row">aero/alpha-deg</independentVar>
					<independentVar lookup="column">aero/beta-deg</independentVar>
					<independentVar lookup="table">fcs/flap-pos-deg</independentVar>
					<tableData breakPoint="0">
							-30	-15	0	15	30
						-15	-0.08776	-0.11852	-0.12676	-0.11852	-0.08776
						-10	0.02190	-0.00886	-0.01710	-0.00886	0.02190
						-5	0.08306	0.05230	0.04406	0.05230	0.08306
						0	0.09451	0.06375	0.05551	0.06375	0.09451
						5	0.05557	0.02481	0.01657	0.02481	0.05557
<!--						10	-0.03443	-0.06519	-0.07343	-0.06519	-0.03443
						15	-0.17622	-0.20698	-0.21522	-0.20698	-0.17622
						20	-0.33898	-0.36974	-0.37798	-0.36974	-0.33898
						25	-0.49850	-0.52926	-0.53750	-0.52926	-0.49850  step???-->
						10	-0.17	-0.1663097	-0.1617684	-0.1663097	-0.17
						12	-0.22	-0.2163751	-0.2080194	-0.2163751	-0.22
						14	-0.27	-0.2619922	-0.252467	-0.2619922	-0.27
						16	-0.3	-0.3063154	-0.2959751	-0.3063154	-0.3
						18	-0.35	-0.3498064	-0.3387105	-0.3498064	-0.35
						20	-0.4	-0.3917657	-0.3803265	-0.3917657	-0.4
						22	-0.44	-0.4338475	-0.4214749	-0.4338475	-0.44

					</tableData>
					<tableData breakPoint="30">
						-30	-15	0	15	30
						-15	0.01472	-0.01604	-0.02428	-0.01604	0.01472
						-10	0.11117	0.08041	0.07217	0.08041	0.11117
						-5	0.15650	0.12574	0.11750	0.12574	0.15650
						0	0.15983	0.12907	0.12083	0.12907	0.15983
						5	0.10355	0.07279	0.06455	0.07279	0.10355
<!--						10	-0.01383	-0.04459	-0.05283	-0.04459	-0.01383
						15	-0.16207	-0.19283	-0.20107	-0.19283	-0.16207
						20	-0.32083	-0.35159	-0.35983	-0.35159	-0.32083
						25	-0.47743	-0.50819	-0.51643	-0.50819	-0.47743  step????-->
						10	-0.18	-0.1716135	-0.1571757	-0.1716135	-0.18
						12	-0.24	-0.2260677	-0.2140672	-0.2260677	-0.24
						14	-0.29	-0.2824365	-0.2717867	-0.2824365	-0.29
						16	-0.35	-0.3398385	-0.329044	-0.3398385	-0.35
						18	-0.4	-0.3962884	-0.3851285	-0.3962884	-0.4
						20	-0.46	-0.4517735	-0.4401618	-0.4517735	-0.46
						22	-0.51	-0.5066904	-0.4936273	-0.5066904	-0.51
					</tableData>
				</table>
				<!--<table>
				<independentVar lookup="row">damage/left-wing-ripped-off</independentVar>
				<independentVar lookup="column">damage/right-wing-ripped-off</independentVar>
					<tableData>
					0	1
					0	1	0.6
					1	0.6	0.2
					</tableData>
				</table>-->
			</product>
		</function>

		<function name="aero/force/X_cowlflaps">
		<description>Drag due to cowl flaps</description>
			<product>
				<property>aero/qbar-psf</property>
				<property>metrics/Sw-sqft</property>
				<property>propulsion/engine[0]/cowl-flaps-norm</property>
				<value>-0.0015</value>
			</product>
		</function>

		<!--<function name="aero/force/X_gear">
			<description>Drag due to gear</description>
			<product>
				<property>aero/qbar-psf</property>
				<property>metrics/Sw-sqft</property>
				<table>
					<independentVar lookup="row">gear/gear-pos-norm</independentVar>
					<tableData>
					0	0
					0.1	2
					1	1
					</tableData>
				</table>
				<value>-0.011</value>
			</product>
		</function>-->

		<function name="aero/force/X_gear[0]">
			<description>Drag due to nose gear</description>
			<product>
				<property>aero/qbar-psf</property>
				<property>metrics/Sw-sqft</property>
				<sin>
					<toradians>
						<product>
							<property>gear/unit[0]/pos-norm</property>
							<value>90</value>
						</product>
					</toradians>
				</sin>
				<value>-0.00334</value>
			</product>
		</function>

		<function name="aero/force/X_gear[1]">
			<description>Drag due to left main gear</description>
			<product>
				<property>aero/qbar-psf</property>
				<property>metrics/Sw-sqft</property>
				<interpolate1d>
					<sin>
						<toradians>
							<product>
								<property>gear/unit[1]/pos-norm</property>
								<value>90</value>
							</product>
						</toradians>
					</sin>
					<v>0</v>	<v>0</v>
					<v>0.3</v>	<v>2</v>
					<v>1</v>	<v>1</v>
				</interpolate1d>
				<value>-0.00714</value>
			</product>
		</function>

		<function name="aero/force/X_gear[2]">
			<description>Drag due to right main gear</description>
			<product>
				<property>aero/qbar-psf</property>
				<property>metrics/Sw-sqft</property>
				<interpolate1d>
					<sin>
						<toradians>
							<product>
								<property>gear/unit[1]/pos-norm</property>
								<value>90</value>
							</product>
						</toradians>
					</sin>
					<v>0</v>	<v>0</v>
					<v>0.3</v>	<v>2</v>
					<v>1</v>	<v>1</v>
				</interpolate1d>
				<value>-0.00714</value>
			</product>
		</function>

		<function name="aero/force/X_pitch">
			<description>X due to pitch rate</description>
			<product>
				<property>aero/qbar-psf</property>
				<property>metrics/Sw-sqft</property>
				<property>velocities/p-aero-rad_sec</property>
				<value>-1</value>
				<table>
					<independentVar lookup="row">aero/alpha-deg</independentVar>
					<independentVar lookup="column">aero/beta-deg</independentVar>
					<independentVar lookup="table">fcs/flap-pos-deg</independentVar>
					<tableData breakPoint="0">
						-15	0	15
						-5	-0.0400411	-0.057396	-0.0400411
						-4	-0.1142279	-0.0496253	-0.1142279
						-3	-0.0640944	-0.0486486	-0.0640944
						-2	-0.0592274	-0.0468524	-0.0592274
						-1	-0.0597661	-0.0465522	-0.0597661
						0	-0.0403963	-0.0462696	-0.0403963
						1	-0.0594649	-0.045814	-0.0594649
						2	-0.0611885	-0.0458093	-0.0611885
						3	-0.0873453	-0.0457571	-0.0873453
						4	-0.0726847	-0.0460507	-0.0726847
						5	-0.085727	-0.0459042	-0.085727
						6	-0.0675335	-0.0458577	-0.0675335
						7	-0.0673362	-0.0452101	-0.0673362
						8	-0.0552243	-0.0454862	-0.0552243
						9	-0.0534368	-0.0459321	-0.0534368
						10	-0.0503023	-0.0451392	-0.0503023
						11	-0.0502694	-0.0452824	-0.0502694
						12	-0.0498263	-0.0135649	-0.0498263
						13	-0.0070478	0.0305705	-0.0070478
						14	0.0389997	0.0177755	0.0389997
						15	0.04	0.0123358	0.04
						16	0.0271883	0.0101829	0.0271883
						17	0.0087899	0.0058814	0.0087899
						18	0.006	0.0063136	0.006
						19	0.0077255	0.0070619	0.0077255
						20	0.0067101	0.0055942	0.0067101
					</tableData>
					<tableData breakPoint="30">
						-15	0	15
						-5	-0.044119	-0.044119	-0.044119
						-4	0.0453386	0.0453386	0.0453386
						-3	-0.0800887	-0.0800887	-0.0800887
						-2	-0.0648399	-0.0648399	-0.0648399
						-1	-0.0316303	-0.0316303	-0.0316303
						0	-0.0365022	-0.0365022	-0.0365022
						1	-0.043694	-0.043694	-0.043694
						2	-0.0437821	-0.0437821	-0.0437821
						3	-0.0301248	-0.0301248	-0.0301248
						4	-0.0517544	-0.0517544	-0.0517544
						5	-0.0217304	-0.0217304	-0.0217304
						6	-0.0767672	-0.0767672	-0.0767672
						7	-0.052927	-0.052927	-0.052927
						8	-0.0623061	-0.0623061	-0.0623061
						9	-0.0363554	-0.0363554	-0.0363554
						10	-0.0333584	-0.0333584	-0.0333584
						11	-0.0301048	-0.0301048	-0.0301048
						12	-0.0323208	-0.0323208	-0.0323208
						13	-0.0333421	-0.0333421	-0.0333421
						14	-0.0290019	-0.0290019	-0.0290019
						15	-0.0149768	-0.0149768	-0.0149768
						16	-0.0002539	-0.0002539	-0.0002539
						17	0.0027518	0.0027518	0.0027518
						18	0.007523	0.007523	0.007523
						19	0.0078748	0.0078748	0.0078748
						20	0.0068617	0.0068617	0.0068617
					</tableData>
				</table>
			</product>
		</function>

		<function name="aero/force/X_elevator">
			<description>X due to Elevator Deflection</description>
			<product>
				<property>aero/qbar-psf</property>
				<property>metrics/Sw-sqft</property>
				<abs><property>fcs/elevator-pos-rad</property></abs>
				<value>-1</value>
				<table>
					<independentVar lookup="row">aero/alpha-deg</independentVar>
					<independentVar lookup="column">aero/beta-deg</independentVar>
					<independentVar lookup="table">fcs/flap-pos-deg</independentVar>
					<tableData breakPoint="0">
						-15	0	15
						-5	-0.0205686	-0.0205686	-0.0205686
						-4	-0.017802	-0.017802	-0.017802
						-3	-0.012996	-0.012996	-0.012996
						-2	-0.0087109	-0.0087109	-0.0087109
						-1	-0.0040161	-0.0040161	-0.0040161
						0	0.000581	0.000581	0.000581
						1	0.0052632	0.0052632	0.0052632
						2	0.0099409	0.0099409	0.0099409
						3	0.0146747	0.0146747	0.0146747
						4	0.0196696	0.0196696	0.0196696
						5	0.0243814	0.0243814	0.0243814
						6	0.0290268	0.0290268	0.0290268
						7	0.0336938	0.0336938	0.0336938
						8	0.0382125	0.0382125	0.0382125
						9	0.0429309	0.0429309	0.0429309
						10	0.0478334	0.0478334	0.0478334
						11	0.0527597	0.0527597	0.0527597
						12	0.057218	0.057218	0.057218
						13	0.0571675	0.0571675	0.0571675
						14	0.0590504	0.0590504	0.0590504
						15	0.0617558	0.0617558	0.0617558
						16	0.0650385	0.0650385	0.0650385
						17	0.0683469	0.0683469	0.0683469
						18	0.0709957	0.0709957	0.0709957
						19	0.0741775	0.0741775	0.0741775
						20	0.0780672	0.0780672	0.0780672
					</tableData>
					<tableData breakPoint="30">
						-15	0	15
						-5	-0.0252542	-0.0252542	-0.0252542
						-4	-0.0042498	-0.0042498	-0.0042498
						-3	-0.0126436	-0.0126436	-0.0126436
						-2	-0.0146014	-0.0146014	-0.0146014
						-1	-0.0134372	-0.0134372	-0.0134372
						0	-0.0222597	-0.0222597	-0.0222597
						1	-0.0006074	-0.0006074	-0.0006074
						2	0.0050047	0.0050047	0.0050047
						3	-0.0062889	-0.0062889	-0.0062889
						4	0.0065393	0.0065393	0.0065393
						5	0.0243947	0.0243947	0.0243947
						6	0.0107747	0.0107747	0.0107747
						7	0.029121	0.029121	0.029121
						8	0.1098475	0.1098475	0.1098475
						9	0.0365418	0.0365418	0.0365418
						10	0.0404424	0.0404424	0.0404424
						11	0.0441616	0.0441616	0.0441616
						12	0.0478437	0.0478437	0.0478437
						13	0.0473322	0.0473322	0.0473322
						14	0.0543309	0.0543309	0.0543309
						15	0.0585019	0.0585019	0.0585019
						16	0.0605179	0.0605179	0.0605179
						17	0.0643863	0.0643863	0.0643863
						18	0.0677374	0.0677374	0.0677374
						19	0.0711621	0.0711621	0.0711621
						20	0.0730477	0.0730477	0.0730477
					</tableData>
				</table>
			</product>
		</function>

		<function name="aero/force/X_aileron">
			<description>Drag due to aileron Deflection</description>
			<product>
				<property>aero/qbar-psf</property>
				<property>metrics/Sw-sqft</property>
				<abs><property>fcs/aileron-pos-rad</property></abs>
				<value>-1</value>
				<table>
					<independentVar lookup="row">aero/alpha-deg</independentVar>
					<independentVar lookup="column">aero/beta-deg</independentVar>
					<independentVar lookup="table">fcs/flap-pos-deg</independentVar>
					<tableData breakPoint="0">
						-15	0	15
						-5	-0.0205686	-0.0205686	-0.0205686
						-4	-0.017802	-0.017802	-0.017802
						-3	-0.012996	-0.012996	-0.012996
						-2	-0.0087109	-0.0087109	-0.0087109
						-1	-0.0040161	-0.0040161	-0.0040161
						0	0.000581	0.000581	0.000581
						1	0.0052632	0.0052632	0.0052632
						2	0.0099409	0.0099409	0.0099409
						3	0.0146747	0.0146747	0.0146747
						4	0.0196696	0.0196696	0.0196696
						5	0.0243814	0.0243814	0.0243814
						6	0.0290268	0.0290268	0.0290268
						7	0.0336938	0.0336938	0.0336938
						8	0.0382125	0.0382125	0.0382125
						9	0.0429309	0.0429309	0.0429309
						10	0.0478334	0.0478334	0.0478334
						11	0.0527597	0.0527597	0.0527597
						12	0.057218	0.057218	0.057218
						13	0.0571675	0.0571675	0.0571675
						14	0.0590504	0.0590504	0.0590504
						15	0.0617558	0.0617558	0.0617558
						16	0.0650385	0.0650385	0.0650385
						17	0.0683469	0.0683469	0.0683469
						18	0.0709957	0.0709957	0.0709957
						19	0.0741775	0.0741775	0.0741775
						20	0.0780672	0.0780672	0.0780672
					</tableData>
					<tableData breakPoint="30">
						-15	0	15
						-5	-0.0252542	-0.0252542	-0.0252542
						-4	-0.0042498	-0.0042498	-0.0042498
						-3	-0.0126436	-0.0126436	-0.0126436
						-2	-0.0146014	-0.0146014	-0.0146014
						-1	-0.0134372	-0.0134372	-0.0134372
						0	-0.0222597	-0.0222597	-0.0222597
						1	-0.0006074	-0.0006074	-0.0006074
						2	0.0050047	0.0050047	0.0050047
						3	-0.0062889	-0.0062889	-0.0062889
						4	0.0065393	0.0065393	0.0065393
						5	0.0243947	0.0243947	0.0243947
						6	0.0107747	0.0107747	0.0107747
						7	0.029121	0.029121	0.029121
						8	0.1098475	0.1098475	0.1098475
						9	0.0365418	0.0365418	0.0365418
						10	0.0404424	0.0404424	0.0404424
						11	0.0441616	0.0441616	0.0441616
						12	0.0478437	0.0478437	0.0478437
						13	0.0473322	0.0473322	0.0473322
						14	0.0543309	0.0543309	0.0543309
						15	0.0585019	0.0585019	0.0585019
						16	0.0605179	0.0605179	0.0605179
						17	0.0643863	0.0643863	0.0643863
						18	0.0677374	0.0677374	0.0677374
						19	0.0711621	0.0711621	0.0711621
						20	0.0730477	0.0730477	0.0730477
					</tableData>
				</table>
			</product>
		</function>
		<function name="aero/force/X_rudder">
			<description>Drag due to rudder deflection</description>
			<product>
				<property>aero/qbar-psf</property>
				<property>metrics/Sw-sqft</property>
				<abs><property>fcs/rudder-pos-rad</property></abs>
				<value>-1</value>
				<table>
					<independentVar lookup="row">aero/alpha-deg</independentVar>
					<independentVar lookup="column">aero/beta-deg</independentVar>
					<independentVar lookup="table">fcs/flap-pos-deg</independentVar>
					<tableData breakPoint="0">
						-15	0	15
						-5	-0.0205686	-0.0205686	-0.0205686
						-4	-0.017802	-0.017802	-0.017802
						-3	-0.012996	-0.012996	-0.012996
						-2	-0.0087109	-0.0087109	-0.0087109
						-1	-0.0040161	-0.0040161	-0.0040161
						0	0.000581	0.000581	0.000581
						1	0.0052632	0.0052632	0.0052632
						2	0.0099409	0.0099409	0.0099409
						3	0.0146747	0.0146747	0.0146747
						4	0.0196696	0.0196696	0.0196696
						5	0.0243814	0.0243814	0.0243814
						6	0.0290268	0.0290268	0.0290268
						7	0.0336938	0.0336938	0.0336938
						8	0.0382125	0.0382125	0.0382125
						9	0.0429309	0.0429309	0.0429309
						10	0.0478334	0.0478334	0.0478334
						11	0.0527597	0.0527597	0.0527597
						12	0.057218	0.057218	0.057218
						13	0.0571675	0.0571675	0.0571675
						14	0.0590504	0.0590504	0.0590504
						15	0.0617558	0.0617558	0.0617558
						16	0.0650385	0.0650385	0.0650385
						17	0.0683469	0.0683469	0.0683469
						18	0.0709957	0.0709957	0.0709957
						19	0.0741775	0.0741775	0.0741775
						20	0.0780672	0.0780672	0.0780672
					</tableData>
					<tableData breakPoint="30">
						-15	0	15
						-5	-0.0252542	-0.0252542	-0.0252542
						-4	-0.0042498	-0.0042498	-0.0042498
						-3	-0.0126436	-0.0126436	-0.0126436
						-2	-0.0146014	-0.0146014	-0.0146014
						-1	-0.0134372	-0.0134372	-0.0134372
						0	-0.0222597	-0.0222597	-0.0222597
						1	-0.0006074	-0.0006074	-0.0006074
						2	0.0050047	0.0050047	0.0050047
						3	-0.0062889	-0.0062889	-0.0062889
						4	0.0065393	0.0065393	0.0065393
						5	0.0243947	0.0243947	0.0243947
						6	0.0107747	0.0107747	0.0107747
						7	0.029121	0.029121	0.029121
						8	0.1098475	0.1098475	0.1098475
						9	0.0365418	0.0365418	0.0365418
						10	0.0404424	0.0404424	0.0404424
						11	0.0441616	0.0441616	0.0441616
						12	0.0478437	0.0478437	0.0478437
						13	0.0473322	0.0473322	0.0473322
						14	0.0543309	0.0543309	0.0543309
						15	0.0585019	0.0585019	0.0585019
						16	0.0605179	0.0605179	0.0605179
						17	0.0643863	0.0643863	0.0643863
						18	0.0677374	0.0677374	0.0677374
						19	0.0711621	0.0711621	0.0711621
						20	0.0730477	0.0730477	0.0730477
					</tableData>
				</table>
			<!--	<table>
				<independentVar lookup="row">fcs/flap-pos-deg</independentVar>
					<tableData>
					0	0.0006787
					30	0.0027478
					</tableData>
				</table>	-->
			</product>
		</function>

		<function name="aero/force/testwindmill">	<!--	delete when prop Correct 	-->
			<description>X due to windmilling propeller</description>
			<product>
				<property>aero/qbar-psf</property>
				<property>metrics/Sw-sqft</property>
				<table>
					<independentVar>propulsion/engine/propeller-rpm</independentVar>
					<tableData>
						0	1
						100	0
					</tableData>
				</table>
				<value>-0.011</value>
				<!--<property>aero/force/testwindmill-enabled</property>-->
			</product>
		</function>
	</axis>

	<axis name="Y">
		<function name="aero/force/Y_base">
			<description>Y-base</description>
			<product>
				<property>aero/qbar-psf</property>
				<property>metrics/Sw-sqft</property>
				<table>
					<independentVar lookup="row">aero/alpha-deg</independentVar>
					<independentVar lookup="column">aero/beta-deg</independentVar>
					<independentVar lookup="table">fcs/flap-pos-deg</independentVar>
					<tableData breakPoint="0">
						-30	-15	0	15	30
						-15	0.12734	0.06626	-0.00001	-0.06624	-0.12750
						-10	0.12388	0.06611	0.00000	-0.06600	-0.12396
						-5	0.12436	0.06626	0.00000	-0.06647	-0.12460
						0	0.12286	0.06722	0.00000	-0.06813	-0.12303
						5	0.12023	0.06775	0.00003	-0.06777	-0.11875
						10	0.11672	0.06612	0.00001	-0.06600	-0.11680
						15	0.11743	0.06619	0.00002	-0.06619	-0.11740
						20	0.11672	0.06580	0.00003	-0.06577	-0.11669
						25	0.10847	0.05790	0.00002	-0.05796	-0.10863
					</tableData>
					<tableData breakPoint="30">
							-30	-15	0	15	30
						-15	0.1369	0.0691	0.0000	-0.0708	-0.1368
						-10	0.1344	0.0716	-0.0001	-0.0697	-0.1346
						-5	0.1205	0.0717	0.0001	-0.0705	-0.1190
						0	0.1344	0.0762	-0.0001	-0.0752	-0.1365
						5	0.1438	0.0748	0.0001	-0.0751	-0.1436
						10	0.1346	0.0743	0.0000	-0.0743	-0.1345
						15	0.1332	0.0752	0.0000	-0.0752	-0.1332
						20	0.1274	0.0736	0.0000	-0.0736	-0.1274
						25	0.1226	0.0654	0.0001	-0.0653	-0.1226

					</tableData>
				</table>
			</product>
		</function>

		<function name="aero/moment/Y_prop">
			<description>additional side force by prop </description>
			<product>
				<property>aero/tuning/prop-effects</property>
				<property>aero/qbar-psf</property>
				<property>metrics/Sw-sqft</property>
				<value>1</value>
				<table>
					<independentVar lookup="row">fcs/flap-pos-deg</independentVar>
					<independentVar lookup="column">aero/propeller-stream-factor</independentVar>
					<tableData>
						1	1.16	1.69
					0	0	0.0095	0.016
					30	0	0.0095	0.016
					</tableData>
			</table>
			</product>
		</function>-->

		<function name="aero/force/Y_roll">
			<description>side force due to roll rate</description>
			<product>
				<property>aero/qbar-psf</property>
				<property>metrics/Sw-sqft</property>
				<value>1</value>
				<property>velocities/p-aero-rad_sec</property>
				<table>
					<independentVar lookup="row">aero/alpha-deg</independentVar>
					<independentVar lookup="column">aero/beta-deg</independentVar>
					<independentVar lookup="table">fcs/flap-pos-deg</independentVar>
					<tableData breakPoint="0">
						-15	0	15
						-5	-0.0859326	0.1116571	-0.0859326
						-4	-0.2196982	0.0846952	-0.2196982
						-3	0.039049	0.0799438	0.039049
						-2	0.1300414	0.0715291	0.1300414
						-1	0.0286799	0.0769403	0.0286799
						0	0.0330449	0.0873748	0.0330449
						1	0.1425391	0.0827565	0.1425391
						2	0.2251735	0.0924413	0.2251735
						3	0.1456104	0.1029228	0.1456104
						4	0.0120531	0.1116287	0.0120531
						5	0.0577614	0.1200501	0.0577614
						6	0.0739103	0.1110628	0.0739103
						7	0.0986004	0.0923511	0.0986004
						8	0.1225611	0.1599359	0.1225611
						9	0.1284185	0.1582589	0.1284185
						10	0.1266659	0.1384581	0.1266659
						11	0.1160511	0.1690329	0.1160511
						12	0.1014737	0.1121215	0.1014737
						13	0.0987302	0.109772	0.0987302
						14	0.1019026	0.0906756	0.1019026
						15	0.1063303	0.0690964	0.1063303
						16	0.1141373	0.0549043	0.1141373
						17	0.1109477	0.042322	0.1109477
						18	0.08	0.0318218	0.08
						19	0.0315104	0.0260113	0.0315104
						20	0.0626018	0.0281423	0.0626018
					</tableData>
					<tableData breakPoint="30">
						-15	0	15
						-5	0.1075092	0.1075092	0.1075092
						-4	0.1188146	0.1188146	0.1188146
						-3	0.1641481	0.1641481	0.1641481
						-2	0.1460719	0.1460719	0.1460719
						-1	0.0973962	0.0973962	0.0973962
						0	0.0597477	0.0597477	0.0597477
						1	0.1019035	0.1019035	0.1019035
						2	0.1460945	0.1460945	0.1460945
						3	0.152045	0.152045	0.152045
						4	0.1545869	0.1545869	0.1545869
						5	0.2209209	0.2209209	0.2209209
						6	0.2363435	0.2363435	0.2363435
						7	0.2340135	0.2340135	0.2340135
						8	0.2221603	0.2221603	0.2221603
						9	0.2344062	0.2344062	0.2344062
						10	0.2481002	0.2481002	0.2481002
						11	0.2601693	0.2601693	0.2601693
						12	0.2617073	0.2617073	0.2617073
						13	0.2446283	0.2446283	0.2446283
						14	0.2212953	0.2212953	0.2212953
						15	0.2114177	0.2114177	0.2114177
						16	0.1953973	0.1953973	0.1953973
						17	0.162941	0.162941	0.162941
						18	0.1494783	0.1494783	0.1494783
						19	0.135646	0.135646	0.135646
						20	0.1192039	0.1192039	0.1192039
					</tableData>
				</table>
			</product>
		</function>


		<function name="aero/force/side_yaw">
			<description>side force due to yaw rate</description>
			<product>
				<property>aero/qbar-psf</property>
				<property>metrics/Sw-sqft</property>
				<property>velocities/r-aero-rad_sec</property>
				<value>1</value>
				<table>
					<independentVar lookup="row">aero/alpha-deg</independentVar>
					<independentVar lookup="column">aero/beta-deg</independentVar>
					<independentVar lookup="table">fcs/flap-pos-deg</independentVar>
					<tableData breakPoint="0">
						-15	0	15
						-5	-0.174399	-0.174399	-0.174399
						-4	-0.1813139	-0.1813139	-0.1813139
						-3	-0.1653486	-0.1653486	-0.1653486
						-2	-0.1687405	-0.1687405	-0.1687405
						-1	-0.1678187	-0.1678187	-0.1678187
						0	-0.166381	-0.166381	-0.166381
						1	-0.1645252	-0.1645252	-0.1645252
						2	-0.1621031	-0.1621031	-0.1621031
						3	-0.1598323	-0.1598323	-0.1598323
						4	-0.1569629	-0.1569629	-0.1569629
						5	-0.1517598	-0.1517598	-0.1517598
						6	-0.1525614	-0.1525614	-0.1525614
						7	-0.1495989	-0.1495989	-0.1495989
						8	-0.1471581	-0.1471581	-0.1471581
						9	-0.1412109	-0.1412109	-0.1412109
						10	-0.1411934	-0.1411934	-0.1411934
						11	-0.1429891	-0.1429891	-0.1429891
						12	-0.1372631	-0.1372631	-0.1372631
						13	-0.1363452	-0.1363452	-0.1363452
						14	-0.1321226	-0.1321226	-0.1321226
						15	-0.1305465	-0.1305465	-0.1305465
						16	-0.1270795	-0.1270795	-0.1270795
						17	-0.1209804	-0.1209804	-0.1209804
						18	-0.1208866	-0.1208866	-0.1208866
						19	-0.1195238	-0.1195238	-0.1195238
						20	-0.1149355	-0.1149355	-0.1149355
					</tableData>
					<tableData breakPoint="30">
						-15	0	15
						-5	-0.1786361	-0.1786361	-0.1786361
						-4	-0.1716133	-0.1716133	-0.1716133
						-3	-0.1747701	-0.1747701	-0.1747701
						-2	-0.1775913	-0.1775913	-0.1775913
						-1	-0.1630263	-0.1630263	-0.1630263
						0	-0.1657048	-0.1657048	-0.1657048
						1	-0.1789759	-0.1789759	-0.1789759
						2	-0.1536917	-0.1536917	-0.1536917
						3	-0.194939	-0.194939	-0.194939
						4	-0.145549	-0.145549	-0.145549
						5	-0.1635836	-0.1635836	-0.1635836
						6	-0.1566156	-0.1566156	-0.1566156
						7	-0.1379734	-0.1379734	-0.1379734
						8	-0.1583098	-0.1583098	-0.1583098
						9	-0.1444696	-0.1444696	-0.1444696
						10	-0.1394541	-0.1394541	-0.1394541
						11	-0.1394329	-0.1394329	-0.1394329
						12	-0.133542	-0.133542	-0.133542
						13	-0.1320772	-0.1320772	-0.1320772
						14	-0.1293796	-0.1293796	-0.1293796
						15	-0.1242108	-0.1242108	-0.1242108
						16	-0.1529027	-0.1529027	-0.1529027
						17	-0.1186102	-0.1186102	-0.1186102
						18	-0.1143133	-0.1143133	-0.1143133
						19	-0.1132462	-0.1132462	-0.1132462
						20	-0.1091993	-0.1091993	-0.1091993
					</tableData>
				</table>
			</product>
		</function>

		<function name="aero/force/Side_rudder">
			<description>Side force due to rudder deflection</description>
			<product>
				<property>aero/qbar-psf</property>
				<property>metrics/Sw-sqft</property>
				<property>fcs/rudder-pos-rad</property>
				<value>0.85</value> <!-- tuning -->
				<value>-1</value>
				<table>
					<independentVar lookup="row">aero/alpha-deg</independentVar>
					<independentVar lookup="column">aero/beta-deg</independentVar>
					<independentVar lookup="table">fcs/flap-pos-deg</independentVar>
					<tableData breakPoint="0">
						-15	0	15
						-5	-0.174399	-0.174399	-0.174399
						-4	-0.1813139	-0.1813139	-0.1813139
						-3	-0.1653486	-0.1653486	-0.1653486
						-2	-0.1687405	-0.1687405	-0.1687405
						-1	-0.1678187	-0.1678187	-0.1678187
						0	-0.166381	-0.166381	-0.166381
						1	-0.1645252	-0.1645252	-0.1645252
						2	-0.1621031	-0.1621031	-0.1621031
						3	-0.1598323	-0.1598323	-0.1598323
						4	-0.1569629	-0.1569629	-0.1569629
						5	-0.1517598	-0.1517598	-0.1517598
						6	-0.1525614	-0.1525614	-0.1525614
						7	-0.1495989	-0.1495989	-0.1495989
						8	-0.1471581	-0.1471581	-0.1471581
						9	-0.1412109	-0.1412109	-0.1412109
						10	-0.1411934	-0.1411934	-0.1411934
						11	-0.1429891	-0.1429891	-0.1429891
						12	-0.1372631	-0.1372631	-0.1372631
						13	-0.1363452	-0.1363452	-0.1363452
						14	-0.1321226	-0.1321226	-0.1321226
						15	-0.1305465	-0.1305465	-0.1305465
						16	-0.1270795	-0.1270795	-0.1270795
						17	-0.1209804	-0.1209804	-0.1209804
						18	-0.1208866	-0.1208866	-0.1208866
						19	-0.1195238	-0.1195238	-0.1195238
						20	-0.1149355	-0.1149355	-0.1149355
					</tableData>
					<tableData breakPoint="30">
						-15	0	15
						-5	-0.1786361	-0.1786361	-0.1786361
						-4	-0.1716133	-0.1716133	-0.1716133
						-3	-0.1747701	-0.1747701	-0.1747701
						-2	-0.1775913	-0.1775913	-0.1775913
						-1	-0.1630263	-0.1630263	-0.1630263
						0	-0.1657048	-0.1657048	-0.1657048
						1	-0.1789759	-0.1789759	-0.1789759
						2	-0.1536917	-0.1536917	-0.1536917
						3	-0.194939	-0.194939	-0.194939
						4	-0.145549	-0.145549	-0.145549
						5	-0.1635836	-0.1635836	-0.1635836
						6	-0.1566156	-0.1566156	-0.1566156
						7	-0.1379734	-0.1379734	-0.1379734
						8	-0.1583098	-0.1583098	-0.1583098
						9	-0.1444696	-0.1444696	-0.1444696
						10	-0.1394541	-0.1394541	-0.1394541
						11	-0.1394329	-0.1394329	-0.1394329
						12	-0.133542	-0.133542	-0.133542
						13	-0.1320772	-0.1320772	-0.1320772
						14	-0.1293796	-0.1293796	-0.1293796
						15	-0.1242108	-0.1242108	-0.1242108
						16	-0.1529027	-0.1529027	-0.1529027
						17	-0.1186102	-0.1186102	-0.1186102
						18	-0.1143133	-0.1143133	-0.1143133
						19	-0.1132462	-0.1132462	-0.1132462
						20	-0.1091993	-0.1091993	-0.1091993
					</tableData>
				</table>
			</product>
		</function>
	</axis>

	<axis name="ROLL">
		<function name="aero/moment/Roll_base">
			<description>Roll base</description>
			<product>
				<property>aero/qbar-psf</property>
				<property>metrics/Sw-sqft</property>
				<property>metrics/bw-ft</property>
				<value>-1</value>
				<table>
					<independentVar lookup="row">aero/alpha-deg</independentVar>
					<independentVar lookup="column">aero/beta-deg</independentVar>
					<independentVar lookup="table">fcs/flap-pos-deg</independentVar>
					<tableData breakPoint="0">
							-30	-15	0	15	30
						-15	-0.00295	-0.00119	0.00000	0.00120	0.00290
						-10	-0.00987	-0.00459	0.00000	0.00462	0.00982
						-5	-0.01552	-0.00788	0.00000	0.00784	0.01554
						0	-0.02273	-0.01123	0.00000	0.01105	0.02287
						5	-0.02937	-0.01474	0.00001	0.01470	0.02969
						10	-0.03440	-0.01820	0.00000	0.01821	0.03445
						15	-0.03957	-0.01553	0.00001	0.01555	0.03970
						20	-0.03695	-0.01393	0.00002	0.01399	0.03708
						25	-0.03388	-0.01233	0.00002	0.01228	0.03397
					</tableData>
					<tableData breakPoint="30">
							-30	-15	0	15	30
						-15	0.0009	0.0036	0.0000	-0.0035	-0.0009
						-10	-0.0060	0.0011	0.0000	-0.0011	0.0059
						-5	-0.0125	-0.0018	0.0000	0.0018	0.0128
						0	-0.0196	-0.0037	0.0000	0.0037	0.0193
						5	-0.0238	-0.0077	0.0001	0.0077	0.0237
						10	-0.0300	-0.0106	0.0000	0.0106	0.0300
						15	-0.0314	-0.0120	0.0000	0.0120	0.0315
						20	-0.0324	-0.0117	0.0000	0.0118	0.0325
						25	-0.0328	-0.0113	0.0000	0.0115	0.0329
					</tableData>
				</table>
			</product>
		</function>

	<function name="aero/moment/roll_prop">
			<description>additional roll moment by prop </description>
			<product>
				<property>aero/tuning/prop-effects</property>
				<property>aero/qbar-psf</property>
				<property>metrics/Sw-sqft</property>
				<property>metrics/bw-ft</property>
				<value>-1</value>
				<value>0.45</value>
				<table>
					<independentVar lookup="row">fcs/flap-pos-deg</independentVar>
					<independentVar lookup="column">aero/propeller-stream-factor</independentVar>
					<tableData>
						1	1.16	1.69
					0	0	0.00148	0.0031
					30	0	0.00148	0.0031
					</tableData>
			</table>
			</product>
		</function>

		<function name="aero/moment/Roll_damp">
			<description>Roll moment due to rollrate</description>
			<product>
				<property>aero/qbar-psf</property>
				<property>metrics/Sw-sqft</property>
				<property>metrics/bw-ft</property>
				<property>aero/bi2vel</property>
				<property>velocities/p-aero-rad_sec</property>
				<value>-1</value>
				<table>
					<independentVar lookup="row">aero/alpha-deg</independentVar>
					<independentVar lookup="column">aero/beta-deg</independentVar>
					<independentVar lookup="table">fcs/flap-pos-deg</independentVar>
					<tableData breakPoint="0">
						-15	0	15
						-5	0.4431081	0.4992559	0.4431081
						-4	0.466211	0.4994535	0.466211
						-3	0.4703968	0.5005716	0.4703968
						-2	0.4841407	0.5018952	0.4841407
						-1	0.4624065	0.5038113	0.4624065
						0	0.479181	0.5058224	0.479181
						1	0.5035438	0.5069283	0.5035438
						2	0.4956169	0.5088569	0.4956169
						3	0.5030808	0.5109116	0.5030808
						4	0.4981242	0.5127393	0.4981242
						5	0.4809649	0.5144362	0.4809649
						6	0.4838891	0.5157386	0.4838891
						7	0.4896984	0.5167147	0.4896984
						8	0.4960808	0.5199581	0.4960808
						9	0.498125	0.5215671	0.498125
						10	0.4942369	0.520246	0.4942369
						11	0.4892016	0.5178363	0.4892016
						12	0.4830031	0.4742968	0.4830031
						13	0.4390472	0.3887126	0.4390472
						14	0.3883623	0.3015417	0.3883623
						15	0.3395704	0.2384072	0.3395704
						16	0.267706	0.1884105	0.267706
						17	0.2068109	0.1532377	0.2068109
						18	0.17	0.1203289	0.17
						19	0.1217988	0.0947188	0.1217988
						20	0.0984821	0.0694905	0.0984821
					</tableData>
					<tableData breakPoint="30">
						-15	0	15
						-5	0.4862532	0.4901224	0.4654755
						-4	0.4758717	0.4818394	0.4763636
						-3	0.4835519	0.4910472	0.4798517
						-2	0.4619938	0.4966577	0.4853528
						-1	0.495702	0.4958706	0.4758828
						0	0.4891363	0.4864685	0.4650256
						1	0.4882236	0.5005308	0.475426
						2	0.4797988	0.506145	0.4815635
						3	0.4714011	0.5075241	0.4893838
						4	0.4289866	0.5063611	0.523901
						5	0.5109395	0.5271295	0.6550885
						6	0.5569811	0.5303429	0.488948
						7	0.517636	0.5300034	0.5031267
						8	0.4947619	0.5201493	0.5074737
						9	0.5033946	0.4968979	0.48719
						10	0.4986653	0.4526795	0.4906908
						11	0.4677621	0.4302635	0.4691964
						12	0.4409812	0.4126448	0.4258261
						13	0.4260439	0.4019422	0.4025133
						14	0.3896713	0.393146	0.3914196
						15	0.3821058	0.3714933	0.3739135
						16	0.3698656	0.3428204	0.3601948
						17	0.3509961	0.3035755	0.3400033
						18	0.3192701	0.2671673	0.3191244
						19	0.2832653	0.2364331	0.2877225
						20	0.2593313	0.2015241	0.2525561
					</tableData>
				</table>
			</product>
		</function>

		<function name="aero/moment/Roll_yaw">
			<description>Roll moment due to yaw rate</description>
			<product>
				<property>aero/qbar-psf</property>
				<property>metrics/Sw-sqft</property>
				<property>metrics/bw-ft</property>
				<property>aero/bi2vel</property>
				<property>velocities/r-aero-rad_sec</property>
				<value>-1</value>
				<table>
					<independentVar lookup="row">aero/alpha-deg</independentVar>
					<independentVar lookup="column">aero/beta-deg</independentVar>
					<independentVar lookup="table">fcs/flap-pos-deg</independentVar>
					<tableData breakPoint="0">
						-15	0	15
						-5	-0.0982055	-0.0865975	-0.0982055
						-4	-0.1025879	-0.0980032	-0.1025879
						-3	-0.1071277	-0.1085125	-0.1071277
						-2	-0.1177871	-0.1182881	-0.1177871
						-1	-0.1165563	-0.128165	-0.1165563
						0	-0.1362989	-0.138072	-0.1362989
						1	-0.1385844	-0.149338	-0.1385844
						2	-0.1569394	-0.1599743	-0.1569394
						3	-0.1579989	-0.1704428	-0.1579989
						4	-0.1752452	-0.1807949	-0.1752452
						5	-0.1913054	-0.1908048	-0.1913054
						6	-0.208214	-0.2013893	-0.208214
						7	-0.2087891	-0.2110452	-0.2087891
						8	-0.2129474	-0.2206614	-0.2129474
						9	-0.2219393	-0.2307815	-0.2219393
						10	-0.2311565	-0.2416881	-0.2311565
						11	-0.2410666	-0.2507669	-0.2410666
						12	-0.2576078	-0.2635215	-0.2576078
						13	-0.2705773	-0.3119826	-0.2705773
						14	-0.2944807	-0.3492156	-0.2944807
						15	-0.3247055	-0.3757891	-0.3247055
						16	-0.3578078	-0.3945362	-0.3578078
						17	-0.3818113	-0.4128225	-0.3818113
						18	-0.384201	-0.4287872	-0.384201
						19	-0.4110365	-0.441031	-0.4110365
						20	-0.4199696	-0.4525059	-0.4199696
					</tableData>
					<tableData breakPoint="30">
						-15	0	15
						-5	-0.1262688	-0.1358728	-0.1809237
						-4	-0.1397341	-0.1499338	-0.1955838
						-3	-0.14601	-0.1532077	-0.1547644
						-2	-0.1850875	-0.1613724	-0.1699862
						-1	-0.1774172	-0.1999153	-0.1642284
						0	-0.1963211	-0.1889663	-0.1939764
						1	-0.2023196	-0.1991982	-0.1996615
						2	-0.2234627	-0.2080331	-0.2023327
						3	-0.2342489	-0.2207216	-0.1926397
						4	-0.2671106	-0.2312981	-0.1833446
						5	-0.2751079	-0.2415075	-0.2051003
						6	-0.2449288	-0.2452928	-0.2547515
						7	-0.2367108	-0.2553402	-0.2569474
						8	-0.2643736	-0.2646456	-0.2682811
						9	-0.2834335	-0.2764424	-0.2869588
						10	-0.298042	-0.2973622	-0.2838067
						11	-0.3034506	-0.3181344	-0.3037128
						12	-0.322577	-0.3292488	-0.326927
						13	-0.3247885	-0.3352032	-0.3479342
						14	-0.3630179	-0.3474497	-0.347017
						15	-0.3822663	-0.3656637	-0.3569848
						16	-0.3944072	-0.391384	-0.3644529
						17	-0.3693679	-0.4101387	-0.3830295
						18	-0.3987843	-0.4302173	-0.3975539
						19	-0.4139677	-0.455451	-0.4182707
						20	-0.4383659	-0.4729851	-0.4354692
					</tableData>
				</table>
			</product>
		</function>

		<function name="aero/moment/Roll_aileron">
			<description>Roll moment due to aileron</description>
			<product>
				<property>aero/qbar-psf</property>
				<property>metrics/Sw-sqft</property>
				<property>metrics/bw-ft</property>
				<value>0.6</value> <!-- interim -->
				<value>1</value>
				<sum>
				<table>
					<independentVar lookup="row">fcs/aileron-pos-norm</independentVar>
					<independentVar lookup="column">aero/Re</independentVar>
					<tableData>
						2357931	2952345	3543172	4723931
					-1.33	-0.07773	-0.07952	-0.06608	-0.07804
					0	0.00000	0.00000	0.00000	0.00000
					0.25	0.01873	0.01875	0.01885	0.01830
					0.75	0.05525	0.05744	0.05911	0.06846
					1	0.07350	0.07678	0.07924	0.09354
					</tableData>
				</table>
				<table>
					<independentVar lookup="row">fcs/aileron-pos-norm</independentVar>
					<independentVar lookup="column">aero/Re</independentVar>
					<tableData>
						2357931	2952345	3543172	4723931
					-1	-0.07350	-0.07678	-0.07924	-0.09354
					-0.75	-0.05525	-0.05744	-0.05911	-0.06846
					-0.25	-0.01873	-0.01875	-0.01885	-0.01830
					0	-0.00000	-0.00000	-0.00000	-0.00000
					1.33	0.07773	0.07952	0.06608	0.07804
					</tableData>
				</table>
				</sum>
			</product>
		</function>

		<function name="aero/moment/Roll_rudder">
			<description>Roll moment due to rudder</description>
			<product>
				<property>aero/qbar-psf</property>
				<property>metrics/Sw-sqft</property>
				<property>metrics/bw-ft</property>
				<property>fcs/rudder-pos-rad</property>
				<value>0.85</value> <!-- tuning -->
				<value>-1</value>
				<table>
					<independentVar lookup="row">aero/beta-rad</independentVar>
					<tableData>
						-0.5	1
						-0.26	0.8
						-0.209	1
						0	1
						0.209	1
						0.26	0.8
						0.5	1
					</tableData>
				</table>
				<table>
					<independentVar lookup="row">aero/alpha-deg</independentVar>
					<independentVar lookup="column">aero/beta-deg</independentVar>
					<independentVar lookup="table">fcs/flap-pos-deg</independentVar>
					<tableData breakPoint="0">
						-15	0	15
						-5	-0.001037	-0.001037	-0.001037
						-4	-0.0013251	-0.0013251	-0.0013251
						-3	-0.0010679	-0.0010679	-0.0010679
						-2	-0.0013253	-0.0013253	-0.0013253
						-1	-0.0014298	-0.0014298	-0.0014298
						0	-0.0015371	-0.0015371	-0.0015371
						1	-0.0015527	-0.0015527	-0.0015527
						2	-0.0016408	-0.0016408	-0.0016408
						3	-0.0016972	-0.0016972	-0.0016972
						4	-0.0017498	-0.0017498	-0.0017498
						5	-0.0018289	-0.0018289	-0.0018289
						6	-0.0018255	-0.0018255	-0.0018255
						7	-0.0018911	-0.0018911	-0.0018911
						8	-0.0019074	-0.0019074	-0.0019074
						9	-0.0017585	-0.0017585	-0.0017585
						10	-0.0019691	-0.0019691	-0.0019691
						11	-0.0022643	-0.0022643	-0.0022643
						12	-0.002056	-0.002056	-0.002056
						13	-0.002396	-0.002396	-0.002396
						14	-0.0022866	-0.0022866	-0.0022866
						15	-0.0025435	-0.0025435	-0.0025435
						16	-0.0025236	-0.0025236	-0.0025236
						17	-0.002248	-0.002248	-0.002248
						18	-0.0025317	-0.0025317	-0.0025317
						19	-0.0026851	-0.0026851	-0.0026851
						20	-0.0024892	-0.0024892	-0.0024892
					</tableData>
					<tableData breakPoint="30">
						-15	0	15
						-5	0.2801692	0.2801692	0.2801692
						-4	0.2785926	0.2785926	0.2785926
						-3	0.2827231	0.2827231	0.2827231
						-2	0.2825386	0.2825386	0.2825386
						-1	0.279169	0.279169	0.279169
						0	0.2787138	0.2787138	0.2787138
						1	0.2800961	0.2800961	0.2800961
						2	0.2755748	0.2755748	0.2755748
						3	0.2809209	0.2809209	0.2809209
						4	0.2741098	0.2741098	0.2741098
						5	0.2733185	0.2733185	0.2733185
						6	0.2737167	0.2737167	0.2737167
						7	0.2740981	0.2740981	0.2740981
						8	0.2717876	0.2717876	0.2717876
						9	0.2661434	0.2661434	0.2661434
						10	0.2530306	0.2530306	0.2530306
						11	0.232726	0.232726	0.232726
						12	0.2322007	0.2322007	0.2322007
						13	0.2290177	0.2290177	0.2290177
						14	0.2301444	0.2301444	0.2301444
						15	0.2194125	0.2194125	0.2194125
						16	0.172639	0.172639	0.172639
						17	0.1669639	0.1669639	0.1669639
						18	0.1266656	0.1266656	0.1266656
						19	0.115672	0.115672	0.115672
						20	0.076759	0.076759	0.076759
					</tableData>
				</table>
			</product>
		</function>

		<function name="aero/moment/Roll_asym_elev">
			<description>Roll moment due to asymmetric elevator</description>
			<product>
				<property>aero/qbar-psf</property>
				<property>metrics/Sw-sqft</property>
				<property>metrics/bw-ft</property>
				<value>0.00036</value>
			</product>
		</function>
	</axis>

	<axis name="PITCH">
		<function name="aero/moment/Pitch_base">
			<description>Pitch base</description>
			<product>
				<property>aero/qbar-psf</property>
				<property>metrics/Sw-sqft</property>
				<property>metrics/cbarw-ft</property>
				<table>
					<independentVar lookup="row">aero/alpha-deg</independentVar>
					<independentVar lookup="column">fcs/flap-pos-deg</independentVar>
					<tableData>
								0	30
						-15		0.31778	0.4275
						-10		0.22972	0.3401
						-5		0.13642	0.3078
						0		0.04202	0.1641
						5		-0.05764	0.0783
						10		-0.16228	-0.0347
						15		-0.27987	-0.1749
						20		-0.41906	-0.3291
						25		-0.56023	-0.4793

					</tableData>

<!--
					<independentVar lookup="row">aero/alpha-deg</independentVar>
					<independentVar lookup="column">aero/beta-deg</independentVar>
					<independentVar lookup="table">fcs/flap-pos-deg</independentVar>


<tableData breakPoint="0">
							-15	0	15
						-15	0.08268	0.31778	0.08056
						-10	0.02054	0.22972	0.02070
						-5	-0.05646	0.13642	-0.05131
						0	-0.15229	0.04202	-0.15732
						5	-0.27526	-0.05764	-0.27958
						10	-0.38292	-0.16228	-0.38543
						15	-0.49436	-0.27987	-0.49717
						20	-0.61852	-0.41906	-0.62238
						25	-0.78305	-0.56023	-0.77671
					</tableData>
					<tableData breakPoint="30">
								-15	0	15
						-15	0.2259	0.4275	0.2154
						-10	0.1188	0.3401	0.1063
						-5	0.0465	0.3078	0.1092
						0	-0.1750	0.1641	-0.1625
						5	-0.3114	0.0783	-0.3148
						10	-0.4007	-0.0347	-0.4026
						15	-0.5031	-0.1749	-0.5049
						20	-0.6134	-0.3291	-0.6146
						25	-0.7402	-0.4793	-0.7440
					</tableData>
-->

				</table>
			</product>
		</function>

		<function name="aero/moment/pitch_prop">
			<description>additional pitch moment by prop </description>
			<product>
				<property>aero/tuning/prop-effects</property>
				<property>aero/qbar-psf</property>
				<property>metrics/Sw-sqft</property>
				<property>metrics/cbarw-ft</property>
				<value>1</value>
				<table>
					<independentVar lookup="row">fcs/flap-pos-deg</independentVar>
					<independentVar lookup="column">aero/propeller-stream-factor</independentVar>
					<tableData>
						1	1.16	1.69
					0	0	0.00349	0.0216
					30	0	0.00349	0.0216
					</tableData>
			</table>
			</product>
		</function>

		<function name="aero/moment/pitchdamp_prop">
			<description>additional pitch damping moment by prop </description>
			<product>
				<property>aero/tuning/prop-effects</property>
				<property>aero/qbar-psf</property>
				<property>metrics/Sw-sqft</property>
				<property>metrics/cbarw-ft</property>
				<property>aero/ci2vel</property>
				<property>velocities/q-aero-rad_sec</property>
				<value>1</value>
				<table>
					<independentVar lookup="row">fcs/flap-pos-deg</independentVar>
					<independentVar lookup="column">aero/propeller-stream-factor</independentVar>
					<tableData>
						0	1.16	1.69
					0	0	0.559	2.1
					30	0	0.559	2.1
					</tableData>
			</table>
			</product>
		</function>


		<!--<function name="aero/moment/Pitch_gear">
			<description>Pitch moment gear</description>
			<product>
				<property>aero/qbar-psf</property>
				<property>metrics/Sw-sqft</property>
				<property>metrics/cbarw-ft</property>
				<property>gear/gear-pos-norm</property>
				<value>-0.011</value>
			</product>
		</function>-->

		<function name="aero/moment/Pitch_gear[0]">
			<description>Pitch moment due to nose gear</description>
			<product>
				<property>aero/qbar-psf</property>
				<property>metrics/Sw-sqft</property>
				<property>metrics/cbarw-ft</property>
				<property>gear/unit[0]/pos-norm</property>
				<value>-0.00443</value>
			</product>
		</function>

		<function name="aero/moment/Pitch_gear[1]">
			<description>Pitch moment due to left main gear</description>
			<product>
				<property>aero/qbar-psf</property>
				<property>metrics/Sw-sqft</property>
				<property>metrics/cbarw-ft</property>
				<property>gear/unit[1]/pos-norm</property>
				<value>-0.00724</value>
			</product>
		</function>

		<function name="aero/moment/Pitch_gear[2]">
			<description>Pitch moment due to right main gear</description>
			<product>
				<property>aero/qbar-psf</property>
				<property>metrics/Sw-sqft</property>
				<property>metrics/cbarw-ft</property>
				<property>gear/unit[2]/pos-norm</property>
				<value>-0.00724</value>
			</product>
		</function>

		<function name="aero/moment/Pitch_elevator">
			<description>Pitch moment due to elevator</description>
			<product>
				<property>aero/qbar-psf</property>
				<property>metrics/Sw-sqft</property>
				<property>metrics/cbarw-ft</property>
				<property>fcs/elevator-pos-rad</property>
				<value>0.85</value> <!-- tuning -->
				<value>0.95</value>
				<value>-1</value>
				<table>
					<independentVar lookup="row">aero/alpha-deg</independentVar>
					<independentVar lookup="column">aero/beta-deg</independentVar>
					<independentVar lookup="table">fcs/flap-pos-deg</independentVar>
					<tableData breakPoint="0">
						-15	0	15
						-5	1.9114819	1.9114819	1.9114819
						-4	1.9981587	1.9981587	1.9981587
						-3	1.999747	1.999747	1.999747
						-2	2.0048523	2.0048523	2.0048523
						-1	2.0043598	2.0043598	2.0043598
						0	2.0065327	2.0065327	2.0065327
						1	2.0071957	2.0071957	2.0071957
						2	2.0048615	2.0048615	2.0048615
						3	2.0028785	2.0028785	2.0028785
						4	1.9997104	1.9997104	1.9997104
						5	2.0040637	2.0040637	2.0040637
						6	1.9916036	1.9916036	1.9916036
						7	1.9848516	1.9848516	1.9848516
						8	1.9688956	1.9688956	1.9688956
						9	1.9645449	1.9645449	1.9645449
						10	1.9634845	1.9634845	1.9634845
						11	1.9608991	1.9608991	1.9608991
						12	1.9439796	1.9439796	1.9439796
						13	1.9353431	1.9353431	1.9353431
						14	1.9253881	1.9253881	1.9253881
						15	1.9100316	1.9100316	1.9100316
						16	1.9003738	1.9003738	1.9003738
						17	1.8914782	1.8914782	1.8914782
						18	1.8714515	1.8714515	1.8714515
						19	1.8518922	1.8518922	1.8518922
						20	1.8515875	1.8515875	1.8515875
					</tableData>
					<tableData breakPoint="30">
						-15	0	15
						-5	1.9939997	1.9939997	1.9939997
						-4	2.0760531	2.0760531	2.0760531
						-3	2.1192336	2.1192336	2.1192336
						-2	1.8835764	1.8835764	1.8835764
						-1	1.9954784	1.9954784	1.9954784
						0	2.1963298	2.1963298	2.1963298
						1	2.0003622	2.0003622	2.0003622
						2	1.9588627	1.9588627	1.9588627
						3	2.4321904	2.4321904	2.4321904
						4	1.922223	1.922223	1.922223
						5	1.871809	1.871809	1.871809
						6	1.9157935	1.9157935	1.9157935
						7	1.9036268	1.9036268	1.9036268
						8	1.8485116	1.8485116	1.8485116
						9	1.9645883	1.9645883	1.9645883
						10	1.9652364	1.9652364	1.9652364
						11	1.9625269	1.9625269	1.9625269
						12	1.9504006	1.9504006	1.9504006
						13	1.7859263	1.7859263	1.7859263
						14	1.9087754	1.9087754	1.9087754
						15	1.9180262	1.9180262	1.9180262
						16	1.8882122	1.8882122	1.8882122
						17	1.8889059	1.8889059	1.8889059
						18	1.8789003	1.8789003	1.8789003
						19	1.8734298	1.8734298	1.8734298
						20	1.8410799	1.8410799	1.8410799
					</tableData>
				</table>
				<table>
					<independentVar lookup="row">aero/beta-rad</independentVar>
					<tableData>
					-3.14	-1
					-1.57	0
					-0.5	1
					0	1
					0.5	1
					1.57	0
					3.14	-1
					</tableData>
				</table>
			</product>
		</function>

		<function name="aero/moment/pitch_elev_prop">
			<description>additional elevator moment by prop </description>
			<product>
				<property>aero/tuning/prop-effects</property>
				<property>aero/qbar-psf</property>
				<property>metrics/Sw-sqft</property>
				<property>metrics/cbarw-ft</property>
				<property>fcs/elevator-pos-rad</property>
				<value>-1</value>
				<table>
					<independentVar lookup="row">fcs/flap-pos-deg</independentVar>
					<independentVar lookup="column">aero/propeller-stream-factor</independentVar>
					<tableData>
						1	1.16	1.69
					0	0	0.1	0.15
					30	0	0.1	0.15
					</tableData>
			</table>
			</product>
		</function>

		<function name="aero/moment/Pitch_damp">
			<description>Pitch moment due to pitch rate</description>
			<product>
				<property>aero/qbar-psf</property>
				<property>metrics/Sw-sqft</property>
				<property>metrics/cbarw-ft</property>
				<property>aero/ci2vel</property>
				<property>velocities/q-aero-rad_sec</property>
				<table>
					<independentVar lookup="row">aero/alpha-deg</independentVar>
					<independentVar lookup="column">aero/beta-deg</independentVar>
					<independentVar lookup="table">fcs/flap-pos-deg</independentVar>
					<tableData breakPoint="0">
						-15	0	15
						-5	-15.3385669	-15.3385669	-15.3385669
						-4	-16.8855207	-16.8855207	-16.8855207
						-3	-17.1267708	-17.1267708	-17.1267708
						-2	-17.220758	-17.220758	-17.220758
						-1	-17.2725208	-17.2725208	-17.2725208
						0	-17.2838807	-17.2838807	-17.2838807
						1	-17.344712	-17.344712	-17.344712
						2	-17.3898554	-17.3898554	-17.3898554
						3	-17.5742682	-17.5742682	-17.5742682
						4	-17.6287752	-17.6287752	-17.6287752
						5	-17.5599774	-17.5599774	-17.5599774
						6	-17.6426729	-17.6426729	-17.6426729
						7	-17.6927509	-17.6927509	-17.6927509
						8	-17.7052813	-17.7052813	-17.7052813
						9	-17.7855336	-17.7855336	-17.7855336
						10	-17.8047792	-17.8047792	-17.8047792
						11	-17.9304794	-17.9304794	-17.9304794
						12	-18.0074419	-18.0074419	-18.0074419
						13	-18.1730868	-18.1730868	-18.1730868
						14	-18.2332697	-18.2332697	-18.2332697
						15	-18.3766231	-18.3766231	-18.3766231
						16	-18.5197106	-18.5197106	-18.5197106
						17	-18.4482214	-18.4482214	-18.4482214
						18	-18.4153884	-18.4153884	-18.4153884
						19	-18.5231218	-18.5231218	-18.5231218
						20	-18.5300929	-18.5300929	-18.5300929
					</tableData>
					<tableData breakPoint="30">
						-15	0	15
						-5	-14.5863126	-14.5863126	-14.5863126
						-4	-22.1859724	-22.1859724	-22.1859724
						-3	-28.1330961	-28.1330961	-28.1330961
						-2	-22.477277	-22.477277	-22.477277
						-1	-16.4621421	-16.4621421	-16.4621421
						0	-15.8541255	-15.8541255	-15.8541255
						1	-9.4948566	-9.4948566	-9.4948566
						2	-15.0668544	-15.0668544	-15.0668544
						3	-11.1550116	-11.1550116	-11.1550116
						4	-13.696186	-13.696186	-13.696186
						5	-17.4717427	-17.4717427	-17.4717427
						6	-17.5670991	-17.5670991	-17.5670991
						7	-25.0909722	-25.0909722	-25.0909722
						8	-18.3931107	-18.3931107	-18.3931107
						9	-18.4723045	-18.4723045	-18.4723045
						10	-18.4406269	-18.4406269	-18.4406269
						11	-18.2341057	-18.2341057	-18.2341057
						12	-18.338066	-18.338066	-18.338066
						13	-18.8065313	-18.8065313	-18.8065313
						14	-19.2936489	-19.2936489	-19.2936489
						15	-19.2750852	-19.2750852	-19.2750852
						16	-18.8892223	-18.8892223	-18.8892223
						17	-18.9200322	-18.9200322	-18.9200322
						18	-19.2078771	-19.2078771	-19.2078771
						19	-19.1656768	-19.1656768	-19.1656768
						20	-19.0112839	-19.0112839	-19.0112839
					</tableData>
				</table>
			</product>
		</function>

		<function name="aero/moment/Pitch_alphadot">
			<description>Pitch moment due to alpha rate</description>
			<product>
				<property>aero/qbar-psf</property>
				<property>metrics/Sw-sqft</property>
				<property>metrics/cbarw-ft</property>
				<property>aero/ci2vel</property>
				<property>aero/alphadot-rad_sec</property>
				<value>-7</value>
			</product>
		</function>

		<function name="aero/moment/pitch_yaw">
			<description>pitch moment due to yaw rate</description>
			<product>
				<property>aero/qbar-psf</property>
				<property>metrics/Sw-sqft</property>
				<property>metrics/cbarw-ft</property>
				<property>aero/ci2vel</property>
				<property>velocities/r-aero-rad_sec</property>
				<table>
					<independentVar lookup="row">aero/alpha-deg</independentVar>
					<independentVar lookup="column">aero/beta-deg</independentVar>
					<independentVar lookup="table">fcs/flap-pos-deg</independentVar>
					<tableData breakPoint="0">
						-15	0	15
						-5	0.0820343	0.0820343	0.0820343
						-4	-0.1100255	-0.1100255	-0.1100255
						-3	-0.0777208	-0.0777208	-0.0777208
						-2	-0.0626225	-0.0626225	-0.0626225
						-1	-0.0670891	-0.0670891	-0.0670891
						0	-0.1013617	-0.1013617	-0.1013617
						1	-0.1181495	-0.1181495	-0.1181495
						2	-0.0791276	-0.0791276	-0.0791276
						3	-0.0595113	-0.0595113	-0.0595113
						4	-0.0779355	-0.0779355	-0.0779355
						5	-0.0501246	-0.0501246	-0.0501246
						6	0.2654495	0.2654495	0.2654495
						7	-0.0701891	-0.0701891	-0.0701891
						8	-0.1588291	-0.1588291	-0.1588291
						9	-0.1449715	-0.1449715	-0.1449715
						10	-0.1102169	-0.1102169	-0.1102169
						11	-0.0661087	-0.0661087	-0.0661087
						12	-0.0715526	-0.0715526	-0.0715526
						13	-0.0820329	-0.0820329	-0.0820329
						14	-0.0949803	-0.0949803	-0.0949803
						15	-0.1132574	-0.1132574	-0.1132574
						16	-0.1005522	-0.1005522	-0.1005522
						17	-0.0673372	-0.0673372	-0.0673372
						18	-0.0737405	-0.0737405	-0.0737405
						19	0.2670781	0.2670781	0.2670781
						20	0.1312372	0.1312372	0.1312372
					</tableData>
					<tableData breakPoint="30">
						-15	0	15
						-5	-0.2424877	-0.2424877	-0.2424877
						-4	-0.6259804	-0.6259804	-0.6259804
						-3	-1.5254833	-1.5254833	-1.5254833
						-2	-1.7176756	-1.7176756	-1.7176756
						-1	1.6052834	1.6052834	1.6052834
						0	0.129713	0.129713	0.129713
						1	0.1770586	0.1770586	0.1770586
						2	0.0631651	0.0631651	0.0631651
						3	0.8185949	0.8185949	0.8185949
						4	0.4709313	0.4709313	0.4709313
						5	0.0991103	0.0991103	0.0991103
						6	-0.1474329	-0.1474329	-0.1474329
						7	-1.1286657	-1.1286657	-1.1286657
						8	-0.29338	-0.29338	-0.29338
						9	-0.2701196	-0.2701196	-0.2701196
						10	-0.0890657	-0.0890657	-0.0890657
						11	-0.207269	-0.207269	-0.207269
						12	-0.1196511	-0.1196511	-0.1196511
						13	-0.1275553	-0.1275553	-0.1275553
						14	-0.1215115	-0.1215115	-0.1215115
						15	-0.1567293	-0.1567293	-0.1567293
						16	-0.1104523	-0.1104523	-0.1104523
						17	-0.0216615	-0.0216615	-0.0216615
						18	-0.0500458	-0.0500458	-0.0500458
						19	0.0611963	0.0611963	0.0611963
						20	0.0920706	0.0920706	0.0920706
					</tableData>
				</table>
			</product>
		</function>

		<function name="aero/moment/Pitch_mach">
			<description>Pitch moment due to mach</description>
			<product>
				<property>aero/qbar-psf</property>
				<property>metrics/Sw-sqft</property>
				<property>metrics/cbarw-ft</property>
				<difference>
					<property>velocities/mach</property>
					<value>0.11</value>
				</difference>
				<table>
					<independentVar lookup="row">aero/alpha-deg</independentVar>
					<independentVar lookup="column">aero/beta-deg</independentVar>
					<independentVar lookup="table">fcs/flap-pos-deg</independentVar>
					<tableData breakPoint="0">
						-15	0	15
						-5	0.0374493	0.0374493	0.0374493
						-4	0.0321587	0.0321587	0.0321587
						-3	0.032885	0.032885	0.032885
						-2	0.0335418	0.0335418	0.0335418
						-1	0.0339663	0.0339663	0.0339663
						0	0.0342137	0.0342137	0.0342137
						1	0.0343703	0.0343703	0.0343703
						2	0.0345669	0.0345669	0.0345669
						3	0.0345557	0.0345557	0.0345557
						4	0.035169	0.035169	0.035169
						5	0.0354678	0.0354678	0.0354678
						6	0.0347304	0.0347304	0.0347304
						7	0.0344562	0.0344562	0.0344562
						8	0.0342391	0.0342391	0.0342391
						9	0.0330129	0.0330129	0.0330129
						10	0.0335734	0.0335734	0.0335734
						11	0.0327532	0.0327532	0.0327532
						12	0.0320191	0.0320191	0.0320191
						13	0.0249825	0.0249825	0.0249825
						14	0.0226037	0.0226037	0.0226037
						15	0.0185215	0.0185215	0.0185215
						16	0.01603	0.01603	0.01603
						17	0.0191553	0.0191553	0.0191553
						18	0.0108411	0.0108411	0.0108411
						19	0.0007691	0.0007691	0.0007691
						20	-0.002319	-0.002319	-0.002319
					</tableData>
					<tableData breakPoint="30">
						-15	0	15
						-5	0.0488619	0.0488619	0.0488619
						-4	0.0421115	0.0421115	0.0421115
						-3	0.0803855	0.0803855	0.0803855
						-2	0.0693375	0.0693375	0.0693375
						-1	0.061603	0.061603	0.061603
						0	0.0420033	0.0420033	0.0420033
						1	0.0521489	0.0521489	0.0521489
						2	0.0469466	0.0469466	0.0469466
						3	0.2840112	0.2840112	0.2840112
						4	0.0628395	0.0628395	0.0628395
						5	0.040779	0.040779	0.040779
						6	0.0601596	0.0601596	0.0601596
						7	-0.0479282	-0.0479282	-0.0479282
						8	0.0499783	0.0499783	0.0499783
						9	0.0631365	0.0631365	0.0631365
						10	0.0623843	0.0623843	0.0623843
						11	0.062549	0.062549	0.062549
						12	0.0601966	0.0601966	0.0601966
						13	0.031385	0.031385	0.031385
						14	0.0565844	0.0565844	0.0565844
						15	0.0539542	0.0539542	0.0539542
						16	0.0492754	0.0492754	0.0492754
						17	0.0501623	0.0501623	0.0501623
						18	0.0432883	0.0432883	0.0432883
						19	0.0390646	0.0390646	0.0390646
						20	0.0385645	0.0385645	0.0385645
					</tableData>
				</table>
			</product>
		</function>

		<function name="aero/moment/Pitch_slotflap">
			<description>Pitch moment due to slotflaps</description>
			<product>
				<property>aero/tuning/pitch-slotflaps</property>
				<property>aero/qbar-psf</property>
				<property>metrics/Sw-sqft</property>
				<property>metrics/cbarw-ft</property>
				<property>fcs/flap-pos-deg</property>
				<value>-0.001</value>
			</product>
		</function>
	</axis>


	<axis name="YAW">
		<function name="aero/moment/Yaw_roll_rate">
			<description>Yaw moment due to roll rate</description>
			<product>
				<property>aero/qbar-psf</property>
				<property>metrics/Sw-sqft</property>
				<property>metrics/bw-ft</property>
				<property>aero/bi2vel</property>
				<property>velocities/p-aero-rad_sec</property>
				<value>-1</value>
				<table>
					<independentVar lookup="row">aero/alpha-deg</independentVar>
					<independentVar lookup="column">aero/beta-deg</independentVar>
					<independentVar lookup="table">fcs/flap-pos-deg</independentVar>
					<tableData breakPoint="0">
						-15	0	15
						-5	0.0286676	0.0286676	0.0286676
						-4	0.02458	0.02458	0.02458
						-3	0.0323209	0.0323209	0.0323209
						-2	0.0404593	0.0404593	0.0404593
						-1	0.0530653	0.0530653	0.0530653
						0	0.0675517	0.0675517	0.0675517
						1	0.0768022	0.0768022	0.0768022
						2	0.0912522	0.0912522	0.0912522
						3	0.1059804	0.1059804	0.1059804
						4	0.1200087	0.1200087	0.1200087
						5	0.1338913	0.1338913	0.1338913
						6	0.140701	0.140701	0.140701
						7	0.1419016	0.1419016	0.1419016
						8	0.1829177	0.1829177	0.1829177
						9	0.1927242	0.1927242	0.1927242
						10	0.1953513	0.1953513	0.1953513
						11	0.2210546	0.2210546	0.2210546
						12	0.2088141	0.2088141	0.2088141
						13	0.206746	0.206746	0.206746
						14	0.1951727	0.1951727	0.1951727
						15	0.1882907	0.1882907	0.1882907
						16	0.1823622	0.1823622	0.1823622
						17	0.1777533	0.1777533	0.1777533
						18	0.1704396	0.1704396	0.1704396
						19	0.162976	0.162976	0.162976
						20	0.159268	0.159268	0.159268
					</tableData>
					<tableData breakPoint="30">
						-15	0	15
						-5	0.0363321	0.0363321	0.0363321
						-4	0.0466207	0.0466207	0.0466207
						-3	0.0829772	0.0829772	0.0829772
						-2	0.0869043	0.0869043	0.0869043
						-1	0.0768148	0.0768148	0.0768148
						0	0.0700936	0.0700936	0.0700936
						1	0.0961652	0.0961652	0.0961652
						2	0.1241656	0.1241656	0.1241656
						3	0.1364202	0.1364202	0.1364202
						4	0.1500836	0.1500836	0.1500836
						5	0.1869022	0.1869022	0.1869022
						6	0.1962349	0.1962349	0.1962349
						7	0.211526	0.211526	0.211526
						8	0.2142743	0.2142743	0.2142743
						9	0.2272859	0.2272859	0.2272859
						10	0.2352222	0.2352222	0.2352222
						11	0.2439557	0.2439557	0.2439557
						12	0.2522595	0.2522595	0.2522595
						13	0.2559029	0.2559029	0.2559029
						14	0.2566089	0.2566089	0.2566089
						15	0.2622201	0.2622201	0.2622201
						16	0.265016	0.265016	0.265016
						17	0.257952	0.257952	0.257952
						18	0.2541546	0.2541546	0.2541546
						19	0.2496654	0.2496654	0.2496654
						20	0.2425066	0.2425066	0.2425066
					</tableData>
				</table>
			</product>
		</function>


		<function name="aero/moment/Yaw_base">
			<description>Yaw base</description>
			<product>
				<property>aero/qbar-psf</property>
				<property>metrics/Sw-sqft</property>
				<property>metrics/bw-ft</property>
				<value>-1.32</value>
				<table>
					<independentVar lookup="row">aero/alpha-deg</independentVar>
					<independentVar lookup="column">aero/beta-deg</independentVar>
					<independentVar lookup="table">fcs/flap-pos-deg</independentVar>
					<tableData breakPoint="0">
						-90	-30	-15	0	15	30	90
						-15	0.96	0.0297	0.01326	0	-0.01321	-0.02985	-0.96
						-10	0.96	0.0276	0.01261	0	-0.01254	-0.02769	-0.96
						-5	0.96	0.02663	0.01258	0	-0.01271	-0.02682	-0.96
						0	0.96	0.02649	0.01312	0	-0.01346	-0.02671	-0.96
						5	0.96	0.02591	0.01403	0	-0.01411	-0.02548	-0.96
						10	0.96	0.0263	0.01431	0	-0.01429	-0.02638	-0.96
						15	0.96	0.02811	0.01583	-1E-05	-0.01585	-0.02814	-0.96
						20	0.96	0.03	0.01726	0	-0.01721	-0.02996	-0.96
						25	0.96	0.03054	0.01739	2E-05	-0.01761	-0.03059	-0.96
					</tableData>
					<tableData breakPoint="30">
							-90	-30	-15	0	15	30	90
						-15	0.96	0.028	0.0103	0	-0.0115	-0.0279	-0.96
						-10	0.96	0.0269	0.0119	0	-0.0118	-0.0271	-0.96
						-5	0.96	0.0236	0.0105	0	-0.0118	-0.0226	-0.96
						0	0.96	0.0286	0.0157	0	-0.0149	-0.0301	-0.96
						5	0.96	0.0349	0.0167	0	-0.0169	-0.0352	-0.96
						10	0.96	0.0329	0.0181	0	-0.0182	-0.033	-0.96
						15	0.96	0.0355	0.0197	0	-0.0197	-0.0355	-0.96
						20	0.96	0.0356	0.0208	0	-0.0208	-0.0357	-0.96
						25	0.96	0.0372	0.0205	0	-0.0205	-0.0371	-0.96
					</tableData>
				</table>
			</product>
		</function>
		<function name="aero/moment/yaw_prop">
			<description>additional yaw moment by prop </description>
			<product>
				<property>aero/tuning/prop-effects</property>
				<property>aero/qbar-psf</property>
				<property>metrics/Sw-sqft</property>
				<property>metrics/bw-ft</property>
				<value>-1</value>
				<table>
					<independentVar lookup="row">fcs/flap-pos-deg</independentVar>
					<independentVar lookup="column">aero/propeller-stream-factor</independentVar>
					<tableData>
						1	1.16	1.69
					0	0	0.0037	0.00614
					30	0	0.0037	0.00614
					</tableData>
			</table>
			</product>
		</function>


		<function name="aero/moment/Yaw_damp">
			<description>Yaw moment due to yaw rate</description>
			<product>
				<property>aero/qbar-psf</property>
				<property>metrics/Sw-sqft</property>
				<property>metrics/bw-ft</property>
				<property>aero/bi2vel</property>
				<property>velocities/r-aero-rad_sec</property>
				<value>-1</value>
				<table>
					<independentVar lookup="row">aero/alpha-deg</independentVar>
					<independentVar lookup="column">aero/beta-deg</independentVar>
					<independentVar lookup="table">fcs/flap-pos-deg</independentVar>
					<tableData breakPoint="0">
						-15	0	15
						-5	0.1315	0.1315	0.1315
						-4	0.1023747	0.1023747	0.1023747
						-3	0.0990338	0.0990338	0.0990338
						-2	0.1026573	0.1026573	0.1026573
						-1	0.1060645	0.1060645	0.1060645
						0	0.1084131	0.1084131	0.1084131
						1	0.1028778	0.1028778	0.1028778
						2	0.1003143	0.1003143	0.1003143
						3	0.0993778	0.0993778	0.0993778
						4	0.0990417	0.0990417	0.0990417
						5	0.1010835	0.1010835	0.1010835
						6	0.0993122	0.0993122	0.0993122
						7	0.1011703	0.1011703	0.1011703
						8	0.1026673	0.1026673	0.1026673
						9	0.1026685	0.1026685	0.1026685
						10	0.0985589	0.0985589	0.0985589
						11	0.1064817	0.1064817	0.1064817
						12	0.1021276	0.1021276	0.1021276
						13	0.10534	0.10534	0.10534
						14	0.1182083	0.1182083	0.1182083
						15	0.107785	0.107785	0.107785
						16	0.1011432	0.1011432	0.1011432
						17	0.0961896	0.0961896	0.0961896
						18	0.0831137	0.0831137	0.0831137
						19	0.0879403	0.0879403	0.0879403
						20	0.0929206	0.0929206	0.0929206
					</tableData>
					<tableData breakPoint="30">
						-15	0	15
						-5	0.1170354	0.1170354	0.1170354
						-4	0.1112411	0.1112411	0.1112411
						-3	0.1094751	0.1094751	0.1094751
						-2	0.1292063	0.1292063	0.1292063
						-1	0.0572965	0.0572965	0.0572965
						0	0.0845874	0.0845874	0.0845874
						1	0.0933402	0.0933402	0.0933402
						2	0.098768	0.098768	0.098768
						3	0.0959276	0.0959276	0.0959276
						4	0.1076565	0.1076565	0.1076565
						5	0.1127186	0.1127186	0.1127186
						6	0.1144727	0.1144727	0.1144727
						7	0.1107062	0.1107062	0.1107062
						8	0.119399	0.119399	0.119399
						9	0.1354547	0.1354547	0.1354547
						10	0.1331765	0.1331765	0.1331765
						11	0.1347261	0.1347261	0.1347261
						12	0.1247607	0.1247607	0.1247607
						13	0.124714	0.124714	0.124714
						14	0.1314564	0.1314564	0.1314564
						15	0.1239226	0.1239226	0.1239226
						16	0.1211769	0.1211769	0.1211769
						17	0.1108419	0.1108419	0.1108419
						18	0.1022162	0.1022162	0.1022162
						19	0.0972894	0.0972894	0.0972894
						20	0.0960523	0.0960523	0.0960523
					</tableData>
				</table>
			</product>
		</function>

		<function name="aero/moment/Yaw_damp_prop">
			<description>Yaw moment due to yaw rate prop </description>
			<product>
				<property>aero/tuning/prop-effects</property>
				<property>aero/qbar-psf</property>
				<property>metrics/Sw-sqft</property>
				<property>metrics/bw-ft</property>
				<property>aero/bi2vel</property>
				<property>velocities/r-aero-rad_sec</property>
				<value>-1</value>
				<table>
					<independentVar lookup="row">fcs/flap-pos-deg</independentVar>
					<independentVar lookup="column">aero/propeller-stream-factor</independentVar>
					<tableData>
						1	1.16	1.69
					0	0	0.0095	0.0096
					30	0	0.0095	0.0096
					</tableData>
			</table>
			</product>
		</function>

		<function name="aero/moment/Yaw_rudder">
			<description>Yaw moment due to rudder</description>
			<product>
				<property>aero/qbar-psf</property>
				<property>metrics/Sw-sqft</property>
				<property>metrics/bw-ft</property>
				<property>fcs/rudder-pos-rad</property>
				<value>0.85</value> <!-- tuning -->
				<table>
					<independentVar lookup="row">aero/beta-rad</independentVar>
					<tableData>
						-3.14	-1
						-1.57	0
						-0.5	1
						-0.26	0.8
						-0.209	1
						0	1
						0.209	1
						0.26	0.8
						0.5	1
						1.57	0
						3.14	-1
					</tableData>
				</table>
				<table>
					<independentVar lookup="row">aero/alpha-deg</independentVar>
					<independentVar lookup="column">aero/beta-deg</independentVar>
					<independentVar lookup="table">fcs/flap-pos-deg</independentVar>
					<tableData breakPoint="0">
						-15	0	15
						-5	-0.0772623	-0.0772623	-0.0772623
						-4	-0.0796573	-0.0796573	-0.0796573
						-3	-0.0725016	-0.0725016	-0.0725016
						-2	-0.0740003	-0.0740003	-0.0740003
						-1	-0.0736658	-0.0736658	-0.0736658
						0	-0.0730835	-0.0730835	-0.0730835
						1	-0.0723179	-0.0723179	-0.0723179
						2	-0.0712771	-0.0712771	-0.0712771
						3	-0.070358	-0.070358	-0.070358
						4	-0.0691877	-0.0691877	-0.0691877
						5	-0.0670885	-0.0670885	-0.0670885
						6	-0.0672787	-0.0672787	-0.0672787
						7	-0.0660777	-0.0660777	-0.0660777
						8	-0.0649108	-0.0649108	-0.0649108
						9	-0.0625979	-0.0625979	-0.0625979
						10	-0.0626782	-0.0626782	-0.0626782
						11	-0.0631752	-0.0631752	-0.0631752
						12	-0.0609049	-0.0609049	-0.0609049
						13	-0.0604497	-0.0604497	-0.0604497
						14	-0.0586831	-0.0586831	-0.0586831
						15	-0.0578844	-0.0578844	-0.0578844
						16	-0.056526	-0.056526	-0.056526
						17	-0.0536524	-0.0536524	-0.0536524
						18	-0.0537854	-0.0537854	-0.0537854
						19	-0.0533102	-0.0533102	-0.0533102
						20	-0.0512989	-0.0512989	-0.0512989
					</tableData>
					<tableData breakPoint="30">
						-15	0	15
						-5	-0.0782914	-0.0782914	-0.0782914
						-4	-0.0754538	-0.0754538	-0.0754538
						-3	-0.0766383	-0.0766383	-0.0766383
						-2	-0.0787308	-0.0787308	-0.0787308
						-1	-0.0727796	-0.0727796	-0.0727796
						0	-0.0733528	-0.0733528	-0.0733528
						1	-0.0783226	-0.0783226	-0.0783226
						2	-0.0678349	-0.0678349	-0.0678349
						3	-0.0845725	-0.0845725	-0.0845725
						4	-0.0641949	-0.0641949	-0.0641949
						5	-0.0716548	-0.0716548	-0.0716548
						6	-0.0688691	-0.0688691	-0.0688691
						7	-0.060964	-0.060964	-0.060964
						8	-0.0695901	-0.0695901	-0.0695901
						9	-0.0638735	-0.0638735	-0.0638735
						10	-0.0617973	-0.0617973	-0.0617973
						11	-0.0613589	-0.0613589	-0.0613589
						12	-0.0590079	-0.0590079	-0.0590079
						13	-0.058306	-0.058306	-0.058306
						14	-0.0573878	-0.0573878	-0.0573878
						15	-0.0549642	-0.0549642	-0.0549642
						16	-0.0667368	-0.0667368	-0.0667368
						17	-0.0525198	-0.0525198	-0.0525198
						18	-0.0505268	-0.0505268	-0.0505268
						19	-0.0504109	-0.0504109	-0.0504109
						20	-0.0485106	-0.0485106	-0.0485106
					</tableData>
				</table>
			</product>
		</function>

		<function name="aero/moment/yaw_rudder_prop">
			<description>additional rudder moment by prop </description>
			<product>
				<property>aero/tuning/prop-effects</property>
				<property>aero/qbar-psf</property>
				<property>metrics/Sw-sqft</property>
				<property>metrics/bw-ft</property>
				<property>metrics/bw-ft</property>
				<property>fcs/rudder-pos-rad</property>

				<value>-1</value>
				<table>
					<independentVar lookup="row">fcs/flap-pos-deg</independentVar>
					<independentVar lookup="column">aero/propeller-stream-factor</independentVar>
					<tableData>
						1	1.16	1.69
					0	0	0.009	0.015
					30	0	0.009	0.015
					</tableData>
			</table>
			</product>
		</function>

		<function name="aero/moment/Yaw_aileron">
			<description>Adverse yaw</description>
			<product>
				<property>aero/qbar-psf</property>
				<property>metrics/Sw-sqft</property>
				<property>metrics/bw-ft</property>
				<property>aero/tuning/adverse-yaw-factor</property>
				<value>1</value>
				<difference>
					<table>
						<independentVar lookup="row">fcs/right-aileron-pos-norm</independentVar>
						<independentVar lookup="column">aero/Re</independentVar>
						<tableData>
							2357931	2952345	3543172	4723931
						-1.25	0.00171	0.00173	0.00184	0.00205
						0	0.00000	-0.00001	-0.00001	-0.00003
						0.25	-0.00004	-0.00004	-0.00004	-0.00008
						0.75	0.00389	0.00401	0.00425	0.00516
						1	0.00586	0.00603	0.00640	0.00778
					</tableData>
					</table>
					<table>
						<independentVar lookup="row">fcs/left-aileron-pos-norm</independentVar>
						<independentVar lookup="column">aero/Re</independentVar>
						<tableData>
							2357931	2952345	3543172	4723931
						-1.25	0.00171	0.00173	0.00184	0.00205
						0	0.00000	-0.00001	-0.00001	-0.00003
						0.25	-0.00004	-0.00004	-0.00004	-0.00008
						0.75	0.00389	0.00401	0.00425	0.00516
						1	0.00586	0.00603	0.00640	0.00778
					</tableData>
				</table>
				</difference>
			</product>
		</function>
	</axis>

<!-- paste aera -->

<!--		<function name="aero/liftdrag">
		<description>lift vs. drag</description>
		<quotient>
			<sum>
				<property>aero/force/Lift_alpha</property>
				<property>aero/force/Lift_flap</property>
				<property>aero/force/Lift_elevator</property>
			</sum>
			<sum>
				<property>aero/force/Drag_basic</property>
				<property>aero/force/Drag_cowlflaps</property>
				<property>aero/force/Drag_induced</property>
				<property>aero/force/Drag_flap</property>
				<property>aero/force/Drag_gear</property>
				<property>aero/force/Drag_beta</property>
				<property>aero/force/Drag_elevator</property>
				<property>aero/force/testwindmill</property>
			</sum>
		</quotient>
	</function> -->
</aerodynamics>
