<?xml version="1.0"?>
<?xml-stylesheet type="text/xsl" href="http://jsbsim.sourceforge.net/JSBSim.xsl"?>
<fdm_config name="p210n" version="2.0" release="ALPHA" xmlns:xsi="http://www.w3.org/2001/XMLSchema-instance" xsi:noNamespaceSchemaLocation="http://jsbsim.sourceforge.net/JSBSim.xsd">
	<fileheader>
		<author>TheEagle, Ysop</author>
		<filecreationdate>2021-09-14</filecreationdate>
		<version>0.5</version>
		<description>Models a Cessna P210N.</description>
	</fileheader>

	<metrics>
		<wingarea unit="FT2">175</wingarea>
		<wingspan unit="FT">36.74</wingspan>
		<wing_incidence>1</wing_incidence>
		<chord unit="FT">4.76</chord>
		<htailarea unit="FT2">28</htailarea>
		<htailarm unit="FT">19.3</htailarm>
		<vtailarea unit="FT2">17.5</vtailarea>
		<vtailarm unit="FT">20.8</vtailarm>
		<location name="AERORP" unit="IN">
			<x>48.8</x>
			<y>0</y>
			<z>31.8</z>
		</location>
		<location name="EYEPOINT" unit="IN">
			<x>41</x>
			<y>-15</y>
			<z>17</z>
		</location>
		<!--<location name="VRP" unit="IN">
			<x>91.92</x>
			<y>0</y>
			<z>-9.84</z>
		</location>-->
		<location name="VRP" unit="IN">
			<x>0</x>
			<y>0</y>
			<z>0</z>
		</location>
	</metrics>

	<mass_balance>
		<ixx unit="SLUG*FT2">2034</ixx>
		<iyy unit="SLUG*FT2">1812</iyy>
		<izz unit="SLUG*FT2">3600</izz>
		<emptywt unit="LBS" >2342</emptywt>
		<!-- ref. datum is at 51.84  inches -->
		<!-- maximum aft location of the CG is 49 inches
			   maximum forward location of the CG is 38.4 inches
			   at 3000 pound gross weight empty weight CG is 42 inches-->
		<location name="CG" unit="IN">
			<x>42</x>
			<y>0</y>
			<z>-3</z>
		</location>
		<pointmass name="Pilot">
			<weight unit="LBS">170</weight>
			<location name="POINTMASS" unit="IN">
				<x>42.1</x>
				<y>-11</y>
				<z>0</z>
			</location>
		</pointmass>
		<pointmass name="Copilot">
			<weight unit="LBS">170</weight>
			<location name="POINTMASS" unit="IN">
				<x>42.1</x>
				<y>-11</y>
				<z>0</z>
			</location>
		</pointmass>
		<pointmass name="Middle left passenger">
			<weight unit="LBS">170</weight>
			<location name="POINTMASS" unit="IN">
				<x>73.6</x>
				<y>-11</y>
				<z>0</z>
			</location>
		</pointmass>
		<pointmass name="Middle right passenger">
			<weight unit="LBS">170</weight>
			<location name="POINTMASS" unit="IN">
				<x>73.6</x>
				<y>11</y>
				<z>0</z>
			</location>
		</pointmass>
		<pointmass name="Rear left passenger">
			<weight unit="LBS">170</weight>
			<location name="POINTMASS" unit="IN">
				<x>105.1</x>
				<y>-11</y>
				<z>3</z>
			</location>
		</pointmass>
		<pointmass name="Rear right passenger">
			<weight unit="LBS">170</weight>
			<location name="POINTMASS" unit="IN">
				<x>105.1</x>
				<y>11</y>
				<z>3</z>
			</location>
		</pointmass>
		<pointmass name="Baggage A">
			<weight unit="LBS">181.5</weight>
			<location name="POINTMASS" unit="IN">
				<x>131.2</x>
				<y>0</y>
				<z>-5</z>
			</location>
		</pointmass>
		<pointmass name="Baggage B">
			<weight unit="LBS">80</weight>
			<location name="POINTMASS" unit="IN">
				<x>159.3</x>
				<y>0</y>
				<z>-7</z>
			</location>
		</pointmass>
	</mass_balance>

	<ground_reactions>
		<!-- 0, 1, 2: gear bogeys -->
		<contact type="BOGEY" name="NOSE">
			<location unit="IN">
				<x>-10.5</x>
				<y>0</y>
				<z>-42.7</z>
			</location>
			<static_friction>0.8</static_friction>
			<dynamic_friction>0.5</dynamic_friction>
			<rolling_friction> 0.03 </rolling_friction>
			<spring_coeff unit="LBS/FT">6000</spring_coeff>
			<damping_coeff unit="LBS/FT/SEC">500</damping_coeff>
			<max_steer unit="DEG">35</max_steer>
			<brake_group>NONE</brake_group>
			<retractable>1</retractable>
		</contact>

		<contact type="BOGEY" name="LEFT_MAIN">
			<location unit="IN">
				<x>61.5</x>
				<y>57.6</y>
				<z>-43</z>
			</location>
			<static_friction>0.8</static_friction>
			<dynamic_friction>0.5</dynamic_friction>
			<rolling_friction>0.03</rolling_friction>
			<spring_coeff unit="LBS/FT">5000</spring_coeff>
			<damping_coeff unit="LBS/FT/SEC">800</damping_coeff>
			<max_steer unit="DEG">0</max_steer>
			<brake_group>LEFT</brake_group>
			<retractable>1</retractable>
		</contact>

		<contact type="BOGEY" name="RIGHT_MAIN">
			<location unit="IN">
				<x>61.5</x>
				<y>-57.6</y>
				<z>-43</z>
			</location>
			<static_friction>0.8</static_friction>
			<dynamic_friction>0.5</dynamic_friction>
			<rolling_friction>0.03</rolling_friction>
			<spring_coeff unit="LBS/FT">5000</spring_coeff>
			<damping_coeff unit="LBS/FT/SEC">800</damping_coeff>
			<max_steer unit="DEG">0</max_steer>
			<brake_group>RIGHT</brake_group>
			<retractable>1</retractable>
		</contact>

		<!-- 3, 4, 5, 6, 7: propeller -->
		<contact type="STRUCTURE" name="Propeller spinner tip">
			<location unit="IN">
				<x>-56.5</x>
				<y>0</y>
				<z>7.2</z>
			</location>
			<static_friction>0.5</static_friction>
			<dynamic_friction>0.3</dynamic_friction>
			<spring_coeff unit="LBS/FT">2000</spring_coeff>
			<damping_coeff unit="LBS/FT/SEC">1000</damping_coeff>
		</contact>

		<contact type="STRUCTURE" name="Propeller, lower edge">
			<location unit="IN">
				<x>-45.3</x>
				<y>0</y>
				<z>-33.2</z>
			</location>
			<static_friction>0.01</static_friction>
			<dynamic_friction>0.005</dynamic_friction>
			<spring_coeff unit="LBS/FT">500</spring_coeff>
			<damping_coeff unit="LBS/FT/SEC">1000</damping_coeff>
		</contact>

		<contact type="STRUCTURE" name="Propeller, upper edge">
			<location unit="IN">
				<x>-42.5</x>
				<y>0</y>
				<z>46.2</z>
			</location>
			<static_friction>0.01</static_friction>
			<dynamic_friction>0.005</dynamic_friction>
			<spring_coeff unit="LBS/FT">500</spring_coeff>
			<damping_coeff unit="LBS/FT/SEC">1000</damping_coeff>
		</contact>

		<contact type="STRUCTURE" name="Propeller, left edge">
			<location unit="IN">
				<x>-44</x>
				<y>-40</y>
				<z>6.7</z>
			</location>
			<static_friction>0.01</static_friction>
			<dynamic_friction>0.005</dynamic_friction>
			<spring_coeff unit="LBS/FT">500</spring_coeff>
			<damping_coeff unit="LBS/FT/SEC">1000</damping_coeff>
		</contact>

		<contact type="STRUCTURE" name="Propeller, right edge">
			<location unit="IN">
				<x>-44</x>
				<y>40</y>
				<z>6.7</z>
			</location>
			<static_friction>0.01</static_friction>
			<dynamic_friction>0.005</dynamic_friction>
			<spring_coeff unit="LBS/FT">500</spring_coeff>
			<damping_coeff unit="LBS/FT/SEC">1000</damping_coeff>
		</contact>

		<!-- 8, 9, 10, 11 12, 13, 14, 15: wings -->
		<contact type="STRUCTURE" name="Left wing tip, leading edge">
			<location unit="IN">
				<x>32.2</x>
				<y>-212.6</y>
				<z>34.7</z>
			</location>
			<static_friction>0.5</static_friction>
			<dynamic_friction>0.3</dynamic_friction>
			<spring_coeff unit="LBS/FT">2000</spring_coeff>
			<damping_coeff unit="LBS/FT/SEC">1000</damping_coeff>
		</contact>

		<contact type="STRUCTURE" name="Right wing tip, leading edge">
			<location unit="IN">
				<x>32.2</x>
				<y>212.6</y>
				<z>34.7</z>
			</location>
			<static_friction>0.5</static_friction>
			<dynamic_friction>0.3</dynamic_friction>
			<spring_coeff unit="LBS/FT">2000</spring_coeff>
			<damping_coeff unit="LBS/FT/SEC">1000</damping_coeff>
		</contact>

		<contact type="STRUCTURE" name="Left wing tip, trailing edge">
			<location unit="IN">
				<x>78.3</x>
				<y>-219.8</y>
				<z>27</z>
			</location>
			<static_friction>0.5</static_friction>
			<dynamic_friction>0.3</dynamic_friction>
			<spring_coeff unit="LBS/FT">2000</spring_coeff>
			<damping_coeff unit="LBS/FT/SEC">1000</damping_coeff>
		</contact>

		<contact type="STRUCTURE" name="Right wing tip, trailing edge">
			<location unit="IN">
				<x>78.3</x>
				<y>219.8</y>
				<z>27</z>
			</location>
			<static_friction>0.5</static_friction>
			<dynamic_friction>0.3</dynamic_friction>
			<spring_coeff unit="LBS/FT">2000</spring_coeff>
			<damping_coeff unit="LBS/FT/SEC">1000</damping_coeff>
		</contact>

		<contact type="STRUCTURE" name="Left wing center, leading edge">
			<location unit="IN">
				<x>31</x>
				<y>-115</y>
				<z>35.7</z>
			</location>
			<static_friction>0.5</static_friction>
			<dynamic_friction>0.3</dynamic_friction>
			<spring_coeff unit="LBS/FT">2000</spring_coeff>
			<damping_coeff unit="LBS/FT/SEC">1000</damping_coeff>
		</contact>

		<contact type="STRUCTURE" name="Right wing center, leading edge">
			<location unit="IN">
				<x>31</x>
				<y>115</y>
				<z>35.7</z>
			</location>
			<static_friction>0.5</static_friction>
			<dynamic_friction>0.3</dynamic_friction>
			<spring_coeff unit="LBS/FT">2000</spring_coeff>
			<damping_coeff unit="LBS/FT/SEC">1000</damping_coeff>
		</contact>

		<contact type="STRUCTURE" name="Left wing center, trailing edge">
			<location unit="IN">
				<x>89.1</x>
				<y>-115.3</y>
				<z>27.2</z>
			</location>
			<static_friction>0.5</static_friction>
			<dynamic_friction>0.3</dynamic_friction>
			<spring_coeff unit="LBS/FT">2000</spring_coeff>
			<damping_coeff unit="LBS/FT/SEC">1000</damping_coeff>
		</contact>

		<contact type="STRUCTURE" name="Right wing center, trailing edge">
			<location unit="IN">
				<x>89.1</x>
				<y>115.3</y>
				<z>27.2</z>
			</location>
			<static_friction>0.5</static_friction>
			<dynamic_friction>0.3</dynamic_friction>
			<spring_coeff unit="LBS/FT">2000</spring_coeff>
			<damping_coeff unit="LBS/FT/SEC">1000</damping_coeff>
		</contact>

		<!-- 16, 17, 18: rudder and tail fin-->
		<contact type="STRUCTURE" name="Rudder, leading edge upper tip">
			<location unit="IN">
				<x>255.6</x>
				<y>0</y>
				<z>65.1</z>
			</location>
			<static_friction>0.05</static_friction>
			<dynamic_friction>0.025</dynamic_friction>
			<spring_coeff unit="LBS/FT">1000</spring_coeff>
			<damping_coeff unit="LBS/FT/SEC">1000</damping_coeff>
		</contact>

		<contact type="STRUCTURE" name="Rudder, trailing edge upper tip">
			<location unit="IN">
				<x>282.8</x>
				<y>0</y>
				<z>61.2</z>
			</location>
			<static_friction>  0.05 </static_friction>
			<dynamic_friction> 0.025 </dynamic_friction>
			<spring_coeff unit="LBS/FT">1000</spring_coeff>
			<damping_coeff unit="LBS/FT/SEC">1000</damping_coeff>
		</contact>

		<contact type="STRUCTURE" name="Tail fin">
			<location unit="IN">
				<x>216.5</x>
				<y>0</y>
				<z>13.7</z>
			</location>
			<static_friction>1</static_friction>
			<dynamic_friction>0.5</dynamic_friction>
			<spring_coeff unit="LBS/FT">5000</spring_coeff>
			<damping_coeff unit="LBS/FT/SEC">2000</damping_coeff>
		</contact>

		<!-- 19, 20, 21, 22: elevators -->
		<contact type="STRUCTURE" name="Left elevator leading edge tip">
			<location unit="IN">
				<x>210.1</x>
				<y>-75.2</y>
				<z>3.1</z>
			</location>
			<static_friction>0.05</static_friction>
			<dynamic_friction>0.025</dynamic_friction>
			<spring_coeff unit="LBS/FT">1000</spring_coeff>
			<damping_coeff unit="LBS/FT/SEC">1000</damping_coeff>
		</contact>

		<contact type="STRUCTURE" name="Right elevator leading edge tip">
			<location unit="IN">
				<x>210.1</x>
				<y>75.2</y>
				<z>3.1</z>
			</location>
			<static_friction>  0.05 </static_friction>
			<dynamic_friction> 0.025 </dynamic_friction>
			<spring_coeff unit="LBS/FT">1000</spring_coeff>
			<damping_coeff unit="LBS/FT/SEC">1000</damping_coeff>
		</contact>

		<contact type="STRUCTURE" name="Left elevator trailing edge tip">
			<location unit="IN">
				<x>242.6</x>
				<y>-76.4</y>
				<z>1.9</z>
			</location>
			<static_friction>0.05</static_friction>
			<dynamic_friction>0.025</dynamic_friction>
			<spring_coeff unit="LBS/FT">1000</spring_coeff>
			<damping_coeff unit="LBS/FT/SEC">1000</damping_coeff>
		</contact>

		<contact type="STRUCTURE" name="Right elevator trailing edge tip">
			<location unit="IN">
				<x>242.6</x>
				<y>76.4</y>
				<z>1.9</z>
			</location>
			<static_friction>  0.05 </static_friction>
			<dynamic_friction> 0.025 </dynamic_friction>
			<spring_coeff unit="LBS/FT">1000</spring_coeff>
			<damping_coeff unit="LBS/FT/SEC">1000</damping_coeff>
		</contact>

		<!-- 23, 24, 25, 26, 27, 28: antennas -->
		<contact type="STRUCTURE" name="Left comm antenna tip">
			<location unit="IN">
				<x>58.1</x>
				<y>-17.6</y>
				<z>49.3</z>
			</location>
			<static_friction>  0.01 </static_friction>
			<dynamic_friction> 0.005 </dynamic_friction>
			<spring_coeff unit="LBS/FT">500</spring_coeff>
			<damping_coeff unit="LBS/FT/SEC">500</damping_coeff>
		</contact>

		<contact type="STRUCTURE" name="Right comm antenna tip">
			<location unit="IN">
				<x>58.1</x>
				<y>17.6</y>
				<z>49.3</z>
			</location>
			<static_friction>  0.01 </static_friction>
			<dynamic_friction> 0.005 </dynamic_friction>
			<spring_coeff unit="LBS/FT">500</spring_coeff>
			<damping_coeff unit="LBS/FT/SEC">500</damping_coeff>
		</contact>

		<contact type="STRUCTURE" name="ELT antenna tip">
			<location unit="IN">
				<x>150.8</x>
				<y>-4.6</y>
				<z>28.6</z>
			</location>
			<static_friction>  0.01 </static_friction>
			<dynamic_friction> 0.005 </dynamic_friction>
			<spring_coeff unit="LBS/FT">500</spring_coeff>
			<damping_coeff unit="LBS/FT/SEC">500</damping_coeff>
		</contact>

		<contact type="STRUCTURE" name="Transponder antenna tip">
			<location unit="IN">
				<x>52.2</x>
				<y>-11</y>
				<z>-24.9</z>
			</location>
			<static_friction>0.01</static_friction>
			<dynamic_friction>0.005</dynamic_friction>
			<spring_coeff unit="LBS/FT">500</spring_coeff>
			<damping_coeff unit="LBS/FT/SEC">500</damping_coeff>
		</contact>

		<contact type="STRUCTURE" name="Marker beacon antenna">
			<location unit="IN">
				<x>148.5</x>
				<y>-1.2</y>
				<z>-17.9</z>
			</location>
			<static_friction>0.01</static_friction>
			<dynamic_friction>0.005</dynamic_friction>
			<spring_coeff unit="LBS/FT">1000</spring_coeff>
			<damping_coeff unit="LBS/FT/SEC">1000</damping_coeff>
		</contact>

		<contact type="STRUCTURE" name="Weather radar">
			<location unit="IN">
				<x>163.2</x>
				<y>-3</y>
				<z>-15.1</z>
			</location>
			<static_friction>0.01</static_friction>
			<dynamic_friction>0.005</dynamic_friction>
			<spring_coeff unit="LBS/FT">1000</spring_coeff>
			<damping_coeff unit="LBS/FT/SEC">1000</damping_coeff>
		</contact>

		<!-- 29, 30, 31, 32, 33, 34, 35, 36: fuselage bottom -->
		<contact type="STRUCTURE" name="Fuselage bottom, left front">
			<location unit="IN">
				<x>-28.7</x>
				<y>-9.9</y>
				<z>-11.7</z>
			</location>
			<static_friction>1</static_friction>
			<dynamic_friction>0.5</dynamic_friction>
			<spring_coeff unit="LBS/FT">5000</spring_coeff>
			<damping_coeff unit="LBS/FT/SEC">1000</damping_coeff>
		</contact>

		<contact type="STRUCTURE" name="Fuselage bottom, right front">
			<location unit="IN">
				<x>28.7</x>
				<y>9.9</y>
				<z>-11.7</z>
			</location>
			<static_friction>1</static_friction>
			<dynamic_friction>0.5</dynamic_friction>
			<spring_coeff unit="LBS/FT">5000</spring_coeff>
			<damping_coeff unit="LBS/FT/SEC">2000</damping_coeff>
		</contact>

		<contact type="STRUCTURE" name="Fuselage bottom, aft of left cowl flap">
			<location unit="IN">
				<x>-2.3</x>
				<y>-10.8</y>
				<z>-20.5</z>
			</location>
			<static_friction>1</static_friction>
			<dynamic_friction>0.5</dynamic_friction>
			<spring_coeff unit="LBS/FT">5000</spring_coeff>
			<damping_coeff unit="LBS/FT/SEC">1000</damping_coeff>
		</contact>

		<contact type="STRUCTURE" name="Fuselage bottom, aft of right cowl flap">
			<location unit="IN">
				<x>-2.3</x>
				<y>10.8</y>
				<z>-20.5</z>
			</location>
			<static_friction>1</static_friction>
			<dynamic_friction>0.5</dynamic_friction>
			<spring_coeff unit="LBS/FT">5000</spring_coeff>
			<damping_coeff unit="LBS/FT/SEC">2000</damping_coeff>
		</contact>

		<contact type="STRUCTURE" name="Fuselage bottom, left below door post">
			<location unit="IN">
				<x>64</x>
				<y>-12.2</y>
				<z>-23.5</z>
			</location>
			<static_friction>1</static_friction>
			<dynamic_friction>0.5</dynamic_friction>
			<spring_coeff unit="LBS/FT">5000</spring_coeff>
			<damping_coeff unit="LBS/FT/SEC">2000</damping_coeff>
		</contact>

		<contact type="STRUCTURE" name="Fuselage bottom, right below door post">
			<location unit="IN">
				<x>64</x>
				<y>12.2</y>
				<z>-23.5</z>
			</location>
			<static_friction>1</static_friction>
			<dynamic_friction>0.5</dynamic_friction>
			<spring_coeff unit="LBS/FT">5000</spring_coeff>
			<damping_coeff unit="LBS/FT/SEC">2000</damping_coeff>
		</contact>

		<contact type="STRUCTURE" name="Fuselage bottom, left rear end main wheel well">
			<location unit="IN">
				<x>108.5</x>
				<y>-11.3</y>
				<z>-20.3</z>
			</location>
			<static_friction>1</static_friction>
			<dynamic_friction>0.5</dynamic_friction>
			<spring_coeff unit="LBS/FT">5000</spring_coeff>
			<damping_coeff unit="LBS/FT/SEC">2000</damping_coeff>
		</contact>

		<contact type="STRUCTURE" name="Fuselage bottom, right rear end of main wheel well">
			<location unit="IN">
				<x>108.5</x>
				<y>11.3</y>
				<z>-20.3</z>
			</location>
			<static_friction>1</static_friction>
			<dynamic_friction>0.5</dynamic_friction>
			<spring_coeff unit="LBS/FT">5000</spring_coeff>
			<damping_coeff unit="LBS/FT/SEC">2000</damping_coeff>
		</contact>
		<!-- 37: tail tip -->
		<contact type="STRUCTURE" name="Fuselage, tail tip">
			<location unit="IN">
				<x>254.8</x>
				<y>0</y>
				<z>-0.4</z>
			</location>
			<static_friction>1</static_friction>
			<dynamic_friction>0.5</dynamic_friction>
			<spring_coeff unit="LBS/FT">500</spring_coeff>
			<damping_coeff unit="LBS/FT/SEC">2000</damping_coeff>
		</contact>

		<!-- 38, 39, 40, 41, 42, 43, 44, 45, 46, 47: fuselage top -->
		<contact type="STRUCTURE" name="Fuselage top, left front">
			<location unit="IN">
				<x>-39.3</x>
				<y>-11.8</y>
				<z>12.2</z>
			</location>
			<static_friction>1</static_friction>
			<dynamic_friction>0.5</dynamic_friction>
			<spring_coeff unit="LBS/FT">5000</spring_coeff>
			<damping_coeff unit="LBS/FT/SEC">1000</damping_coeff>
		</contact>

		<contact type="STRUCTURE" name="Fuselage top, right front">
			<location unit="IN">
				<x>-39.3</x>
				<y>11.8</y>
				<z>12.2</z>
			</location>
			<static_friction>1</static_friction>
			<dynamic_friction>0.5</dynamic_friction>
			<spring_coeff unit="LBS/FT">5000</spring_coeff>
			<damping_coeff unit="LBS/FT/SEC">2000</damping_coeff>
		</contact>

		<contact type="STRUCTURE" name="Fuselage top, left at top edge of windshield">
			<location unit="IN">
				<x>32.7</x>
				<y>-18</y>
				<z>34.4</z>
			</location>
			<static_friction>1</static_friction>
			<dynamic_friction>0.5</dynamic_friction>
			<spring_coeff unit="LBS/FT">5000</spring_coeff>
			<damping_coeff unit="LBS/FT/SEC">1000</damping_coeff>
		</contact>

		<contact type="STRUCTURE" name="Fuselage top, right at top edge of windshield">
			<location unit="IN">
				<x>32.7</x>
				<y>18</y>
				<z>34.4</z>
			</location>
			<static_friction>1</static_friction>
			<dynamic_friction>0.5</dynamic_friction>
			<spring_coeff unit="LBS/FT">5000</spring_coeff>
			<damping_coeff unit="LBS/FT/SEC">2000</damping_coeff>
		</contact>

		<contact type="STRUCTURE" name="Fuselage top, left aft of COM antennas">
			<location unit="IN">
				<x>58.6</x>
				<y>-23.6</y>
				<z>35.1</z>
			</location>
			<static_friction>1</static_friction>
			<dynamic_friction>0.5</dynamic_friction>
			<spring_coeff unit="LBS/FT">5000</spring_coeff>
			<damping_coeff unit="LBS/FT/SEC">1000</damping_coeff>
		</contact>

		<contact type="STRUCTURE" name="Fuselage top, right aft of COM antennas">
			<location unit="IN">
				<x>58.6</x>
				<y>23.6</y>
				<z>35.1</z>
			</location>
			<static_friction>1</static_friction>
			<dynamic_friction>0.5</dynamic_friction>
			<spring_coeff unit="LBS/FT">5000</spring_coeff>
			<damping_coeff unit="LBS/FT/SEC">2000</damping_coeff>
		</contact>

		<contact type="STRUCTURE" name="Fuselage top, left aft of rear windows">
			<location unit="IN">
				<x>114</x>
				<y>-10.2</y>
				<z>23.1</z>
			</location>
			<static_friction>1</static_friction>
			<dynamic_friction>0.5</dynamic_friction>
			<spring_coeff unit="LBS/FT">5000</spring_coeff>
			<damping_coeff unit="LBS/FT/SEC">1000</damping_coeff>
		</contact>

		<contact type="STRUCTURE" name="Fuselage top, right aft of rear windows">
			<location unit="IN">
				<x>114</x>
				<y>10.2</y>
				<z>23.1</z>
			</location>
			<static_friction>1</static_friction>
			<dynamic_friction>0.5</dynamic_friction>
			<spring_coeff unit="LBS/FT">5000</spring_coeff>
			<damping_coeff unit="LBS/FT/SEC">2000</damping_coeff>
		</contact>

		<contact type="STRUCTURE" name="Fuselage top, left foward of ELT antenna">
			<location unit="IN">
				<x>139.4</x>
				<y>-9.3</y>
				<z>13.7</z>
			</location>
			<static_friction>1</static_friction>
			<dynamic_friction>0.5</dynamic_friction>
			<spring_coeff unit="LBS/FT">5000</spring_coeff>
			<damping_coeff unit="LBS/FT/SEC">1000</damping_coeff>
		</contact>

		<contact type="STRUCTURE" name="Fuselage top, right forward of ELT antenna">
			<location unit="IN">
				<x>139.4</x>
				<y>9.3</y>
				<z>13.7</z>
			</location>
			<static_friction>1</static_friction>
			<dynamic_friction>0.5</dynamic_friction>
			<spring_coeff unit="LBS/FT">5000</spring_coeff>
			<damping_coeff unit="LBS/FT/SEC">2000</damping_coeff>
		</contact>
	</ground_reactions>

	<propulsion>
		<engine file="Rolls_Royce-250_B17F">
			<location unit="IN">
				<x>-17</x>
				<y>0</y>
				<z>7</z>
			</location>
			<orient unit="DEG">
				<pitch>2</pitch>
				<roll>0</roll>
				<yaw>0</yaw>
			</orient>
			<feed>12</feed>
			<thruster file="Hartzell_HC-B3TF-7A">
				<sense>1</sense>
				<location unit="IN">
					<x>-43.8</x>
					<y>0</y>
					<z>6.7</z>
				</location>
				<orient unit="DEG">
					<pitch>2</pitch>
					<roll>0</roll>
					<yaw>0</yaw>
				</orient>
			</thruster>
		</engine>

		<!-- Left main tank -->
		<tank type="FUEL" number="0">
			<location unit="IN">
				<x>57.5</x>
				<y>-69.3</y>
				<z>30.9</z>
			</location>
			<capacity unit="LBS">301.5</capacity>
			<contents unit="LBS">223</contents>
			<unusable unit="LBS">3.35</unusable>
			<type>JET-A</type>
		</tank>

		<!-- Right main tank -->
		<tank type="FUEL" number="1">
			<location unit="IN">
				<x>57.5</x>
				<y>69.3</y>
				<z>30.9</z>
			</location>
			<capacity unit="LBS">301.5</capacity>
			<contents unit="LBS">223</contents>
			<unusable unit="LBS">3.35</unusable>
			<type>JET-A</type>
		</tank>

		<!-- XXX: All capacity values below are made up and working but should be replaced with real world values some day -->
		<!-- Left fuel pipe wing tank -> reservoir tank -->
		<tank type="FUEL" number="2">
			<location unit="IN">
				<x>71.5</x>
				<y>-22.5</y>
				<z>0</z>
			</location>
			<capacity unit="LBS">1</capacity>
			<contents unit="LBS">1</contents>
			<type>JET-A</type>
		</tank>

		<!-- Right fuel pipe wing tank -> reservoir tank -->
		<tank type="FUEL" number="3">
			<location unit="IN">
				<x>71.5</x>
				<y>22.5</y>
				<z>0</z>
			</location>
			<capacity unit="LBS">1</capacity>
			<contents unit="LBS">1</contents>
			<type>JET-A</type>
		</tank>

		<!-- Left reservoir tank -->
		<tank type="FUEL" number="4">
			<location unit="IN">
				<x>23.9</x>
				<y>-11.8</y>
				<z>-20</z>
			</location>
			<capacity unit="LBS">0.5</capacity>
			<contents unit="LBS">0.5</contents>
			<type>JET-A</type>
		</tank>

		<!-- Right reservoir tank -->
		<tank type="FUEL" number="5">
			<location unit="IN">
				<x>23.9</x>
				<y>11.8</y>
				<z>-20</z>
			</location>
			<capacity unit="LBS">0.5</capacity>
			<contents unit="LBS">0.5</contents>
			<type>JET-A</type>
		</tank>

		<!-- Left fuel pipe reservoir tank -> fuel selector -->
		<tank type="FUEL" number="6">
			<location unit="IN">
				<x>23.9</x>
				<y>-5</y>
				<z>-19</z>
			</location>
			<capacity unit="LBS">0.2</capacity>
			<contents unit="LBS">0.2</contents>
			<type>JET-A</type>
		</tank>

		<!-- Right fuel pipe reservoir tank -> fuel selector -->
		<tank type="FUEL" number="7">
			<location unit="IN">
				<x>23.9</x>
				<y>5</y>
				<z>-19</z>
			</location>
			<capacity unit="LBS">0.2</capacity>
			<contents unit="LBS">0.2</contents>
			<type>JET-A</type>
		</tank>

		<!-- Fuel selector sump-->
		<tank type="FUEL" number="8">
			<location unit="IN">
				<x>26</x>
				<y>0</y>
				<z>-18</z>
			</location>
			<capacity unit="LBS">0.25</capacity>
			<contents unit="LBS">0.25</contents>
			<type>JET-A</type>
		</tank>

		<!-- Fuel pipe fuel selector -> fuel strainer -->
		<tank type="FUEL" number="9">
			<location unit="IN">
				<x>63</x>
				<y>0</y>
				<z>-17</z>
			</location>
			<capacity unit="LBS">0.1</capacity>
			<contents unit="LBS">0.1</contents>
			<type>JET-A</type>
		</tank>

		<!-- Fuel strainer sump -->
		<tank type="FUEL" number="10">
			<location unit="IN">
				<x>50</x>
				<y>0</y>
				<z>-14</z>
			</location>
			<capacity unit="LBS">0.25</capacity>
			<contents unit="LBS">0.25</contents>
			<type>JET-A</type>
		</tank>

		<!-- Fuel pipe fuel strainer -> engine manifold-->
		<tank type="FUEL" number="11">
			<location unit="IN">
				<x>40</x>
				<y>0</y>
				<z>-5</z>
			</location>
			<capacity unit="LBS">0.1</capacity>
			<contents unit="LBS">0.1</contents>
			<type>JET-A</type>
		</tank>

		<!-- Engine nozzle -->
		<tank type="FUEL" number="12">
			<location unit="IN">
				<x>20</x>
				<y>0</y>
				<z>0</z>
			</location>
			<capacity unit="LBS">0.1</capacity>
			<contents unit="LBS">0.1</contents>
			<type>JET-A</type>
		</tank>

		<!-- Transfer tank -->
		<tank type="FUEL" number="13">
			<location unit="IN">
				<x>300</x>
				<y>0</y>
				<z>-20</z>
			</location>
			<capacity unit="LBS">179.56</capacity>
			<contents unit="LBS">0</contents>
			<type>JET-A</type>
		</tank>

		<!-- Left fuel pipe transfer tank -> wing tank -->
		<tank type="FUEL" number="14">
			<location unit="IN">
				<x>120</x>
				<y>-20</y>
				<z>0</z>
			</location>
			<capacity unit="LBS">1</capacity>
			<contents unit="LBS">1</contents>
			<type>JET-A</type>
		</tank>

		<!-- Right fuel pipe transfer tank -> wing tank -->
		<tank type="FUEL" number="15">
			<location unit="IN">
				<x>120</x>
				<y>20</y>
				<z>0</z>
			</location>
			<capacity unit="LBS">1</capacity>
			<contents unit="LBS">1</contents>
			<type>JET-A</type>
		</tank>
	</propulsion>

	<system file="silver-eagle-fuel"/>
	<system file="damage"/>

	<flight_control name="FCS: p210n">
		<channel name="NWS">
			<switch name="gear/steering-enabled">
				<default value="0"/>
				<test logic="OR" value="1">
					/gear/gear[0]/position-norm EQ 1
				</test>
			</switch>

			<fcs_function name="gear/brakes-steer-factor">
				<function>
					<product>
						<sum>
							<product>
								<property>fcs/left-brake-cmd-norm</property>
								<value>-1</value>
							</product>
							<property>fcs/right-brake-cmd-norm</property>
						</sum>
						<property>/gear/gear[0]/rollspeed-ms</property>
						<value>0.5</value> <!-- for adjusting braking influence -->
						<property>gear/steering-enabled</property>
					</product>
				</function>
			</fcs_function>

			<!-- Drive the nose wheel with the rudder and brakes -->
			<fcs_function name="fcs/steer-cmd-deg">
				<function>
					<table>
						<independentVar lookup="row">gear/brakes-steer-factor</independentVar>
						<independentVar lookup="column">/controls/flight/rudder</independentVar>
						<tableData>
									-1	   0		1
						  -1	-35	   0   14.5
						   0	-14.5	0   14.5
						   1	-14.5	0	  35
						</tableData>
					</table>
				</function>
			</fcs_function>

			<actuator>
				<input>fcs/steer-cmd-deg</input>
				<rate_limit>80</rate_limit>
				<output>fcs/steer-pos-norm</output>
			</actuator>
		</channel>

		<channel name="Pitch">
			<summer name="Pitch Trim Sum">
				<input>fcs/elevator-cmd-norm</input>
				<input>fcs/pitch-trim-cmd-norm</input>
				<clipto>
					<min>-1</min>
					<max>1</max>
				</clipto>
			</summer>

			<aerosurface_scale name="Elevator Control">
				<input>fcs/pitch-trim-sum</input>
				<range>
					<min>-0.3</min>
					<max>0.4</max>
				</range>
				<output>fcs/elevator-pos-rad</output>
			</aerosurface_scale>

			<aerosurface_scale name="elevator normalization">
				<input>fcs/elevator-pos-rad</input>
				<domain>
					<min>-0.3</min>
					<max>0.4</max>
				</domain>
				<range>
					<min>-1</min>
					<max>1</max>
				</range>
				<output>fcs/elevator-pos-norm</output>
			</aerosurface_scale>
		</channel>

		<channel name="Roll">
			<summer name="Roll Trim Sum">
				<input>fcs/aileron-cmd-norm</input>
				<input>fcs/roll-trim-cmd-norm</input>
				<clipto>
					<min>-1</min>
					<max>1</max>
				</clipto>
			</summer>

			<aerosurface_scale name="Left Aileron Control">
				<input>fcs/roll-trim-sum</input>
				<range>
					<min>-0.35</min>
					<max>0.26</max>
				</range>
				<output>fcs/left-aileron-pos-rad</output>
			</aerosurface_scale>

			<aerosurface_scale name="Right Aileron Control">
				<input>fcs/roll-trim-sum</input>
				<range>
					<min>0.26</min>
					<max>-0.35</max>
				</range>
				<output>fcs/right-aileron-pos-rad</output>
			</aerosurface_scale>

			<aerosurface_scale name="left aileron normalization">
				<input>fcs/left-aileron-pos-rad</input>
				<domain>
					<min>-0.35</min>
					<max>0.26</max>
				</domain>
				<range>
					<min>-1</min>
					<max>1</max>
				</range>
				<output>fcs/left-aileron-pos-norm</output>
			</aerosurface_scale>

			<aerosurface_scale name="right aileron normalization">
				<input>fcs/right-aileron-pos-rad</input>
				<domain>
					<min>0.26</min>
					<max>-0.35</max>
				</domain>
				<range>
					<min>-1</min>
					<max>1</max>
				</range>
				<output>fcs/right-aileron-pos-norm</output>
			</aerosurface_scale>
		</channel>

		<hysteresis_limits unit="RAD">
			<min>0.122</min>
			<max>0.262</max>
		</hysteresis_limits>

		<channel name="Yaw">
			<summer name="Rudder Command Sum">
				<input>fcs/rudder-cmd-norm</input>
				<input>fcs/yaw-trim-cmd-norm</input>
				<clipto>
					<min>-1</min>
					<max>1</max>
				</clipto>
			</summer>

			<aerosurface_scale name="Rudder Control">
				<input>fcs/rudder-command-sum</input>
				<range>
					<min>-0.47</min>
					<max>0.47</max>
				</range>
				<output>fcs/rudder-pos-rad</output>
			</aerosurface_scale>

			<aerosurface_scale name="rudder normalization">
				<input>fcs/rudder-pos-rad</input>
				<domain>
					<min>-0.47</min>
					<max>0.47</max>
				</domain>
				<range>
					<min>-1</min>
					<max>1</max>
				</range>
				<output>fcs/rudder-pos-norm</output>
			</aerosurface_scale>
		</channel>

		<channel name="Flaps">
			<kinematic name="Flaps Control">
				<input>fcs/flap-cmd-norm</input>
				<traverse>
					<setting>
						<position>0</position>
						<time>0</time>
					</setting>
					<setting>
						<position>10</position>
						<time>2</time>
					</setting>
					<setting>
						<position>20</position>
						<time>3</time>
					</setting>
					<setting>
						<position>30</position>
						<time>3</time>
					</setting>
				</traverse>
				<output>fcs/flap-pos-deg</output>
			</kinematic>

			<aerosurface_scale name="flap normalization">
				<input>fcs/flap-pos-deg</input>
				<domain>
					<min>0</min>
					<max>30</max>
				</domain>
				<range>
					<min>0</min>
					<max>1</max>
				</range>
				<output>fcs/flap-pos-norm</output>
			</aerosurface_scale>
		</channel>

		<channel name="Landing Gear">
			<kinematic name="Gear Control">
				<input>gear/gear-cmd-norm</input>
				<traverse>
					<setting>
						<position>0</position>
						<time>0</time>
					</setting>
					<setting>
						<position>1</position>
						<time>7</time>
					</setting>
				</traverse>
				<output>gear/gear-pos-norm</output>
			</kinematic>
		</channel>

		<channel name="Cowl flaps">
			<kinematic name="Cowl flaps">
				<input>/controls/engines/engine[0]/cowl-flaps-norm</input>
				<traverse>
					<setting>
						<position>0</position>
						<time>0</time>
					</setting>
					<setting>
						<position>1</position>
						<time>1</time>
					</setting>
				</traverse>
				<output>propulsion/engine[0]/cowl-flaps-norm</output>
			</kinematic>
		</channel>
		<!-- TODO: model TOT and influence of open cowl flaps -->
	</flight_control>

	<aerodynamics>
		<function name="aero/function/kCDge">
			<description>Change in drag due to ground effect</description>
			<table>
				<independentVar>aero/h_b-mac-ft</independentVar>
				<tableData>
					  0.0000	0.4800
					  0.1000	0.5150
					  0.1500	0.6290
					  0.2000	0.7090
					  0.3000	0.8150
					  0.4000	0.8820
					  0.5000	0.9280
					  0.6000	0.9620
					  0.7000	0.9880
					  0.8000	1.0000
					  0.9000	1.0000
					  1.0000	1.0000
					  1.1000	1.0000
				  </tableData>
			</table>
		</function>

		<function name="aero/function/kCLge">
			<description>Change in lift due to ground effect</description>
			<table>
				<independentVar>aero/h_b-mac-ft</independentVar>
				<tableData>
					0.0000	1.2030
					0.1000	1.1270
					0.1500	1.0900
					0.2000	1.0730
					0.3000	1.0460
					0.4000	1.0280
					0.5000	1.0190
					0.6000	1.0130
					0.7000	1.0080
					0.8000	1.0060
					0.9000	1.0030
					1.0000	1.0020
					1.1000	1.0000
				</tableData>
			</table>
		</function>

		<function name="qbar_empennage">
			<description>qbar as effective on empennage</description>
			<product>
				<sum>
					<property>velocities/u-aero-fps</property>
					<property>propulsion/engine/prop-induced-velocity_fps</property>
				</sum>
				<sum>
					<property>velocities/u-aero-fps</property>
					<property>propulsion/engine/prop-induced-velocity_fps</property>
				</sum>
				<value>0.5</value>
				<property>atmosphere/rho-slugs_ft3</property>
				<property>metrics/Sw-sqft</property>
			</product>
		</function>

		<function name="aero/slipfactor">
			<description>added stream</description>
			<quotient>
				<product>
					<property>aero/qbar-psf</property>
					<property>metrics/Sw-sqft</property>
					<property>propulsion/engine/thrust-coefficient</property>
				</product>
				<product>
					<property>propulsion/engine/advance-ratio</property>
					<property>propulsion/engine/advance-ratio</property>
				</product>
			</quotient>
		</function>

		<axis name="Z">
			<function name="aero/force/Z_base">
				<description>Lift base</description>
				<product>
					<property>aero/qbar-psf</property>
					<property>metrics/Sw-sqft</property>
					<property>aero/function/kCLge</property>
					<value>-1</value>
					<table>
						<independentVar lookup="row">aero/alpha-deg</independentVar>
						<independentVar lookup="column">aero/beta-deg</independentVar>
						<independentVar lookup="table">fcs/flap-pos-deg</independentVar>
						<tableData breakPoint="0">
							-15	0	15
							-5	0.0909039	0.106775	0.0909039
							-4	0.1840263	0.1930433	0.1840263
							-3	0.2772157	0.2838213	0.2772157
							-2	0.3617907	0.375159	0.3617907
							-1	0.45471	0.4667469	0.45471
							0	0.5178764	0.5584664	0.5178764
							1	0.6114484	0.6500182	0.6114484
							2	0.7024882	0.7414541	0.7024882
							3	0.7844738	0.8326248	0.7844738
							4	0.8649256	0.9226915	0.8649256
							5	0.9496707	1.0136398	0.9496707
							6	1.0325627	1.1035396	1.0325627
							7	1.117883	1.1930796	1.117883
							8	1.201668	1.2819514	1.201668
							9	1.2837596	1.370063	1.2837596
							10	1.365433	1.4576964	1.365433
							11	1.4462982	1.5441668	1.4462982
							12	1.5267179	1.6298702	1.5267179
							13	1.6052017	1.6998395	1.6052017
							14	1.6688563	1.7255837	1.6688563
							15	1.7121212	1.7415441	1.7121212
							16	1.730933	1.7528978	1.730933
							17	1.7428438	1.7609809	1.7428438
							18	1.7498637	1.7654191	1.7498637
							19	1.7573394	1.7673235	1.7573394
							20	1.7619964	1.767449	1.7619964
						</tableData>
						<tableData breakPoint="30">
							-15	0	15
							-5	0.5421953	0.5729562	0.5421874
							-4	0.620561	0.6497176	0.6213149
							-3	0.6997294	0.7211212	0.7080907
							-2	0.8160566	0.824855	0.7923552
							-1	0.9022836	0.9317216	0.8806516
							0	0.9607447	1.0210257	0.9334042
							1	1.0190597	1.1083098	1.0176019
							2	1.072363	1.1932193	1.0733489
							3	1.1677182	1.2967063	1.1743701
							4	1.2359952	1.3660662	1.2336834
							5	1.3265602	1.4469979	1.3250534
							6	1.4340675	1.535991	1.4311669
							7	1.5810173	1.5976443	1.5283142
							8	1.5927846	1.7045743	1.5853233
							9	1.6590336	1.7880062	1.6476662
							10	1.7525109	1.8493972	1.7539833
							11	1.8283578	1.9001327	1.8285318
							12	1.8800323	1.941391	1.8809476
							13	1.923237	1.9810508	1.9231695
							14	1.9607058	2.0155297	1.9613899
							15	1.9934078	2.0441153	1.9938911
							16	2.0220151	2.0697631	2.0225898
							17	2.0459332	2.0885039	2.0459087
							18	2.0661604	2.103918	2.0665233
							19	2.0823113	2.114221	2.0826752
							20	2.0956907	2.1224322	2.095781
						</tableData>
					</table>
					<!--<quotient>
					<sum>
						<property>damage/left-wing-ripped-off</property>
						<property>damage/right-wing-ripped-off</property>
					</sum>
					<value>2</value>
					</quotient>-->
				</product>
			</function>

			<function name="aero/force/Z_mach">
				<description>Pitch Z due to mach</description>
				<product>
					<property>aero/qbar-psf</property>
					<property>metrics/Sw-sqft</property>
					<difference>
						<property>velocities/mach</property>
						<value>0.11</value>
					</difference>
					<value>-1</value>
					<table>
						<independentVar lookup="row">aero/alpha-deg</independentVar>
						<independentVar lookup="column">aero/beta-deg</independentVar>
						<independentVar lookup="table">fcs/flap-pos-deg</independentVar>
						<tableData breakPoint="0">
							-15	0	15
							-5	0.0771312	0.0125963	0.0771312
							-4	0.0023359	0.0251733	0.0023359
							-3	-0.0491882	0.0348047	-0.0491882
							-2	0.0388157	0.0443372	0.0388157
							-1	0.0353066	0.0540276	0.0353066
							0	0.0520313	0.0637476	0.0520313
							1	0.0497238	0.0735163	0.0497238
							2	0.0742602	0.0830593	0.0742602
							3	0.0620192	0.0929024	0.0620192
							4	0.0776439	0.1022292	0.0776439
							5	0.2038878	0.111248	0.2038878
							6	0.1401259	0.1211012	0.1401259
							7	0.1351332	0.1305645	0.1351332
							8	0.1326882	0.1395828	0.1326882
							9	0.140363	0.1495385	0.140363
							10	0.1449263	0.157871	0.1449263
							11	0.1555616	0.1675464	0.1555616
							12	0.1585838	0.1759566	0.1585838
							13	0.151409	0.0655349	0.151409
							14	0.1137854	0.0365585	0.1137854
							15	0.049493	0.0240903	0.049493
							16	0.040906	0.0133057	0.040906
							17	0.0193211	0.0115433	0.0193211
							18	0.0204917	0.0063464	0.0204917
							19	0.055843	0.0106041	0.055843
							20	-0.004158	0.0062954	-0.004158
						</tableData>
						<tableData breakPoint="30">
							-15	0	15
							-5	0.0719174	0.0719174	0.0719174
							-4	0.0836329	0.0836329	0.0836329
							-3	0.078844	0.078844	0.078844
							-2	0.0922384	0.0922384	0.0922384
							-1	0.1039337	0.1039337	0.1039337
							0	0.1231989	0.1231989	0.1231989
							1	0.1274762	0.1274762	0.1274762
							2	0.1383784	0.1383784	0.1383784
							3	0.0635628	0.0635628	0.0635628
							4	0.1523444	0.1523444	0.1523444
							5	0.16751	0.16751	0.16751
							6	0.1695839	0.1695839	0.1695839
							7	0.2192049	0.2192049	0.2192049
							8	0.1875589	0.1875589	0.1875589
							9	0.1455595	0.1455595	0.1455595
							10	0.1115665	0.1115665	0.1115665
							11	0.0761677	0.0761677	0.0761677
							12	0.082322	0.082322	0.082322
							13	0.088505	0.088505	0.088505
							14	0.0573773	0.0573773	0.0573773
							15	0.0582249	0.0582249	0.0582249
							16	0.0350524	0.0350524	0.0350524
							17	0.0379154	0.0379154	0.0379154
							18	0.0210111	0.0210111	0.0210111
							19	0.0238537	0.0238537	0.0238537
							20	0.007197	0.007197	0.007197
						</tableData>
					</table>
				</product>
			</function>

			<function name="aero/force/Z_elevator">
				<description>Lift due to Elevator Deflection</description>
				<product>
					<property>aero/qbar-psf</property>
					<property>metrics/Sw-sqft</property>
					<property>fcs/elevator-pos-rad</property>
					<value>1</value>
					<table>
						<independentVar lookup="row">aero/alpha-deg</independentVar>
						<independentVar lookup="column">aero/beta-deg</independentVar>
						<independentVar lookup="table">fcs/flap-pos-deg</independentVar>
						<tableData breakPoint="0">
							-15	0	15
							-5	-0.6993368	-0.6993368	-0.6993368
							-4	-0.7311968	-0.7311968	-0.7311968
							-3	-0.7319463	-0.7319463	-0.7319463
							-2	-0.7351943	-0.7351943	-0.7351943
							-1	-0.7359552	-0.7359552	-0.7359552
							0	-0.7379692	-0.7379692	-0.7379692
							1	-0.7392149	-0.7392149	-0.7392149
							2	-0.7392056	-0.7392056	-0.7392056
							3	-0.7393731	-0.7393731	-0.7393731
							4	-0.7392782	-0.7392782	-0.7392782
							5	-0.743064	-0.743064	-0.743064
							6	-0.73789	-0.73789	-0.73789
							7	-0.735822	-0.735822	-0.735822
							8	-0.7315733	-0.7315733	-0.7315733
							9	-0.7295896	-0.7295896	-0.7295896
							10	-0.7324257	-0.7324257	-0.7324257
							11	-0.7316806	-0.7316806	-0.7316806
							12	-0.7263961	-0.7263961	-0.7263961
							13	-0.6951303	-0.6951303	-0.6951303
							14	-0.6813243	-0.6813243	-0.6813243
							15	-0.673321	-0.673321	-0.673321
							16	-0.6691892	-0.6691892	-0.6691892
							17	-0.6675108	-0.6675108	-0.6675108
							18	-0.6589589	-0.6589589	-0.6589589
							19	-0.6531074	-0.6531074	-0.6531074
							20	-0.653356	-0.653356	-0.653356
						</tableData>
						<tableData breakPoint="30">
							-15	0	15
							-5	-0.7298954	-0.7298954	-0.7298954
							-4	-0.7637725	-0.7637725	-0.7637725
							-3	-0.7707379	-0.7707379	-0.7707379
							-2	-0.6897191	-0.6897191	-0.6897191
							-1	-0.7234063	-0.7234063	-0.7234063
							0	-0.7975035	-0.7975035	-0.7975035
							1	-0.7371457	-0.7371457	-0.7371457
							2	-0.7200408	-0.7200408	-0.7200408
							3	-0.8988086	-0.8988086	-0.8988086
							4	-0.701425	-0.701425	-0.701425
							5	-0.6939945	-0.6939945	-0.6939945
							6	-0.6828212	-0.6828212	-0.6828212
							7	-0.7209893	-0.7209893	-0.7209893
							8	-0.6933147	-0.6933147	-0.6933147
							9	-0.7263577	-0.7263577	-0.7263577
							10	-0.7149218	-0.7149218	-0.7149218
							11	-0.709989	-0.709989	-0.709989
							12	-0.7010957	-0.7010957	-0.7010957
							13	-0.6502522	-0.6502522	-0.6502522
							14	-0.6838112	-0.6838112	-0.6838112
							15	-0.6877816	-0.6877816	-0.6877816
							16	-0.6717895	-0.6717895	-0.6717895
							17	-0.6738496	-0.6738496	-0.6738496
							18	-0.6706021	-0.6706021	-0.6706021
							19	-0.6706403	-0.6706403	-0.6706403
							20	-0.6554134	-0.6554134	-0.6554134
						</tableData>
					</table>
				</product>
			</function>
		</axis>

		<property>aero/force/testwindmill-enabled</property>

		<axis name="X">
			<function name="aero/force/X_base">
				<description>X base</description>
				<product>
					<property>aero/qbar-psf</property>
					<property>metrics/Sw-sqft</property>
					<value>-1</value>
					<table>
						<independentVar lookup="row">aero/alpha-deg</independentVar>
						<independentVar lookup="column">aero/beta-deg</independentVar>
						<independentVar lookup="table">fcs/flap-pos-deg</independentVar>
						<tableData breakPoint="0">
							-15	0	15
							-5	-0.0054086	0.01321	-0.0054086
							-4	-0.0014377	0.0179844	-0.0014377
							-3	0.0021771	0.0207129	0.0021771
							-2	0.0021272	0.0210557	0.0021272
							-1	0.0024903	0.0190004	0.0024903
							0	0.0007692	0.0145322	0.0007692
							1	-0.0039447	0.0076529	-0.0039447
							2	-0.0202303	-0.0016324	-0.0202303
							3	-0.0281139	-0.0133282	-0.0281139
							4	-0.0404613	-0.0274008	-0.0404613
							5	-0.0537792	-0.0438925	-0.0537792
							6	-0.0719836	-0.0627473	-0.0719836
							7	-0.0910926	-0.0839804	-0.0910926
							8	-0.1138094	-0.1075597	-0.1138094
							9	-0.1379969	-0.1334858	-0.1379969
							10	-0.1640807	-0.1617518	-0.1640807
							11	-0.1924787	-0.1922952	-0.1924787
							12	-0.222799	-0.2251255	-0.222799
							13	-0.2551495	-0.2579137	-0.2551495
							14	-0.2873148	-0.284998	-0.2873148
							15	-0.3178542	-0.3108727	-0.3178542
							16	-0.3450946	-0.3362545	-0.3450946
							17	-0.3707485	-0.3612019	-0.3707485
							18	-0.3950949	-0.3857575	-0.3950949
							19	-0.4210436	-0.4100182	-0.4210436
							20	-0.4455613	-0.4339925	-0.4455613
						</tableData>
						<tableData breakPoint="30">
							-15	0	15
							-5	0.0556163	0.0833909	0.0556163
							-4	0.068986	0.082146	0.068986
							-3	0.0539894	0.0771519	0.0539894
							-2	0.0506167	0.0712641	0.0506167
							-1	0.0400373	0.0647826	0.0400373
							0	0.0367734	0.0558425	0.0367734
							1	0.0304835	0.0440834	0.0304835
							2	0.0056358	0.0295458	0.0056358
							3	-0.0057675	0.0134029	-0.0057675
							4	-0.0247619	-0.005929	-0.0247619
							5	-0.0471288	-0.0289784	-0.0471288
							6	-0.0675889	-0.0525005	-0.0675889
							7	-0.0950257	-0.07777	-0.0950257
							8	-0.1160082	-0.1060668	-0.1160082
							9	-0.142091	-0.1359518	-0.142091
							10	-0.1753001	-0.1671069	-0.1753001
							11	-0.2066785	-0.1990302	-0.2066785
							12	-0.2386267	-0.2313911	-0.2386267
							13	-0.2708824	-0.2645086	-0.2708824
							14	-0.3022814	-0.2978497	-0.3022814
							15	-0.3353971	-0.3311174	-0.3353971
							16	-0.3689372	-0.364586	-0.3689372
							17	-0.4030585	-0.3972265	-0.4030585
							18	-0.4359333	-0.4296883	-0.4359333
							19	-0.4686432	-0.4611699	-0.4686432
							20	-0.5010355	-0.4924521	-0.5010355
						</tableData>
					</table>
					<!--<table>
					<independentVar lookup="row">damage/left-wing-ripped-off</independentVar>
					<independentVar lookup="column">damage/right-wing-ripped-off</independentVar>
						<tableData>
						0	1
						0	1	0.6
						1	0.6	0.2
						</tableData>
					</table>-->
				</product>
			</function>

			<function name="aero/force/X_cowlflaps">
			<description>Drag due to cowl flaps</description>
				<product>
					<property>aero/qbar-psf</property>
					<property>metrics/Sw-sqft</property>
					<property>propulsion/engine[0]/cowl-flaps-norm</property>
					<value>-0.0015</value>
				</product>
			</function>

			<function name="aero/force/X_correction">
			<description>X correction</description>
				<product>
					<property>aero/qbar-psf</property>
					<property>metrics/Sw-sqft</property>
					<value>-0.00818</value>
				</product>
			</function>

			<function name="aero/force/X_gear">
				<description>Drag due to gear</description>
				<product>
					<property>aero/qbar-psf</property>
					<property>metrics/Sw-sqft</property>
					<table>
						<value>-1</value>
						<independentVar lookup="row">gear/gear-pos-norm</independentVar>
						<tableData>
						0	0
						0.3	2
						1	1
						</tableData>
					</table>
					<value>0.011</value>
				</product>
			</function>

			<function name="aero/force/X_pitch">
				<description>Roll X due to pitch rate rate</description>
				<product>
					<property>aero/qbar-psf</property>
					<property>metrics/Sw-sqft</property>
					<property>velocities/p-aero-rad_sec</property>
					<value>-1</value>
					<table>
						<independentVar lookup="row">aero/alpha-deg</independentVar>
						<independentVar lookup="column">aero/beta-deg</independentVar>
						<independentVar lookup="table">fcs/flap-pos-deg</independentVar>
						<tableData breakPoint="0">
							-15	0	15
							-5	-0.0400411	-0.057396	-0.0400411
							-4	-0.1142279	-0.0496253	-0.1142279
							-3	-0.0640944	-0.0486486	-0.0640944
							-2	-0.0592274	-0.0468524	-0.0592274
							-1	-0.0597661	-0.0465522	-0.0597661
							0	-0.0403963	-0.0462696	-0.0403963
							1	-0.0594649	-0.045814	-0.0594649
							2	-0.0611885	-0.0458093	-0.0611885
							3	-0.0873453	-0.0457571	-0.0873453
							4	-0.0726847	-0.0460507	-0.0726847
							5	-0.085727	-0.0459042	-0.085727
							6	-0.0675335	-0.0458577	-0.0675335
							7	-0.0673362	-0.0452101	-0.0673362
							8	-0.0552243	-0.0454862	-0.0552243
							9	-0.0534368	-0.0459321	-0.0534368
							10	-0.0503023	-0.0451392	-0.0503023
							11	-0.0502694	-0.0452824	-0.0502694
							12	-0.0498263	-0.0135649	-0.0498263
							13	-0.0070478	0.0305705	-0.0070478
							14	0.0389997	0.0177755	0.0389997
							15	0.04	0.0123358	0.04
							16	0.0271883	0.0101829	0.0271883
							17	0.0087899	0.0058814	0.0087899
							18	0.006	0.0063136	0.006
							19	0.0077255	0.0070619	0.0077255
							20	0.0067101	0.0055942	0.0067101
						</tableData>
						<tableData breakPoint="30">
							-15	0	15
							-5	-0.044119	-0.044119	-0.044119
							-4	0.0453386	0.0453386	0.0453386
							-3	-0.0800887	-0.0800887	-0.0800887
							-2	-0.0648399	-0.0648399	-0.0648399
							-1	-0.0316303	-0.0316303	-0.0316303
							0	-0.0365022	-0.0365022	-0.0365022
							1	-0.043694	-0.043694	-0.043694
							2	-0.0437821	-0.0437821	-0.0437821
							3	-0.0301248	-0.0301248	-0.0301248
							4	-0.0517544	-0.0517544	-0.0517544
							5	-0.0217304	-0.0217304	-0.0217304
							6	-0.0767672	-0.0767672	-0.0767672
							7	-0.052927	-0.052927	-0.052927
							8	-0.0623061	-0.0623061	-0.0623061
							9	-0.0363554	-0.0363554	-0.0363554
							10	-0.0333584	-0.0333584	-0.0333584
							11	-0.0301048	-0.0301048	-0.0301048
							12	-0.0323208	-0.0323208	-0.0323208
							13	-0.0333421	-0.0333421	-0.0333421
							14	-0.0290019	-0.0290019	-0.0290019
							15	-0.0149768	-0.0149768	-0.0149768
							16	-0.0002539	-0.0002539	-0.0002539
							17	0.0027518	0.0027518	0.0027518
							18	0.007523	0.007523	0.007523
							19	0.0078748	0.0078748	0.0078748
							20	0.0068617	0.0068617	0.0068617
						</tableData>
					</table>
				</product>
			</function>

			<function name="aero/force/X_elevator">
				<description>X due to Elevator Deflection</description>
				<product>
					<property>aero/qbar-psf</property>
					<property>metrics/Sw-sqft</property>
					<abs><property>fcs/elevator-pos-rad</property></abs>
					<value>-1</value>
					<table>
						<independentVar lookup="row">aero/alpha-deg</independentVar>
						<independentVar lookup="column">aero/beta-deg</independentVar>
						<independentVar lookup="table">fcs/flap-pos-deg</independentVar>
						<tableData breakPoint="0">
							-15	0	15
							-5	-0.0205686	-0.0205686	-0.0205686
							-4	-0.017802	-0.017802	-0.017802
							-3	-0.012996	-0.012996	-0.012996
							-2	-0.0087109	-0.0087109	-0.0087109
							-1	-0.0040161	-0.0040161	-0.0040161
							0	0.000581	0.000581	0.000581
							1	0.0052632	0.0052632	0.0052632
							2	0.0099409	0.0099409	0.0099409
							3	0.0146747	0.0146747	0.0146747
							4	0.0196696	0.0196696	0.0196696
							5	0.0243814	0.0243814	0.0243814
							6	0.0290268	0.0290268	0.0290268
							7	0.0336938	0.0336938	0.0336938
							8	0.0382125	0.0382125	0.0382125
							9	0.0429309	0.0429309	0.0429309
							10	0.0478334	0.0478334	0.0478334
							11	0.0527597	0.0527597	0.0527597
							12	0.057218	0.057218	0.057218
							13	0.0571675	0.0571675	0.0571675
							14	0.0590504	0.0590504	0.0590504
							15	0.0617558	0.0617558	0.0617558
							16	0.0650385	0.0650385	0.0650385
							17	0.0683469	0.0683469	0.0683469
							18	0.0709957	0.0709957	0.0709957
							19	0.0741775	0.0741775	0.0741775
							20	0.0780672	0.0780672	0.0780672
						</tableData>
						<tableData breakPoint="30">
							-15	0	15
							-5	-0.0252542	-0.0252542	-0.0252542
							-4	-0.0042498	-0.0042498	-0.0042498
							-3	-0.0126436	-0.0126436	-0.0126436
							-2	-0.0146014	-0.0146014	-0.0146014
							-1	-0.0134372	-0.0134372	-0.0134372
							0	-0.0222597	-0.0222597	-0.0222597
							1	-0.0006074	-0.0006074	-0.0006074
							2	0.0050047	0.0050047	0.0050047
							3	-0.0062889	-0.0062889	-0.0062889
							4	0.0065393	0.0065393	0.0065393
							5	0.0243947	0.0243947	0.0243947
							6	0.0107747	0.0107747	0.0107747
							7	0.029121	0.029121	0.029121
							8	0.1098475	0.1098475	0.1098475
							9	0.0365418	0.0365418	0.0365418
							10	0.0404424	0.0404424	0.0404424
							11	0.0441616	0.0441616	0.0441616
							12	0.0478437	0.0478437	0.0478437
							13	0.0473322	0.0473322	0.0473322
							14	0.0543309	0.0543309	0.0543309
							15	0.0585019	0.0585019	0.0585019
							16	0.0605179	0.0605179	0.0605179
							17	0.0643863	0.0643863	0.0643863
							18	0.0677374	0.0677374	0.0677374
							19	0.0711621	0.0711621	0.0711621
							20	0.0730477	0.0730477	0.0730477
						</tableData>
					</table>
				</product>
			</function>

			<function name="aero/force/X_aileron">
				<description>Drag due to aileron Deflection</description>
				<product>
					<property>aero/qbar-psf</property>
					<property>metrics/Sw-sqft</property>
					<abs><property>fcs/left-aileron-pos-rad</property></abs>
					<value>-1</value>
					<table>
						<independentVar lookup="row">aero/alpha-deg</independentVar>
						<independentVar lookup="column">aero/beta-deg</independentVar>
						<independentVar lookup="table">fcs/flap-pos-deg</independentVar>
						<tableData breakPoint="0">
							-15	0	15
							-5	-0.0205686	-0.0205686	-0.0205686
							-4	-0.017802	-0.017802	-0.017802
							-3	-0.012996	-0.012996	-0.012996
							-2	-0.0087109	-0.0087109	-0.0087109
							-1	-0.0040161	-0.0040161	-0.0040161
							0	0.000581	0.000581	0.000581
							1	0.0052632	0.0052632	0.0052632
							2	0.0099409	0.0099409	0.0099409
							3	0.0146747	0.0146747	0.0146747
							4	0.0196696	0.0196696	0.0196696
							5	0.0243814	0.0243814	0.0243814
							6	0.0290268	0.0290268	0.0290268
							7	0.0336938	0.0336938	0.0336938
							8	0.0382125	0.0382125	0.0382125
							9	0.0429309	0.0429309	0.0429309
							10	0.0478334	0.0478334	0.0478334
							11	0.0527597	0.0527597	0.0527597
							12	0.057218	0.057218	0.057218
							13	0.0571675	0.0571675	0.0571675
							14	0.0590504	0.0590504	0.0590504
							15	0.0617558	0.0617558	0.0617558
							16	0.0650385	0.0650385	0.0650385
							17	0.0683469	0.0683469	0.0683469
							18	0.0709957	0.0709957	0.0709957
							19	0.0741775	0.0741775	0.0741775
							20	0.0780672	0.0780672	0.0780672
						</tableData>
						<tableData breakPoint="30">
							-15	0	15
							-5	-0.0252542	-0.0252542	-0.0252542
							-4	-0.0042498	-0.0042498	-0.0042498
							-3	-0.0126436	-0.0126436	-0.0126436
							-2	-0.0146014	-0.0146014	-0.0146014
							-1	-0.0134372	-0.0134372	-0.0134372
							0	-0.0222597	-0.0222597	-0.0222597
							1	-0.0006074	-0.0006074	-0.0006074
							2	0.0050047	0.0050047	0.0050047
							3	-0.0062889	-0.0062889	-0.0062889
							4	0.0065393	0.0065393	0.0065393
							5	0.0243947	0.0243947	0.0243947
							6	0.0107747	0.0107747	0.0107747
							7	0.029121	0.029121	0.029121
							8	0.1098475	0.1098475	0.1098475
							9	0.0365418	0.0365418	0.0365418
							10	0.0404424	0.0404424	0.0404424
							11	0.0441616	0.0441616	0.0441616
							12	0.0478437	0.0478437	0.0478437
							13	0.0473322	0.0473322	0.0473322
							14	0.0543309	0.0543309	0.0543309
							15	0.0585019	0.0585019	0.0585019
							16	0.0605179	0.0605179	0.0605179
							17	0.0643863	0.0643863	0.0643863
							18	0.0677374	0.0677374	0.0677374
							19	0.0711621	0.0711621	0.0711621
							20	0.0730477	0.0730477	0.0730477
						</tableData>
					</table>
				</product>
			</function>
			<function name="aero/force/X_rudder">
				<description>Drag due to rudder deflection</description>
				<product>
					<property>aero/qbar-psf</property>
					<property>metrics/Sw-sqft</property>
					<abs><property>fcs/rudder-pos-rad</property></abs>
					<value>-1</value>
					<table>
						<independentVar lookup="row">aero/alpha-deg</independentVar>
						<independentVar lookup="column">aero/beta-deg</independentVar>
						<independentVar lookup="table">fcs/flap-pos-deg</independentVar>
						<tableData breakPoint="0">
							-15	0	15
							-5	-0.0205686	-0.0205686	-0.0205686
							-4	-0.017802	-0.017802	-0.017802
							-3	-0.012996	-0.012996	-0.012996
							-2	-0.0087109	-0.0087109	-0.0087109
							-1	-0.0040161	-0.0040161	-0.0040161
							0	0.000581	0.000581	0.000581
							1	0.0052632	0.0052632	0.0052632
							2	0.0099409	0.0099409	0.0099409
							3	0.0146747	0.0146747	0.0146747
							4	0.0196696	0.0196696	0.0196696
							5	0.0243814	0.0243814	0.0243814
							6	0.0290268	0.0290268	0.0290268
							7	0.0336938	0.0336938	0.0336938
							8	0.0382125	0.0382125	0.0382125
							9	0.0429309	0.0429309	0.0429309
							10	0.0478334	0.0478334	0.0478334
							11	0.0527597	0.0527597	0.0527597
							12	0.057218	0.057218	0.057218
							13	0.0571675	0.0571675	0.0571675
							14	0.0590504	0.0590504	0.0590504
							15	0.0617558	0.0617558	0.0617558
							16	0.0650385	0.0650385	0.0650385
							17	0.0683469	0.0683469	0.0683469
							18	0.0709957	0.0709957	0.0709957
							19	0.0741775	0.0741775	0.0741775
							20	0.0780672	0.0780672	0.0780672
						</tableData>
						<tableData breakPoint="30">
							-15	0	15
							-5	-0.0252542	-0.0252542	-0.0252542
							-4	-0.0042498	-0.0042498	-0.0042498
							-3	-0.0126436	-0.0126436	-0.0126436
							-2	-0.0146014	-0.0146014	-0.0146014
							-1	-0.0134372	-0.0134372	-0.0134372
							0	-0.0222597	-0.0222597	-0.0222597
							1	-0.0006074	-0.0006074	-0.0006074
							2	0.0050047	0.0050047	0.0050047
							3	-0.0062889	-0.0062889	-0.0062889
							4	0.0065393	0.0065393	0.0065393
							5	0.0243947	0.0243947	0.0243947
							6	0.0107747	0.0107747	0.0107747
							7	0.029121	0.029121	0.029121
							8	0.1098475	0.1098475	0.1098475
							9	0.0365418	0.0365418	0.0365418
							10	0.0404424	0.0404424	0.0404424
							11	0.0441616	0.0441616	0.0441616
							12	0.0478437	0.0478437	0.0478437
							13	0.0473322	0.0473322	0.0473322
							14	0.0543309	0.0543309	0.0543309
							15	0.0585019	0.0585019	0.0585019
							16	0.0605179	0.0605179	0.0605179
							17	0.0643863	0.0643863	0.0643863
							18	0.0677374	0.0677374	0.0677374
							19	0.0711621	0.0711621	0.0711621
							20	0.0730477	0.0730477	0.0730477
						</tableData>
					</table>
				<!--	<table>
					<independentVar lookup="row">fcs/flap-pos-deg</independentVar>
						<tableData>
						0	0.0006787
						30	0.0027478
						</tableData>
					</table>	-->
				</product>
			</function>

			<function name="aero/force/testwindmill">	<!--	delete when prop Correct 	-->
				<description>X due to windmilling propeller</description>
				<product>
					<property>aero/qbar-psf</property>
					<property>metrics/Sw-sqft</property>
					<table>
						<independentVar>propulsion/engine/propeller-rpm</independentVar>
						<tableData>
							0	1
							100	0
						</tableData>
					</table>
					<value>-1</value>
					<value>0.02</value>
					<value>0.6</value>	<!--	tuning	-->
					<property>aero/force/testwindmill-enabled</property>
				</product>
			</function>
		</axis>

		<axis name="Y">
			<function name="aero/force/Y_base">
				<description>Side Y due to beta</description>
				<product>
					<property>aero/qbar-psf</property>
					<property>metrics/Sw-sqft</property>
					<table>
						<independentVar lookup="row">aero/alpha-deg</independentVar>
						<independentVar lookup="column">aero/beta-deg</independentVar>
						<independentVar lookup="table">fcs/flap-pos-deg</independentVar>
						<tableData breakPoint="0">
							-15	0	15
							-5	0.0685269	-1.4E-05	-0.0685269
							-4	0.0716186	3E-07	-0.0716186
							-3	0.073989	-5E-07	-0.073989
							-2	0.0734747	-8E-07	-0.0734747
							-1	0.0754423	-2.5E-06	-0.0754423
							0	0.0670965	-3.5E-06	-0.0670965
							1	0.0713589	-3.6E-06	-0.0713589
							2	0.0745373	-3.6E-06	-0.0745373
							3	0.0735414	-2.8E-06	-0.0735414
							4	0.0641056	-7E-06	-0.0641056
							5	0.0660857	-3.71E-05	-0.0660857
							6	0.0671951	-5.8E-06	-0.0671951
							7	0.0686213	-1E-06	-0.0686213
							8	0.0701731	-6.3E-06	-0.0701731
							9	0.0704555	-2.86E-05	-0.0704555
							10	0.0706317	-5.34E-05	-0.0706317
							11	0.0703799	5.5E-06	-0.0703799
							12	0.0700215	-1.88E-05	-0.0700215
							13	0.0703012	-1.16E-05	-0.0703012
							14	0.0708188	-8.5E-06	-0.0708188
							15	0.0714856	1.85E-05	-0.0714856
							16	0.0726216	-2.8E-06	-0.0726216
							17	0.0734486	-5.68E-05	-0.0734486
							18	0.0725237	1.66E-05	-0.0725237
							19	0.0704344	1.89E-05	-0.0704344
							20	0.0692155	-3E-05	-0.0692155
						</tableData>
						<tableData breakPoint="30">
							-15	0	15
							-5	0.0743745	-0.0001389	-0.0748749
							-4	0.0725104	0.0002442	-0.07234
							-3	0.0747201	-0.0002703	-0.0771429
							-2	0.0877156	-6.14E-05	-0.0789471
							-1	0.0785153	-2.19E-05	-0.0766075
							0	0.0758968	0.0002553	-0.0452391
							1	0.0688118	0.0001832	-0.0657929
							2	0.0733563	2.81E-05	-0.0750405
							3	0.0825374	0.0004499	-0.0768152
							4	0.0823919	9.99E-05	-0.0821025
							5	0.0786046	-5.08E-05	-0.0763863
							6	0.0844779	0.0001398	-0.0825611
							7	0.0519481	-0.0002537	-0.0790576
							8	0.0814571	0.0002453	-0.0774566
							9	0.077153	0.0001268	-0.0615744
							10	0.0838775	3.65E-05	-0.0837705
							11	0.0860047	-3.9E-06	-0.085243
							12	0.0839182	-2.93E-05	-0.0839307
							13	0.0842087	2.53E-05	-0.0841351
							14	0.0820784	3.33E-05	-0.0819299
							15	0.0815398	-5.6E-05	-0.0815116
							16	0.0813315	1.61E-05	-0.0813461
							17	0.0810043	-3.14E-05	-0.0809625
							18	0.0803023	-3.45E-05	-0.0804557
							19	0.0808065	-4.43E-05	-0.0809677
							20	0.0813026	-3.35E-05	-0.0815265
						</tableData>
					</table>
				</product>
			</function>

			<function name="aero/force/Y_roll">
				<description>Roll side force due to roll rate</description>
				<product>
					<property>aero/qbar-psf</property>
					<property>metrics/Sw-sqft</property>
					<value>1</value>
					<property>velocities/p-aero-rad_sec</property>
					<table>
						<independentVar lookup="row">aero/alpha-deg</independentVar>
						<independentVar lookup="column">aero/beta-deg</independentVar>
						<independentVar lookup="table">fcs/flap-pos-deg</independentVar>
						<tableData breakPoint="0">
							-15	0	15
							-5	-0.0859326	0.1116571	-0.0859326
							-4	-0.2196982	0.0846952	-0.2196982
							-3	0.039049	0.0799438	0.039049
							-2	0.1300414	0.0715291	0.1300414
							-1	0.0286799	0.0769403	0.0286799
							0	0.0330449	0.0873748	0.0330449
							1	0.1425391	0.0827565	0.1425391
							2	0.2251735	0.0924413	0.2251735
							3	0.1456104	0.1029228	0.1456104
							4	0.0120531	0.1116287	0.0120531
							5	0.0577614	0.1200501	0.0577614
							6	0.0739103	0.1110628	0.0739103
							7	0.0986004	0.0923511	0.0986004
							8	0.1225611	0.1599359	0.1225611
							9	0.1284185	0.1582589	0.1284185
							10	0.1266659	0.1384581	0.1266659
							11	0.1160511	0.1690329	0.1160511
							12	0.1014737	0.1121215	0.1014737
							13	0.0987302	0.109772	0.0987302
							14	0.1019026	0.0906756	0.1019026
							15	0.1063303	0.0690964	0.1063303
							16	0.1141373	0.0549043	0.1141373
							17	0.1109477	0.042322	0.1109477
							18	0.08	0.0318218	0.08
							19	0.0315104	0.0260113	0.0315104
							20	0.0626018	0.0281423	0.0626018
						</tableData>
						<tableData breakPoint="30">
							-15	0	15
							-5	0.1075092	0.1075092	0.1075092
							-4	0.1188146	0.1188146	0.1188146
							-3	0.1641481	0.1641481	0.1641481
							-2	0.1460719	0.1460719	0.1460719
							-1	0.0973962	0.0973962	0.0973962
							0	0.0597477	0.0597477	0.0597477
							1	0.1019035	0.1019035	0.1019035
							2	0.1460945	0.1460945	0.1460945
							3	0.152045	0.152045	0.152045
							4	0.1545869	0.1545869	0.1545869
							5	0.2209209	0.2209209	0.2209209
							6	0.2363435	0.2363435	0.2363435
							7	0.2340135	0.2340135	0.2340135
							8	0.2221603	0.2221603	0.2221603
							9	0.2344062	0.2344062	0.2344062
							10	0.2481002	0.2481002	0.2481002
							11	0.2601693	0.2601693	0.2601693
							12	0.2617073	0.2617073	0.2617073
							13	0.2446283	0.2446283	0.2446283
							14	0.2212953	0.2212953	0.2212953
							15	0.2114177	0.2114177	0.2114177
							16	0.1953973	0.1953973	0.1953973
							17	0.162941	0.162941	0.162941
							18	0.1494783	0.1494783	0.1494783
							19	0.135646	0.135646	0.135646
							20	0.1192039	0.1192039	0.1192039
						</tableData>
					</table>
				</product>
			</function>


			<function name="aero/force/side_yaw">
				<description>Roll side force due to yaw rate</description>
				<product>
					<property>aero/qbar-psf</property>
					<property>metrics/Sw-sqft</property>
					<property>velocities/r-aero-rad_sec</property>
					<value>1</value>
					<table>
						<independentVar lookup="row">aero/alpha-deg</independentVar>
						<independentVar lookup="column">aero/beta-deg</independentVar>
						<independentVar lookup="table">fcs/flap-pos-deg</independentVar>
						<tableData breakPoint="0">
							-15	0	15
							-5	-0.174399	-0.174399	-0.174399
							-4	-0.1813139	-0.1813139	-0.1813139
							-3	-0.1653486	-0.1653486	-0.1653486
							-2	-0.1687405	-0.1687405	-0.1687405
							-1	-0.1678187	-0.1678187	-0.1678187
							0	-0.166381	-0.166381	-0.166381
							1	-0.1645252	-0.1645252	-0.1645252
							2	-0.1621031	-0.1621031	-0.1621031
							3	-0.1598323	-0.1598323	-0.1598323
							4	-0.1569629	-0.1569629	-0.1569629
							5	-0.1517598	-0.1517598	-0.1517598
							6	-0.1525614	-0.1525614	-0.1525614
							7	-0.1495989	-0.1495989	-0.1495989
							8	-0.1471581	-0.1471581	-0.1471581
							9	-0.1412109	-0.1412109	-0.1412109
							10	-0.1411934	-0.1411934	-0.1411934
							11	-0.1429891	-0.1429891	-0.1429891
							12	-0.1372631	-0.1372631	-0.1372631
							13	-0.1363452	-0.1363452	-0.1363452
							14	-0.1321226	-0.1321226	-0.1321226
							15	-0.1305465	-0.1305465	-0.1305465
							16	-0.1270795	-0.1270795	-0.1270795
							17	-0.1209804	-0.1209804	-0.1209804
							18	-0.1208866	-0.1208866	-0.1208866
							19	-0.1195238	-0.1195238	-0.1195238
							20	-0.1149355	-0.1149355	-0.1149355
						</tableData>
						<tableData breakPoint="30">
							-15	0	15
							-5	-0.1786361	-0.1786361	-0.1786361
							-4	-0.1716133	-0.1716133	-0.1716133
							-3	-0.1747701	-0.1747701	-0.1747701
							-2	-0.1775913	-0.1775913	-0.1775913
							-1	-0.1630263	-0.1630263	-0.1630263
							0	-0.1657048	-0.1657048	-0.1657048
							1	-0.1789759	-0.1789759	-0.1789759
							2	-0.1536917	-0.1536917	-0.1536917
							3	-0.194939	-0.194939	-0.194939
							4	-0.145549	-0.145549	-0.145549
							5	-0.1635836	-0.1635836	-0.1635836
							6	-0.1566156	-0.1566156	-0.1566156
							7	-0.1379734	-0.1379734	-0.1379734
							8	-0.1583098	-0.1583098	-0.1583098
							9	-0.1444696	-0.1444696	-0.1444696
							10	-0.1394541	-0.1394541	-0.1394541
							11	-0.1394329	-0.1394329	-0.1394329
							12	-0.133542	-0.133542	-0.133542
							13	-0.1320772	-0.1320772	-0.1320772
							14	-0.1293796	-0.1293796	-0.1293796
							15	-0.1242108	-0.1242108	-0.1242108
							16	-0.1529027	-0.1529027	-0.1529027
							17	-0.1186102	-0.1186102	-0.1186102
							18	-0.1143133	-0.1143133	-0.1143133
							19	-0.1132462	-0.1132462	-0.1132462
							20	-0.1091993	-0.1091993	-0.1091993
						</tableData>
					</table>
				</product>
			</function>

			<function name="aero/force/Side_rudder">
				<description>Side force due to rudder deflection</description>
				<product>
					<property>aero/qbar-psf</property>
					<property>metrics/Sw-sqft</property>
					<property>fcs/rudder-pos-rad</property>
					<value>-1</value>
					<table>
						<independentVar lookup="row">aero/alpha-deg</independentVar>
						<independentVar lookup="column">aero/beta-deg</independentVar>
						<independentVar lookup="table">fcs/flap-pos-deg</independentVar>
						<tableData breakPoint="0">
							-15	0	15
							-5	-0.174399	-0.174399	-0.174399
							-4	-0.1813139	-0.1813139	-0.1813139
							-3	-0.1653486	-0.1653486	-0.1653486
							-2	-0.1687405	-0.1687405	-0.1687405
							-1	-0.1678187	-0.1678187	-0.1678187
							0	-0.166381	-0.166381	-0.166381
							1	-0.1645252	-0.1645252	-0.1645252
							2	-0.1621031	-0.1621031	-0.1621031
							3	-0.1598323	-0.1598323	-0.1598323
							4	-0.1569629	-0.1569629	-0.1569629
							5	-0.1517598	-0.1517598	-0.1517598
							6	-0.1525614	-0.1525614	-0.1525614
							7	-0.1495989	-0.1495989	-0.1495989
							8	-0.1471581	-0.1471581	-0.1471581
							9	-0.1412109	-0.1412109	-0.1412109
							10	-0.1411934	-0.1411934	-0.1411934
							11	-0.1429891	-0.1429891	-0.1429891
							12	-0.1372631	-0.1372631	-0.1372631
							13	-0.1363452	-0.1363452	-0.1363452
							14	-0.1321226	-0.1321226	-0.1321226
							15	-0.1305465	-0.1305465	-0.1305465
							16	-0.1270795	-0.1270795	-0.1270795
							17	-0.1209804	-0.1209804	-0.1209804
							18	-0.1208866	-0.1208866	-0.1208866
							19	-0.1195238	-0.1195238	-0.1195238
							20	-0.1149355	-0.1149355	-0.1149355
						</tableData>
						<tableData breakPoint="30">
							-15	0	15
							-5	-0.1786361	-0.1786361	-0.1786361
							-4	-0.1716133	-0.1716133	-0.1716133
							-3	-0.1747701	-0.1747701	-0.1747701
							-2	-0.1775913	-0.1775913	-0.1775913
							-1	-0.1630263	-0.1630263	-0.1630263
							0	-0.1657048	-0.1657048	-0.1657048
							1	-0.1789759	-0.1789759	-0.1789759
							2	-0.1536917	-0.1536917	-0.1536917
							3	-0.194939	-0.194939	-0.194939
							4	-0.145549	-0.145549	-0.145549
							5	-0.1635836	-0.1635836	-0.1635836
							6	-0.1566156	-0.1566156	-0.1566156
							7	-0.1379734	-0.1379734	-0.1379734
							8	-0.1583098	-0.1583098	-0.1583098
							9	-0.1444696	-0.1444696	-0.1444696
							10	-0.1394541	-0.1394541	-0.1394541
							11	-0.1394329	-0.1394329	-0.1394329
							12	-0.133542	-0.133542	-0.133542
							13	-0.1320772	-0.1320772	-0.1320772
							14	-0.1293796	-0.1293796	-0.1293796
							15	-0.1242108	-0.1242108	-0.1242108
							16	-0.1529027	-0.1529027	-0.1529027
							17	-0.1186102	-0.1186102	-0.1186102
							18	-0.1143133	-0.1143133	-0.1143133
							19	-0.1132462	-0.1132462	-0.1132462
							20	-0.1091993	-0.1091993	-0.1091993
						</tableData>
					</table>
				</product>
			</function>
		</axis>
		<axis name="ROLL">
			<function name="aero/moment/Roll_base">
				<description>Roll moment due to beta</description>
				<product>
					<property>aero/qbar-psf</property>
					<property>metrics/Sw-sqft</property>
					<property>metrics/bw-ft</property>
					<value>-1</value>
					<table>
						<independentVar lookup="row">aero/alpha-deg</independentVar>
						<independentVar lookup="column">aero/beta-deg</independentVar>
						<independentVar lookup="table">fcs/flap-pos-deg</independentVar>
						<tableData breakPoint="0">
							-15	0	15
							-5	-0.0077718	8.4E-06	0.0077718
							-4	-0.007762	-9E-07	0.007762
							-3	-0.0083632	-1.1E-06	0.0083632
							-2	-0.0088719	-1.4E-06	0.0088719
							-1	-0.0095073	-1.8E-06	0.0095073
							0	-0.0106095	-1.8E-06	0.0106095
							1	-0.0108173	-2E-06	0.0108173
							2	-0.0119165	-2E-06	0.0119165
							3	-0.01186	-1.9E-06	0.01186
							4	-0.0128923	-3.5E-06	0.0128923
							5	-0.013573	-2.8E-06	0.013573
							6	-0.0145257	-2.5E-06	0.0145257
							7	-0.014972	-3.9E-06	0.014972
							8	-0.0154637	-5.2E-06	0.0154637
							9	-0.016258	-5.5E-06	0.016258
							10	-0.0169884	-1.12E-05	0.0169884
							11	-0.0177547	-5.7E-06	0.0177547
							12	-0.0184522	-1.1E-05	0.0184522
							13	-0.0187151	-4.5E-06	0.0187151
							14	-0.0172257	-5.6E-06	0.0172257
							15	-0.014717	-1.5E-06	0.014717
							16	-0.0141816	-5.4E-06	0.0141816
							17	-0.0140064	-8.1E-06	0.0140064
							18	-0.0132648	-1E-06	0.0132648
							19	-0.0138627	-1.9E-06	0.0138627
							20	-0.0133136	-6.6E-06	0.0133136
						</tableData>
						<tableData breakPoint="30">
							-15	0	15
							-5	-0.0017842	2.2E-06	0.0016911
							-4	-0.001926	2.51E-05	0.001849
							-3	-0.0029072	-9.7E-06	0.0022503
							-2	-0.0011922	-7.3E-06	0.0026639
							-1	-0.0034117	2.29E-05	0.0028367
							0	-0.003932	2.68E-05	0.005145
							1	-0.0046936	1.17E-05	0.0047725
							2	-0.0047123	8.4E-06	0.0052023
							3	-0.0043168	0.0001298	0.0049512
							4	-0.0038799	3.89E-05	0.0037828
							5	-0.005946	-3.5E-06	0.0059211
							6	-0.0090564	-2.62E-05	0.0091611
							7	-0.0113007	-6.75E-05	0.0093921
							8	-0.0102679	2.6E-06	0.010389
							9	-0.0112919	-7E-07	0.011983
							10	-0.0117646	0	0.0119119
							11	-0.0120913	-2.1E-06	0.012298
							12	-0.0126614	-3.1E-06	0.0126415
							13	-0.013112	-6.5E-06	0.0131719
							14	-0.0125099	-1.67E-05	0.0125969
							15	-0.0134014	-8.2E-06	0.0134068
							16	-0.0139165	-9.2E-06	0.0139235
							17	-0.0146937	-6.2E-06	0.0146662
							18	-0.0146939	-1E-05	0.0146597
							19	-0.0149935	-8.6E-06	0.0149457
							20	-0.0153167	-4.2E-06	0.0152665
						</tableData>
					</table>
				</product>
			</function>


			<function name="aero/moment/Roll_damp">
				<description>Roll moment due to rollrate</description>
				<product>
					<property>aero/qbar-psf</property>
					<property>metrics/Sw-sqft</property>
					<property>metrics/bw-ft</property>
					<property>aero/bi2vel</property>
					<property>velocities/p-aero-rad_sec</property>
					<value>-1</value>
					<table>
						<independentVar lookup="row">aero/alpha-deg</independentVar>
						<independentVar lookup="column">aero/beta-deg</independentVar>
						<independentVar lookup="table">fcs/flap-pos-deg</independentVar>
						<tableData breakPoint="0">
							-15	0	15
							-5	0.4431081	0.4992559	0.4431081
							-4	0.466211	0.4994535	0.466211
							-3	0.4703968	0.5005716	0.4703968
							-2	0.4841407	0.5018952	0.4841407
							-1	0.4624065	0.5038113	0.4624065
							0	0.479181	0.5058224	0.479181
							1	0.5035438	0.5069283	0.5035438
							2	0.4956169	0.5088569	0.4956169
							3	0.5030808	0.5109116	0.5030808
							4	0.4981242	0.5127393	0.4981242
							5	0.4809649	0.5144362	0.4809649
							6	0.4838891	0.5157386	0.4838891
							7	0.4896984	0.5167147	0.4896984
							8	0.4960808	0.5199581	0.4960808
							9	0.498125	0.5215671	0.498125
							10	0.4942369	0.520246	0.4942369
							11	0.4892016	0.5178363	0.4892016
							12	0.4830031	0.4742968	0.4830031
							13	0.4390472	0.3887126	0.4390472
							14	0.3883623	0.3015417	0.3883623
							15	0.3395704	0.2384072	0.3395704
							16	0.267706	0.1884105	0.267706
							17	0.2068109	0.1532377	0.2068109
							18	0.17	0.1203289	0.17
							19	0.1217988	0.0947188	0.1217988
							20	0.0984821	0.0694905	0.0984821
						</tableData>
						<tableData breakPoint="30">
							-15	0	15
							-5	0.4862532	0.4901224	0.4654755
							-4	0.4758717	0.4818394	0.4763636
							-3	0.4835519	0.4910472	0.4798517
							-2	0.4619938	0.4966577	0.4853528
							-1	0.495702	0.4958706	0.4758828
							0	0.4891363	0.4864685	0.4650256
							1	0.4882236	0.5005308	0.475426
							2	0.4797988	0.506145	0.4815635
							3	0.4714011	0.5075241	0.4893838
							4	0.4289866	0.5063611	0.523901
							5	0.5109395	0.5271295	0.6550885
							6	0.5569811	0.5303429	0.488948
							7	0.517636	0.5300034	0.5031267
							8	0.4947619	0.5201493	0.5074737
							9	0.5033946	0.4968979	0.48719
							10	0.4986653	0.4526795	0.4906908
							11	0.4677621	0.4302635	0.4691964
							12	0.4409812	0.4126448	0.4258261
							13	0.4260439	0.4019422	0.4025133
							14	0.3896713	0.393146	0.3914196
							15	0.3821058	0.3714933	0.3739135
							16	0.3698656	0.3428204	0.3601948
							17	0.3509961	0.3035755	0.3400033
							18	0.3192701	0.2671673	0.3191244
							19	0.2832653	0.2364331	0.2877225
							20	0.2593313	0.2015241	0.2525561
						</tableData>
					</table>
				</product>
			</function>

			<function name="aero/moment/Roll_yaw">
				<description>Roll moment due to yaw rate</description>
				<product>
					<property>aero/qbar-psf</property>
					<property>metrics/Sw-sqft</property>
					<property>metrics/bw-ft</property>
					<property>aero/bi2vel</property>
					<property>velocities/r-aero-rad_sec</property>
					<value>-1</value>
					<table>
						<independentVar lookup="row">aero/alpha-deg</independentVar>
						<independentVar lookup="column">aero/beta-deg</independentVar>
						<independentVar lookup="table">fcs/flap-pos-deg</independentVar>
						<tableData breakPoint="0">
							-15	0	15
							-5	-0.0982055	-0.0865975	-0.0982055
							-4	-0.1025879	-0.0980032	-0.1025879
							-3	-0.1071277	-0.1085125	-0.1071277
							-2	-0.1177871	-0.1182881	-0.1177871
							-1	-0.1165563	-0.128165	-0.1165563
							0	-0.1362989	-0.138072	-0.1362989
							1	-0.1385844	-0.149338	-0.1385844
							2	-0.1569394	-0.1599743	-0.1569394
							3	-0.1579989	-0.1704428	-0.1579989
							4	-0.1752452	-0.1807949	-0.1752452
							5	-0.1913054	-0.1908048	-0.1913054
							6	-0.208214	-0.2013893	-0.208214
							7	-0.2087891	-0.2110452	-0.2087891
							8	-0.2129474	-0.2206614	-0.2129474
							9	-0.2219393	-0.2307815	-0.2219393
							10	-0.2311565	-0.2416881	-0.2311565
							11	-0.2410666	-0.2507669	-0.2410666
							12	-0.2576078	-0.2635215	-0.2576078
							13	-0.2705773	-0.3119826	-0.2705773
							14	-0.2944807	-0.3492156	-0.2944807
							15	-0.3247055	-0.3757891	-0.3247055
							16	-0.3578078	-0.3945362	-0.3578078
							17	-0.3818113	-0.4128225	-0.3818113
							18	-0.384201	-0.4287872	-0.384201
							19	-0.4110365	-0.441031	-0.4110365
							20	-0.4199696	-0.4525059	-0.4199696
						</tableData>
						<tableData breakPoint="30">
							-15	0	15
							-5	-0.1262688	-0.1358728	-0.1809237
							-4	-0.1397341	-0.1499338	-0.1955838
							-3	-0.14601	-0.1532077	-0.1547644
							-2	-0.1850875	-0.1613724	-0.1699862
							-1	-0.1774172	-0.1999153	-0.1642284
							0	-0.1963211	-0.1889663	-0.1939764
							1	-0.2023196	-0.1991982	-0.1996615
							2	-0.2234627	-0.2080331	-0.2023327
							3	-0.2342489	-0.2207216	-0.1926397
							4	-0.2671106	-0.2312981	-0.1833446
							5	-0.2751079	-0.2415075	-0.2051003
							6	-0.2449288	-0.2452928	-0.2547515
							7	-0.2367108	-0.2553402	-0.2569474
							8	-0.2643736	-0.2646456	-0.2682811
							9	-0.2834335	-0.2764424	-0.2869588
							10	-0.298042	-0.2973622	-0.2838067
							11	-0.3034506	-0.3181344	-0.3037128
							12	-0.322577	-0.3292488	-0.326927
							13	-0.3247885	-0.3352032	-0.3479342
							14	-0.3630179	-0.3474497	-0.347017
							15	-0.3822663	-0.3656637	-0.3569848
							16	-0.3944072	-0.391384	-0.3644529
							17	-0.3693679	-0.4101387	-0.3830295
							18	-0.3987843	-0.4302173	-0.3975539
							19	-0.4139677	-0.455451	-0.4182707
							20	-0.4383659	-0.4729851	-0.4354692
						</tableData>
					</table>
				</product>
			</function>

			<function name="aero/moment/Roll_aileron">
				<description>Roll moment due to aileron</description>
				<product>
					<property>aero/qbar-psf</property>
					<property>metrics/Sw-sqft</property>
					<property>metrics/bw-ft</property>
					<property>fcs/left-aileron-pos-rad</property>
					<value>1</value>
					<table>
						<independentVar lookup="row">aero/alpha-deg</independentVar>
						<independentVar lookup="column">aero/beta-deg</independentVar>
						<independentVar lookup="table">fcs/flap-pos-deg</independentVar>
						<tableData breakPoint="0">
							-15	0	15
							-5	0.2626116	0.2778954	0.2626116
							-4	0.2586275	0.279187	0.2586275
							-3	0.2514803	0.2798275	0.2514803
							-2	0.255843	0.2791058	0.255843
							-1	0.2570061	0.2788262	0.2570061
							0	0.2546203	0.2784404	0.2546203
							1	0.254499	0.2772183	0.254499
							2	0.2556252	0.2764357	0.2556252
							3	0.2518534	0.2744394	0.2518534
							4	0.2498898	0.2734792	0.2498898
							5	0.2486278	0.2732088	0.2486278
							6	0.2539959	0.2716355	0.2539959
							7	0.2477071	0.2705197	0.2477071
							8	0.2467656	0.2687931	0.2467656
							9	0.2440947	0.2682694	0.2440947
							10	0.2425871	0.2638454	0.2425871
							11	0.2410909	0.2615439	0.2410909
							12	0.2384485	0.2611757	0.2384485
							13	0.233714	0.2219706	0.233714
							14	0.2191308	0.1696063	0.2191308
							15	0.1842544	0.1180705	0.1842544
							16	0.1322728	0.0773842	0.1322728
							17	0.0815876	0.0741351	0.0815876
							18	0.1154879	0.0386137	0.1154879
							19	0.0490772	0.0379992	0.0490772
							20	0.0400568	0.0204132	0.0400568
						</tableData>
						<tableData breakPoint="30">
							-15	0	15
							-5	0.2801692	0.2801692	0.2801692
							-4	0.2785926	0.2785926	0.2785926
							-3	0.2827231	0.2827231	0.2827231
							-2	0.2825386	0.2825386	0.2825386
							-1	0.279169	0.279169	0.279169
							0	0.2787138	0.2787138	0.2787138
							1	0.2800961	0.2800961	0.2800961
							2	0.2755748	0.2755748	0.2755748
							3	0.2809209	0.2809209	0.2809209
							4	0.2741098	0.2741098	0.2741098
							5	0.2733185	0.2733185	0.2733185
							6	0.2737167	0.2737167	0.2737167
							7	0.2740981	0.2740981	0.2740981
							8	0.2717876	0.2717876	0.2717876
							9	0.2661434	0.2661434	0.2661434
							10	0.2530306	0.2530306	0.2530306
							11	0.232726	0.232726	0.232726
							12	0.2322007	0.2322007	0.2322007
							13	0.2290177	0.2290177	0.2290177
							14	0.2301444	0.2301444	0.2301444
							15	0.2194125	0.2194125	0.2194125
							16	0.172639	0.172639	0.172639
							17	0.1669639	0.1669639	0.1669639
							18	0.1266656	0.1266656	0.1266656
							19	0.115672	0.115672	0.115672
							20	0.076759	0.076759	0.076759
						</tableData>
					</table>
				</product>
			</function>


			<function name="aero/moment/Roll_rudder">
				<description>Roll moment due to rudder</description>
				<product>
					<property>aero/qbar-psf</property>
					<property>metrics/Sw-sqft</property>
					<property>metrics/bw-ft</property>
					<property>fcs/rudder-pos-rad</property>
					<value>-1</value>
					<table>
						<independentVar lookup="row">aero/alpha-deg</independentVar>
						<independentVar lookup="column">aero/beta-deg</independentVar>
						<independentVar lookup="table">fcs/flap-pos-deg</independentVar>
						<tableData breakPoint="0">
							-15	0	15
							-5	-0.001037	-0.001037	-0.001037
							-4	-0.0013251	-0.0013251	-0.0013251
							-3	-0.0010679	-0.0010679	-0.0010679
							-2	-0.0013253	-0.0013253	-0.0013253
							-1	-0.0014298	-0.0014298	-0.0014298
							0	-0.0015371	-0.0015371	-0.0015371
							1	-0.0015527	-0.0015527	-0.0015527
							2	-0.0016408	-0.0016408	-0.0016408
							3	-0.0016972	-0.0016972	-0.0016972
							4	-0.0017498	-0.0017498	-0.0017498
							5	-0.0018289	-0.0018289	-0.0018289
							6	-0.0018255	-0.0018255	-0.0018255
							7	-0.0018911	-0.0018911	-0.0018911
							8	-0.0019074	-0.0019074	-0.0019074
							9	-0.0017585	-0.0017585	-0.0017585
							10	-0.0019691	-0.0019691	-0.0019691
							11	-0.0022643	-0.0022643	-0.0022643
							12	-0.002056	-0.002056	-0.002056
							13	-0.002396	-0.002396	-0.002396
							14	-0.0022866	-0.0022866	-0.0022866
							15	-0.0025435	-0.0025435	-0.0025435
							16	-0.0025236	-0.0025236	-0.0025236
							17	-0.002248	-0.002248	-0.002248
							18	-0.0025317	-0.0025317	-0.0025317
							19	-0.0026851	-0.0026851	-0.0026851
							20	-0.0024892	-0.0024892	-0.0024892
						</tableData>
						<tableData breakPoint="30">
							-15	0	15
							-5	0.2801692	0.2801692	0.2801692
							-4	0.2785926	0.2785926	0.2785926
							-3	0.2827231	0.2827231	0.2827231
							-2	0.2825386	0.2825386	0.2825386
							-1	0.279169	0.279169	0.279169
							0	0.2787138	0.2787138	0.2787138
							1	0.2800961	0.2800961	0.2800961
							2	0.2755748	0.2755748	0.2755748
							3	0.2809209	0.2809209	0.2809209
							4	0.2741098	0.2741098	0.2741098
							5	0.2733185	0.2733185	0.2733185
							6	0.2737167	0.2737167	0.2737167
							7	0.2740981	0.2740981	0.2740981
							8	0.2717876	0.2717876	0.2717876
							9	0.2661434	0.2661434	0.2661434
							10	0.2530306	0.2530306	0.2530306
							11	0.232726	0.232726	0.232726
							12	0.2322007	0.2322007	0.2322007
							13	0.2290177	0.2290177	0.2290177
							14	0.2301444	0.2301444	0.2301444
							15	0.2194125	0.2194125	0.2194125
							16	0.172639	0.172639	0.172639
							17	0.1669639	0.1669639	0.1669639
							18	0.1266656	0.1266656	0.1266656
							19	0.115672	0.115672	0.115672
							20	0.076759	0.076759	0.076759
						</tableData>
					</table>
				</product>
			</function>

			<function name="aero/moment/Roll_asym_elev">
				<description>Roll moment due to asymmetric elevator</description>
				<product>
					<property>aero/qbar-psf</property>
					<property>metrics/Sw-sqft</property>
					<property>metrics/bw-ft</property>
					<value>0.00036</value>
				</product>
			</function>
		</axis>

		<axis name="PITCH">
			<function name="aero/moment/Pitch_base">
				<description>Pitch moment zero alpha</description>
				<product>
					<property>aero/qbar-psf</property>
					<property>metrics/Sw-sqft</property>
					<property>metrics/cbarw-ft</property>
					<table>
						<independentVar lookup="row">aero/alpha-deg</independentVar>
						<independentVar lookup="column">aero/beta-deg</independentVar>
						<independentVar lookup="table">fcs/flap-pos-deg</independentVar>
						<tableData breakPoint="0">
							-15	0	15
							-5	0.2435668	0.2872617	0.2435668
							-4	0.1588667	0.2826416	0.1588667
							-3	0.12	0.2658026	0.12
							-2	0.1008851	0.2475469	0.1008851
							-1	0.06	0.228567	0.06
							0	0.0309895	0.2090143	0.0309895
							1	0.01	0.1894542	0.01
							2	-0.04	0.1694964	-0.04
							3	-0.0514168	0.1493669	-0.0514168
							4	-0.0825834	0.1313457	-0.0825834
							5	-0.116864	0.1097384	-0.116864
							6	-0.090017	0.0890971	-0.090017
							7	-0.128285	0.067873	-0.128285
							8	-0.1360431	0.046612	-0.1360431
							9	-0.1569313	0.0253568	-0.1569313
							10	-0.1739435	0.003098	-0.1739435
							11	-0.1876519	-0.0184791	-0.1876519
							12	-0.215755	-0.0405056	-0.215755
							13	-0.2333717	-0.0637068	-0.2333717
							14	-0.2533362	-0.0895765	-0.2533362
							15	-0.2740164	-0.1159121	-0.2740164
							16	-0.2954771	-0.1430965	-0.2954771
							17	-0.3207958	-0.1717211	-0.3207958
							18	-0.327908	-0.2004615	-0.327908
							19	-0.3766274	-0.2291501	-0.3766274
							20	-0.4071399	-0.258796	-0.4071399
						</tableData>
						<tableData breakPoint="30">
							-15	0	15
							-5	1.0732062	0.4315664	1.1916494
							-4	0.5466187	0.4471112	0.5707558
							-3	0.5374199	0.4769405	0.5557584
							-2	0.7245416	0.4146552	0.5970707
							-1	0.41902	0.3461428	0.54254
							0	0.5112328	0.3226795	0.6725117
							1	0.5509174	0.3054925	0.5635423
							2	0.62631	0.2932955	0.5742051
							3	0.7382829	0.2244048	0.6028879
							4	0.7902984	0.2558414	0.8218659
							5	0.7367476	0.2488257	0.7611762
							6	0.4086231	0.2183258	0.5698432
							7	0.4867324	0.2624738	0.7250053
							8	0.626696	0.1764099	0.6595494
							9	0.760416	0.1524343	0.9363029
							10	0.0368867	0.1276818	-0.5054762
							11	-0.182162	0.1020568	-0.3028262
							12	-0.346696	0.076929	-0.3457082
							13	-0.3878877	0.0515348	-0.3669081
							14	-0.3873049	0.0262406	-0.3861767
							15	-0.3758946	-0.0013806	-0.3623738
							16	-0.3836527	-0.032059	-0.3715643
							17	-0.3423569	-0.0625078	-0.3325987
							18	-0.3622186	-0.0898285	-0.3500268
							19	-0.3532547	-0.1203948	-0.3426702
							20	-0.372756	-0.1520343	-0.3634475
						</tableData>
					</table>
				</product>
			</function>

			<function name="aero/moment/Pitch_test">
				<description>Pitch test moment for unknown geometric</description>
				<product>
					<property>aero/qbar-psf</property>
					<property>metrics/Sw-sqft</property>
					<property>metrics/cbarw-ft</property>
					<value>-0.1635</value>
				</product>
			</function>

			<function name="aero/moment/Pitch_elevator">
				<description>Pitch moment due to elevator</description>
				<product>
					<property>aero/qbar-psf</property>
					<property>metrics/Sw-sqft</property>
					<property>metrics/cbarw-ft</property>
					<property>fcs/elevator-pos-rad</property>
					<value>-1</value>
					<table>
						<independentVar lookup="row">aero/alpha-deg</independentVar>
						<independentVar lookup="column">aero/beta-deg</independentVar>
						<independentVar lookup="table">fcs/flap-pos-deg</independentVar>
						<tableData breakPoint="0">
							-15	0	15
							-5	1.9114819	1.9114819	1.9114819
							-4	1.9981587	1.9981587	1.9981587
							-3	1.999747	1.999747	1.999747
							-2	2.0048523	2.0048523	2.0048523
							-1	2.0043598	2.0043598	2.0043598
							0	2.0065327	2.0065327	2.0065327
							1	2.0071957	2.0071957	2.0071957
							2	2.0048615	2.0048615	2.0048615
							3	2.0028785	2.0028785	2.0028785
							4	1.9997104	1.9997104	1.9997104
							5	2.0040637	2.0040637	2.0040637
							6	1.9916036	1.9916036	1.9916036
							7	1.9848516	1.9848516	1.9848516
							8	1.9688956	1.9688956	1.9688956
							9	1.9645449	1.9645449	1.9645449
							10	1.9634845	1.9634845	1.9634845
							11	1.9608991	1.9608991	1.9608991
							12	1.9439796	1.9439796	1.9439796
							13	1.9353431	1.9353431	1.9353431
							14	1.9253881	1.9253881	1.9253881
							15	1.9100316	1.9100316	1.9100316
							16	1.9003738	1.9003738	1.9003738
							17	1.8914782	1.8914782	1.8914782
							18	1.8714515	1.8714515	1.8714515
							19	1.8518922	1.8518922	1.8518922
							20	1.8515875	1.8515875	1.8515875
						</tableData>
						<tableData breakPoint="30">
							-15	0	15
							-5	1.9939997	1.9939997	1.9939997
							-4	2.0760531	2.0760531	2.0760531
							-3	2.1192336	2.1192336	2.1192336
							-2	1.8835764	1.8835764	1.8835764
							-1	1.9954784	1.9954784	1.9954784
							0	2.1963298	2.1963298	2.1963298
							1	2.0003622	2.0003622	2.0003622
							2	1.9588627	1.9588627	1.9588627
							3	2.4321904	2.4321904	2.4321904
							4	1.922223	1.922223	1.922223
							5	1.871809	1.871809	1.871809
							6	1.9157935	1.9157935	1.9157935
							7	1.9036268	1.9036268	1.9036268
							8	1.8485116	1.8485116	1.8485116
							9	1.9645883	1.9645883	1.9645883
							10	1.9652364	1.9652364	1.9652364
							11	1.9625269	1.9625269	1.9625269
							12	1.9504006	1.9504006	1.9504006
							13	1.7859263	1.7859263	1.7859263
							14	1.9087754	1.9087754	1.9087754
							15	1.9180262	1.9180262	1.9180262
							16	1.8882122	1.8882122	1.8882122
							17	1.8889059	1.8889059	1.8889059
							18	1.8789003	1.8789003	1.8789003
							19	1.8734298	1.8734298	1.8734298
							20	1.8410799	1.8410799	1.8410799
						</tableData>
					</table>
					<table>
						<independentVar lookup="row">aero/beta-rad</independentVar>
						<tableData>
						-3.14	-1
						-1.57	0
						-0.5	1
						0	1
						0.5	1
						1.57	0
						3.14	-1
						</tableData>
					</table>
				</product>
			</function>

			<function name="aero/moment/Pitch_damp">
				<description>Pitch moment due to pitch rate</description>
				<product>
					<property>aero/qbar-psf</property>
					<property>metrics/Sw-sqft</property>
					<property>metrics/cbarw-ft</property>
					<property>aero/ci2vel</property>
					<property>velocities/q-aero-rad_sec</property>
					<table>
						<independentVar lookup="row">aero/alpha-deg</independentVar>
						<independentVar lookup="column">aero/beta-deg</independentVar>
						<independentVar lookup="table">fcs/flap-pos-deg</independentVar>
						<tableData breakPoint="0">
							-15	0	15
							-5	-15.3385669	-15.3385669	-15.3385669
							-4	-16.8855207	-16.8855207	-16.8855207
							-3	-17.1267708	-17.1267708	-17.1267708
							-2	-17.220758	-17.220758	-17.220758
							-1	-17.2725208	-17.2725208	-17.2725208
							0	-17.2838807	-17.2838807	-17.2838807
							1	-17.344712	-17.344712	-17.344712
							2	-17.3898554	-17.3898554	-17.3898554
							3	-17.5742682	-17.5742682	-17.5742682
							4	-17.6287752	-17.6287752	-17.6287752
							5	-17.5599774	-17.5599774	-17.5599774
							6	-17.6426729	-17.6426729	-17.6426729
							7	-17.6927509	-17.6927509	-17.6927509
							8	-17.7052813	-17.7052813	-17.7052813
							9	-17.7855336	-17.7855336	-17.7855336
							10	-17.8047792	-17.8047792	-17.8047792
							11	-17.9304794	-17.9304794	-17.9304794
							12	-18.0074419	-18.0074419	-18.0074419
							13	-18.1730868	-18.1730868	-18.1730868
							14	-18.2332697	-18.2332697	-18.2332697
							15	-18.3766231	-18.3766231	-18.3766231
							16	-18.5197106	-18.5197106	-18.5197106
							17	-18.4482214	-18.4482214	-18.4482214
							18	-18.4153884	-18.4153884	-18.4153884
							19	-18.5231218	-18.5231218	-18.5231218
							20	-18.5300929	-18.5300929	-18.5300929
						</tableData>
						<tableData breakPoint="30">
							-15	0	15
							-5	-14.5863126	-14.5863126	-14.5863126
							-4	-22.1859724	-22.1859724	-22.1859724
							-3	-28.1330961	-28.1330961	-28.1330961
							-2	-22.477277	-22.477277	-22.477277
							-1	-16.4621421	-16.4621421	-16.4621421
							0	-15.8541255	-15.8541255	-15.8541255
							1	-9.4948566	-9.4948566	-9.4948566
							2	-15.0668544	-15.0668544	-15.0668544
							3	-11.1550116	-11.1550116	-11.1550116
							4	-13.696186	-13.696186	-13.696186
							5	-17.4717427	-17.4717427	-17.4717427
							6	-17.5670991	-17.5670991	-17.5670991
							7	-25.0909722	-25.0909722	-25.0909722
							8	-18.3931107	-18.3931107	-18.3931107
							9	-18.4723045	-18.4723045	-18.4723045
							10	-18.4406269	-18.4406269	-18.4406269
							11	-18.2341057	-18.2341057	-18.2341057
							12	-18.338066	-18.338066	-18.338066
							13	-18.8065313	-18.8065313	-18.8065313
							14	-19.2936489	-19.2936489	-19.2936489
							15	-19.2750852	-19.2750852	-19.2750852
							16	-18.8892223	-18.8892223	-18.8892223
							17	-18.9200322	-18.9200322	-18.9200322
							18	-19.2078771	-19.2078771	-19.2078771
							19	-19.1656768	-19.1656768	-19.1656768
							20	-19.0112839	-19.0112839	-19.0112839
						</tableData>
					</table>
				</product>
			</function>

			<function name="aero/moment/Pitch_alphadot">
				<description>Pitch moment due to alpha rate</description>
				<product>
					<property>aero/qbar-psf</property>
					<property>metrics/Sw-sqft</property>
					<property>metrics/cbarw-ft</property>
					<property>aero/ci2vel</property>
					<property>aero/alphadot-rad_sec</property>
					<value>-7</value>
				</product>
			</function>

			<function name="aero/moment/pitch_yaw">
				<description>Roll moment due to yaw rate</description>
				<product>
					<property>aero/qbar-psf</property>
					<property>metrics/Sw-sqft</property>
					<property>metrics/cbarw-ft</property>
					<property>aero/ci2vel</property>
					<property>velocities/r-aero-rad_sec</property>
					<table>
						<independentVar lookup="row">aero/alpha-deg</independentVar>
						<independentVar lookup="column">aero/beta-deg</independentVar>
						<independentVar lookup="table">fcs/flap-pos-deg</independentVar>
						<tableData breakPoint="0">
							-15	0	15
							-5	0.0820343	0.0820343	0.0820343
							-4	-0.1100255	-0.1100255	-0.1100255
							-3	-0.0777208	-0.0777208	-0.0777208
							-2	-0.0626225	-0.0626225	-0.0626225
							-1	-0.0670891	-0.0670891	-0.0670891
							0	-0.1013617	-0.1013617	-0.1013617
							1	-0.1181495	-0.1181495	-0.1181495
							2	-0.0791276	-0.0791276	-0.0791276
							3	-0.0595113	-0.0595113	-0.0595113
							4	-0.0779355	-0.0779355	-0.0779355
							5	-0.0501246	-0.0501246	-0.0501246
							6	0.2654495	0.2654495	0.2654495
							7	-0.0701891	-0.0701891	-0.0701891
							8	-0.1588291	-0.1588291	-0.1588291
							9	-0.1449715	-0.1449715	-0.1449715
							10	-0.1102169	-0.1102169	-0.1102169
							11	-0.0661087	-0.0661087	-0.0661087
							12	-0.0715526	-0.0715526	-0.0715526
							13	-0.0820329	-0.0820329	-0.0820329
							14	-0.0949803	-0.0949803	-0.0949803
							15	-0.1132574	-0.1132574	-0.1132574
							16	-0.1005522	-0.1005522	-0.1005522
							17	-0.0673372	-0.0673372	-0.0673372
							18	-0.0737405	-0.0737405	-0.0737405
							19	0.2670781	0.2670781	0.2670781
							20	0.1312372	0.1312372	0.1312372
						</tableData>
						<tableData breakPoint="30">
							-15	0	15
							-5	-0.2424877	-0.2424877	-0.2424877
							-4	-0.6259804	-0.6259804	-0.6259804
							-3	-1.5254833	-1.5254833	-1.5254833
							-2	-1.7176756	-1.7176756	-1.7176756
							-1	1.6052834	1.6052834	1.6052834
							0	0.129713	0.129713	0.129713
							1	0.1770586	0.1770586	0.1770586
							2	0.0631651	0.0631651	0.0631651
							3	0.8185949	0.8185949	0.8185949
							4	0.4709313	0.4709313	0.4709313
							5	0.0991103	0.0991103	0.0991103
							6	-0.1474329	-0.1474329	-0.1474329
							7	-1.1286657	-1.1286657	-1.1286657
							8	-0.29338	-0.29338	-0.29338
							9	-0.2701196	-0.2701196	-0.2701196
							10	-0.0890657	-0.0890657	-0.0890657
							11	-0.207269	-0.207269	-0.207269
							12	-0.1196511	-0.1196511	-0.1196511
							13	-0.1275553	-0.1275553	-0.1275553
							14	-0.1215115	-0.1215115	-0.1215115
							15	-0.1567293	-0.1567293	-0.1567293
							16	-0.1104523	-0.1104523	-0.1104523
							17	-0.0216615	-0.0216615	-0.0216615
							18	-0.0500458	-0.0500458	-0.0500458
							19	0.0611963	0.0611963	0.0611963
							20	0.0920706	0.0920706	0.0920706
						</tableData>
					</table>
				</product>
			</function>

			<function name="aero/moment/Pitch_mach">
				<description>Pitch moment due to mach rate</description>
				<product>
					<property>aero/qbar-psf</property>
					<property>metrics/Sw-sqft</property>
					<property>metrics/cbarw-ft</property>
					<difference>
						<property>velocities/mach</property>
						<value>0.11</value>
					</difference>
					<table>
						<independentVar lookup="row">aero/alpha-deg</independentVar>
						<independentVar lookup="column">aero/beta-deg</independentVar>
						<independentVar lookup="table">fcs/flap-pos-deg</independentVar>
						<tableData breakPoint="0">
							-15	0	15
							-5	0.0374493	0.0374493	0.0374493
							-4	0.0321587	0.0321587	0.0321587
							-3	0.032885	0.032885	0.032885
							-2	0.0335418	0.0335418	0.0335418
							-1	0.0339663	0.0339663	0.0339663
							0	0.0342137	0.0342137	0.0342137
							1	0.0343703	0.0343703	0.0343703
							2	0.0345669	0.0345669	0.0345669
							3	0.0345557	0.0345557	0.0345557
							4	0.035169	0.035169	0.035169
							5	0.0354678	0.0354678	0.0354678
							6	0.0347304	0.0347304	0.0347304
							7	0.0344562	0.0344562	0.0344562
							8	0.0342391	0.0342391	0.0342391
							9	0.0330129	0.0330129	0.0330129
							10	0.0335734	0.0335734	0.0335734
							11	0.0327532	0.0327532	0.0327532
							12	0.0320191	0.0320191	0.0320191
							13	0.0249825	0.0249825	0.0249825
							14	0.0226037	0.0226037	0.0226037
							15	0.0185215	0.0185215	0.0185215
							16	0.01603	0.01603	0.01603
							17	0.0191553	0.0191553	0.0191553
							18	0.0108411	0.0108411	0.0108411
							19	0.0007691	0.0007691	0.0007691
							20	-0.002319	-0.002319	-0.002319
						</tableData>
						<tableData breakPoint="30">
							-15	0	15
							-5	0.0488619	0.0488619	0.0488619
							-4	0.0421115	0.0421115	0.0421115
							-3	0.0803855	0.0803855	0.0803855
							-2	0.0693375	0.0693375	0.0693375
							-1	0.061603	0.061603	0.061603
							0	0.0420033	0.0420033	0.0420033
							1	0.0521489	0.0521489	0.0521489
							2	0.0469466	0.0469466	0.0469466
							3	0.2840112	0.2840112	0.2840112
							4	0.0628395	0.0628395	0.0628395
							5	0.040779	0.040779	0.040779
							6	0.0601596	0.0601596	0.0601596
							7	-0.0479282	-0.0479282	-0.0479282
							8	0.0499783	0.0499783	0.0499783
							9	0.0631365	0.0631365	0.0631365
							10	0.0623843	0.0623843	0.0623843
							11	0.062549	0.062549	0.062549
							12	0.0601966	0.0601966	0.0601966
							13	0.031385	0.031385	0.031385
							14	0.0565844	0.0565844	0.0565844
							15	0.0539542	0.0539542	0.0539542
							16	0.0492754	0.0492754	0.0492754
							17	0.0501623	0.0501623	0.0501623
							18	0.0432883	0.0432883	0.0432883
							19	0.0390646	0.0390646	0.0390646
							20	0.0385645	0.0385645	0.0385645
						</tableData>
					</table>
				</product>
			</function>
		</axis>


		<axis name="YAW">
			<function name="aero/moment/Yaw_roll_rate">
				<description>Yaw moment due to roll rate</description>
				<product>
					<property>aero/qbar-psf</property>
					<property>metrics/Sw-sqft</property>
					<property>metrics/bw-ft</property>
					<property>aero/bi2vel</property>
					<property>velocities/p-aero-rad_sec</property>
					<value>-1</value>
					<table>
						<independentVar lookup="row">aero/alpha-deg</independentVar>
						<independentVar lookup="column">aero/beta-deg</independentVar>
						<independentVar lookup="table">fcs/flap-pos-deg</independentVar>
						<tableData breakPoint="0">
							-15	0	15
							-5	0.0286676	0.0286676	0.0286676
							-4	0.02458	0.02458	0.02458
							-3	0.0323209	0.0323209	0.0323209
							-2	0.0404593	0.0404593	0.0404593
							-1	0.0530653	0.0530653	0.0530653
							0	0.0675517	0.0675517	0.0675517
							1	0.0768022	0.0768022	0.0768022
							2	0.0912522	0.0912522	0.0912522
							3	0.1059804	0.1059804	0.1059804
							4	0.1200087	0.1200087	0.1200087
							5	0.1338913	0.1338913	0.1338913
							6	0.140701	0.140701	0.140701
							7	0.1419016	0.1419016	0.1419016
							8	0.1829177	0.1829177	0.1829177
							9	0.1927242	0.1927242	0.1927242
							10	0.1953513	0.1953513	0.1953513
							11	0.2210546	0.2210546	0.2210546
							12	0.2088141	0.2088141	0.2088141
							13	0.206746	0.206746	0.206746
							14	0.1951727	0.1951727	0.1951727
							15	0.1882907	0.1882907	0.1882907
							16	0.1823622	0.1823622	0.1823622
							17	0.1777533	0.1777533	0.1777533
							18	0.1704396	0.1704396	0.1704396
							19	0.162976	0.162976	0.162976
							20	0.159268	0.159268	0.159268
						</tableData>
						<tableData breakPoint="30">
							-15	0	15
							-5	0.0363321	0.0363321	0.0363321
							-4	0.0466207	0.0466207	0.0466207
							-3	0.0829772	0.0829772	0.0829772
							-2	0.0869043	0.0869043	0.0869043
							-1	0.0768148	0.0768148	0.0768148
							0	0.0700936	0.0700936	0.0700936
							1	0.0961652	0.0961652	0.0961652
							2	0.1241656	0.1241656	0.1241656
							3	0.1364202	0.1364202	0.1364202
							4	0.1500836	0.1500836	0.1500836
							5	0.1869022	0.1869022	0.1869022
							6	0.1962349	0.1962349	0.1962349
							7	0.211526	0.211526	0.211526
							8	0.2142743	0.2142743	0.2142743
							9	0.2272859	0.2272859	0.2272859
							10	0.2352222	0.2352222	0.2352222
							11	0.2439557	0.2439557	0.2439557
							12	0.2522595	0.2522595	0.2522595
							13	0.2559029	0.2559029	0.2559029
							14	0.2566089	0.2566089	0.2566089
							15	0.2622201	0.2622201	0.2622201
							16	0.265016	0.265016	0.265016
							17	0.257952	0.257952	0.257952
							18	0.2541546	0.2541546	0.2541546
							19	0.2496654	0.2496654	0.2496654
							20	0.2425066	0.2425066	0.2425066
						</tableData>
					</table>
				</product>
			</function>


			<function name="aero/moment/Yaw_base">
				<description>Yaw moment due to beta</description>
				<product>
					<property>aero/qbar-psf</property>
					<property>metrics/Sw-sqft</property>
					<property>metrics/bw-ft</property>
					<value>-1</value>
					<table>
						<independentVar lookup="row">aero/alpha-deg</independentVar>
						<independentVar lookup="column">aero/beta-deg</independentVar>
						<independentVar lookup="table">fcs/flap-pos-deg</independentVar>
						<tableData breakPoint="0">
							-15	0	15
							-5	0.0138636	6.8E-06	-0.0138636
							-4	0.0143569	-1.9E-06	-0.0143569
							-3	0.0155697	-9E-07	-0.0155697
							-2	0.0153336	-1.5E-06	-0.0153336
							-1	0.0150584	-2.8E-06	-0.0150584
							0	0.0142572	-3.1E-06	-0.0142572
							1	0.0163754	-3.5E-06	-0.0163754
							2	0.0149831	-4E-06	-0.0149831
							3	0.0198339	-4.1E-06	-0.0198339
							4	0.0163663	-6.3E-06	-0.0163663
							5	0.0173186	-1.81E-05	-0.0173186
							6	0.0161216	-6E-06	-0.0161216
							7	0.018321	-4.6E-06	-0.018321
							8	0.0200748	-6.6E-06	-0.0200748
							9	0.0195446	-1.67E-05	-0.0195446
							10	0.0194093	-2.73E-05	-0.0194093
							11	0.0191135	-3.4E-06	-0.0191135
							12	0.0189	-1.39E-05	-0.0189
							13	0.0187672	-1.01E-05	-0.0187672
							14	0.0191288	-1.23E-05	-0.0191288
							15	0.0199069	-7E-07	-0.0199069
							16	0.0206152	-1.1E-05	-0.0206152
							17	0.0211155	-4.08E-05	-0.0211155
							18	0.0212636	-2.2E-06	-0.0212636
							19	0.0198371	-2.4E-06	-0.0198371
							20	0.0200106	-2.53E-05	-0.0200106
						</tableData>
						<tableData breakPoint="30">
							-15	0	15
							-5	0.0141548	-4.67E-05	-0.0145742
							0	0.0147884	0.0001152	-0.0046139
							5	0.0178121	1.51E-05	-0.0172699
							10	0.0226544	1.47E-05	-0.0215788
							15	0.0257419	-3.76E-05	-0.0256419
							20	0.0261384	-1.84E-05	-0.0262662
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						</tableData>
					</table>
					<table>
						<independentVar lookup="row">aero/beta-rad</independentVar>
						<tableData>
							-3.14	0
							-1.57	0.7
							-0.44	0.85
							0	0.85	<!-- for dorsal fin set -->
							0.44	0.85
							1.57	0.7
							3.14	0
						</tableData>
					</table>
				</product>
			</function>

			<function name="aero/moment/Yaw_damp">
				<description>Yaw moment due to yaw rate</description>
				<product>
					<property>aero/qbar-psf</property>
					<property>metrics/Sw-sqft</property>
					<property>metrics/bw-ft</property>
					<property>aero/bi2vel</property>
					<property>velocities/r-aero-rad_sec</property>
					<value>-1</value>
					<table>
						<independentVar lookup="row">aero/alpha-deg</independentVar>
						<independentVar lookup="column">aero/beta-deg</independentVar>
						<independentVar lookup="table">fcs/flap-pos-deg</independentVar>
						<tableData breakPoint="0">
							-15	0	15
							-5	0.1315	0.1315	0.1315
							0	0.1084131	0.1084131	0.1084131
							5	0.1010835	0.1010835	0.1010835
							10	0.0985589	0.0985589	0.0985589
							15	0.107785	0.107785	0.107785
							20	0.0929206	0.0929206	0.0929206
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						</tableData>
						<tableData breakPoint="30">
							-15	0	15
							-5	0.1170354	0.1170354	0.1170354
							0	0.0845874	0.0845874	0.0845874
							5	0.1127186	0.1127186	0.1127186
							10	0.1331765	0.1331765	0.1331765
							15	0.1239226	0.1239226	0.1239226
							20	0.0960523	0.0960523	0.0960523
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						</tableData>
					</table>
				</product>
			</function>

			<function name="aero/moment/Yaw_rudder">
				<description>Yaw moment due to rudder</description>
				<product>
					<property>aero/qbar-psf</property>
					<property>metrics/Sw-sqft</property>
					<property>metrics/bw-ft</property>
					<property>fcs/rudder-pos-rad</property>
					<table>
						<independentVar lookup="row">aero/beta-rad</independentVar>
						<tableData>
							-3.14	-1
							-1.57	0
							-0.5	1
							0	1
							0.5	1
							1.57	0
							3.14	-1
						</tableData>
					</table>
					<table>
						<independentVar lookup="row">aero/alpha-deg</independentVar>
						<independentVar lookup="column">aero/beta-deg</independentVar>
						<independentVar lookup="table">fcs/flap-pos-deg</independentVar>
						<tableData breakPoint="0">
							-15	0	15
							-5	-0.0772623	-0.0772623	-0.0772623
							0	-0.0730835	-0.0730835	-0.0730835
							5	-0.0670885	-0.0670885	-0.0670885
							10	-0.0626782	-0.0626782	-0.0626782
							15	-0.0578844	-0.0578844	-0.0578844
							20	-0.0512989	-0.0512989	-0.0512989
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						</tableData>
						<tableData breakPoint="30">
							-15	0	15
							-5	-0.0782914	-0.0782914	-0.0782914
							0	-0.0733528	-0.0733528	-0.0733528
							5	-0.0716548	-0.0716548	-0.0716548
							10	-0.0617973	-0.0617973	-0.0617973
							15	-0.0549642	-0.0549642	-0.0549642
							20	-0.0485106	-0.0485106	-0.0485106
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						</tableData>
					</table>
				</product>
			</function>

			<function name="aero/moment/Yaw_aileron">
				<description>Adverse yaw</description>
				<product>
					<property>aero/qbar-psf</property>
					<property>metrics/Sw-sqft</property>
					<property>metrics/bw-ft</property>
					<property>fcs/left-aileron-pos-rad</property>
					<value>0.5</value>
					<table>
						<independentVar lookup="row">aero/alpha-deg</independentVar>
						<independentVar lookup="column">aero/beta-deg</independentVar>
						<independentVar lookup="table">fcs/flap-pos-deg</independentVar>
						<tableData breakPoint="0">
								-15	0	15
							-5	-0.0316783	-0.0316783	-0.0316783
							0	-0.0129932	-0.0129932	-0.0129932
							5	-0.0039688	-0.0039688	-0.0039688
							10	-0.0087409	-0.0087409	-0.0087409
							15	-0.022483	-0.022483	-0.022483
							20	-0.0412904	-0.0412904	-0.0412904
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						</tableData>
						<tableData breakPoint="30">
							-15	0	15
							-5	-0.0123876	-0.0123876	-0.0123876
							0	-0.0124854	-0.0124854	-0.0124854
							5	-0.0067229	-0.0067229	-0.0067229
							10	-0.0007306	-0.0007306	-0.0007306
							15	0.0035304	0.0035304	0.0035304
							20	-0.0309923	-0.0309923	-0.0309923
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						</tableData>
					</table>
				</product>
			</function>
		</axis>

<!-- paste aera -->

<!--		<function name="aero/liftdrag">
			<description>lift vs. drag</description>
			<quotient>
				<sum>
					<property>aero/force/Lift_alpha</property>
					<property>aero/force/Lift_flap</property>
					<property>aero/force/Lift_elevator</property>
				</sum>
				<sum>
					<property>aero/force/Drag_basic</property>
					<property>aero/force/Drag_cowlflaps</property>
					<property>aero/force/Drag_induced</property>
					<property>aero/force/Drag_flap</property>
					<property>aero/force/Drag_gear</property>
					<property>aero/force/Drag_beta</property>
					<property>aero/force/Drag_elevator</property>
					<property>aero/force/testwindmill</property>
				</sum>
			</quotient>
		</function> -->
	</aerodynamics>

	<external_reactions>
		<force name="hitch" frame="BODY" unit="LBS" >
			<location unit="IN">
				<x>246</x>
				<y>0</y>
				<z>4.4</z>
			</location>
			<direction>
				<x>0</x>
				<y>0</y>
				<z>0</z>
			</direction>
		</force>

		<force name="pushback" frame="BODY" unit="LBS">
			<location unit="IN">
				<x>-10.5</x>
				<y>0</y>
				<z>-35.8</z>
			</location>
			<direction>
				<x>1</x>
				<y>0</y>
				<z>0.05</z>
			</direction>
		</force>
	</external_reactions>
</fdm_config>
